# Notes to user:
# - Items highlighted yellow are for user input.  Items highlighted green are intermediate or final results.
# - The right side of the worksheet can be used as a scratch area for calculations that do not get printed.
# -The use of this standard calculation does not imply good engineering practice. A thorough understanding of the topic is necessary and any results shall only be utilized after careful review.
# General Notes / Assumptions
# - This standard calculation is for the design of steel members in accordance with SANS 10162^2.  All references to clause and table numbers are with reference to this standard.
# - The moment resistance calculations are valid for sections with either their web or flanges being class 4, but not both being class 4.  In such a case the section should be designed in accordance with clause 13.5(c)(i).
# - It is assumed that the section being analyzed is one of the types listed below under Section and fabrication types.  For section type 4 (equal/unequal leg angles), this calculation does not apply for members subject to bending that are laterally unsupported, or members subject to bending that are both laterally supported and class 4.
# - Some section property calculations do not take into account flange-to-web fillets.
# - Shear buckling is assumed to not be critical for shear parallel to the x-axis.
# References
# - SANS 10162-1:2005, The structural use of steel, Part 1: Limit-state design of hot-rolled steelwork.
# - Southern African Steel Construction Handbook (Red Book), Fifth Edition, 2005.
# - Young, W.C., Budynas, R.G., Roark's Formulas for Stress and Strain, Seventh Edition, McGraw-Hill.
# - Galambos, T.V., Design Criteria for Metal Structures, Fifth Ed, 1998, John Wiley and Sons.
# Input Data
# Section and Fabrication Types
Sect_type := 1
# - Doubly symmetric I section
# - Monosymmetric T section
# - Monosymmetric channel
# - Equal/unequal leg angle
# - Square hollow section
# - Rectangular hollow section
# - Circular hollow section
Fab_type := 1
# - Hot-rolled sections, or hollow sections that are cold-formed and not stress-relieved.
# - Welded plate girders with flange edges oxy-flame-cut, or hollow sections hot formed or cold formed and stress-relieved.
# Section Properties
# Note that the variable names and axis directions for the following section properties are all in accordance with the HatchTools section properties standard nomenclature.
# [Excel component]
    Library := excel["B1"]
    Section := excel["B2"]
    Shape := excel["B3"]
    Fab := excel["B4"]
    SectUnit_M := excel["B5"]
    D_M := excel["B6"]
    B_fM := excel["B7"]
    t_fM := excel["B8"]
    t_wM := excel["B9"]
    d_fM := excel["B10"]
    A_gM := excel["B11"]
    I_xM := excel["B12"]
    I_yM := excel["B13"]
    r_xM := excel["E1"]
    r_yM := excel["E2"]
    Z_exM := excel["E3"]
    Z_eyM := excel["E4"]
    Z_pxM := excel["E5"]
    Z_pyM := excel["E6"]
    J_tM := excel["E7"]
    I_wM := excel["E8"]
    C_xM := excel["E9"]
    C_yM := excel["E10"]
    R_fM := excel["E11"]
    Alpha_M := excel["E12"]
    m_uM := excel["E13"]
# - The data in the adjacent 'single section properties component' should be updated using the section properties transfer tool in HatchTools.
# Otherwise, if custom section properties are required, double-click on the component and enter them manually.
SectUnit :=
    if SectUnit_M == "mm"
        mm
    if SectUnit_M == "in"
        in
D := D_M*SectUnit
A_g := A_gM*SectUnit^2
Z_ex := Z_exM*SectUnit^3
I_w := I_wM*SectUnit^6
B_f := B_fM*SectUnit
I_x := I_xM*SectUnit^4
Z_ey := Z_eyM*SectUnit^3
C_x := C_xM*SectUnit
t_f := t_fM*SectUnit
I_y := I_yM*SectUnit^4
Z_px := Z_pxM*SectUnit^3
C_y := C_yM*SectUnit
t_w := t_wM*SectUnit
r_x := r_xM*SectUnit
Z_py := Z_pyM*SectUnit^3
R_f := R_fM*SectUnit
d_f := d_fM*SectUnit
r_y := r_yM*SectUnit
J_t := J_tM*SectUnit^4
Alpha := Alpha_M*deg
m_u := m_uM*{
    if SectUnit == mm
        kg/m
    if SectUnit == in
        lb/ft
}
# Ultimate Actions and Loading Conditions
# Actions at the Section of Beam of Concern
N_f := 0.0001*kN  # Axial force (compression is positive, tension is negative).
M_fx := 0*kN*m  # Moment about the x-axis (positive causes compression at top of section).
M_fy := 0*kN*m  # Moment about the y-axis (positive causes compression at right of section).
V_fx := 0*kN  # Shear force parallel to x-axis.
V_fy := 0*kN  # Shear force parallel to y-axis.
# End Moments
M_fxA := 0.0001*kN*m  # Factored moments about x axis at end 'A' of member.
M_fxB := 0.0001*kN*m  # Factored moments about x axis at end 'B' of member.
# Loading Condition
Curvature := 1
# - Single curvature
# - Double curvature.
# - The adjacent w_2_case parameter is used to determine w_2 in accordance with clause 13.6.  It only has an effect on the bending resistance of laterally unsupported members.
ω_2_case := 2
# - The unbraced length of the member is subject to end moments only.
# - The member has a bending moment at any point within its unbraced length that is larger than the end moments, or when there is no effective lateral support for the compression flange at one of the ends of the unsupported length.
# Stiffener Details
S_stf := 0*mm  # Spacing of web stiffeners (0 if none).  This input value is only applicable for I sections and channels.
# Material Properties
G_s := 77*GPa  # Shear modulus of steel.
E_s := 2.0*10^5*MPa  # Elastic modulus of steel.
f_y := 350*MPa  # Yield strength of steel.
f_u := 480*MPa  # Tensile strength of steel.
ϕ_s := 0.9  # Resistance factor for structural steel.
# Effective Lengths
# Member Length
L_x := 3500*mm  # Unsupported length with respect to x-axis.
L_y := 3500*mm  # Unsupported length with respect to y-axis.
L_z := 3500*mm  # Unsupported length for torsional buckling.
L_u := 3500*mm  # Length of unbraced portion of beam.
# Compression Effective Length Factors
K_x := 1.0  # Effective length factor for buckling about x-axis.
K_y := 1.0  # Effective length factor for buckling about y-axis.
# Effective Length Factor for Torsional Buckling
K_e := 1  # Effective length factor for torsional buckling, conservatively taken as 1.0.
# Member Bracing Arrangement
Mem_br := 1
# - Member in braced frame.
# - Member in unbraced frame.
# Other Design Parameters
# - The adjacent Std_des parameter is used when calculating the compression resistance of Class 4 sections (clause 13.3.3), because of the difference between the two codes.
ω_1_case := 1
# - Member not subject to transverse loads between supports.
# - Member subject to distributed loads or a series of point loads between supports.
# - Member subject to a concentrated load or moment between supports.
NSF := 0.8  # Net section factor for axial tension resistance.
# Detailed Calculations
# Section Properties
# General Notes
# The following equations are for the outstanding section properties that are not included as part of the input data.
# Modified Variables for Closed Sections
# Some of the following equations in this calculation require that all section property variables be greater than zero in all cases.  Sometimes, for closed sections, this is not the case.  The following equations modify these variables to ensure correct functionality.
B_fm := if(Sect_type == 7, D, B_f)  # Modified section width B_f.
B_fm = 178.8 mm
t_wm := if(t_w == 0*mm, t_f, t_w)  # Modified section thickness t_w.
t_wm = 8.8 mm
I_ym := if(Sect_type == 7, I_x, I_y)  # Modified moment of inertia l_y.
I_ym = 13700000 mm^4
r_ym := if(Sect_type == 7, r_x, r_y)
# Modified radius of gyration about y axis.
r_ym = 39.95 mm
Z_eym := if(Sect_type == 7, Z_ex, Z_ey)  # Modified elastic modulus Z_ey.
Z_eym = 153000 mm^3
Z_pym := if(Sect_type == 7, Z_px, Z_py)  # Modified plastic modulus Z_py.
Z_pym = 237000 mm^3
# Section Yield Force
# The axial force in the member at yield stress is required for the following section classification, and is calculated as follows:
C_yd := f_y*A_g
C_yd = 2993.9 kN
# Net Action Effect
# The net action effect (axial Tension, axial Compression, or Flexure) is required for the section classification, and is calculated as follows:
Net_act :=
    if N_f < 0 and M_fx == 0 and M_fy == 0
        "Tens"
    also if N_f > 0 and M_fx == 0 and M_fy == 0
        "Comp"
    else
        "Flex"
Net_act = "Comp"
# Section Classifications
# Element Classification Functions for Axial Compression
# The following functions return the classification of an element based on the element length l_e, and the element thickness t_e.  Note the following:
# - The functions are in accordance with Table 1 of CAN/CSA S16-01, and Tables 3 of SANS 10162-1.
# - These classifications are only relevant when the full section is subject to axial compression only (no flexural compression).
# - The classification for axial compression is solely to determine whether a section can yield prior to local buckling of a section element.  For the purposes of this calculation, a classification of '1' means that the section can yield, and '4' means that the section cannot yield.
# Function to determine the class of an element subject to axial compression, which is supported along one edge, such as the flange of an I-section, T-section or channel, or a leg of an angle:
Class_ac_1(l_e, t_e) :=
    if l_e/t_e > 250/sqrt(f_y*MPa^-1) and Sect_type == 4
        4
    if l_e/t_e ≤ 250/sqrt(f_y*MPa^-1) and Sect_type == 4
        1
    if l_e/t_e > 200/sqrt(f_y*MPa^-1) and Sect_type ≠ 4
        4
    if l_e/t_e ≤ 200/sqrt(f_y*MPa^-1) and Sect_type ≠ 4
        1
# Function to determine the class of the stem of a T-section in axial compression:
Class_ac_2(l_e, t_e) :=
    if l_e/t_e > 340/sqrt(f_y*MPa^-1)
        4
    if l_e/t_e ≤ 340/sqrt(f_y*MPa^-1)
        1
# Function to determine the class of an element in axial compression, which is either a flange of a square/rectangular hollow section, or a web supported on both edges:
Class_ac_3(l_e, t_e) :=
    if l_e/t_e > 670/sqrt(f_y*MPa^-1)
        4
    if l_e/t_e ≤ 670/sqrt(f_y*MPa^-1)
        1
# Function to determine the class of a circular hollow section in axial compression:
Class_ac_4(l_e, t_e) :=
    if l_e/t_e > 23000/(f_y*MPa^-1)
        4
    if l_e/t_e ≤ 23000/(f_y*MPa^-1)
        1
# Section Classification Based on Section Type for Axial Compression
# The following calculations determine the final classification of the section based on the section type.  Note that the element dimensions used are in accordance with clause 11.3.
# Web classification:
Class_aw :=
    if Net_act == "Tens"
        return "Tension member"
    if Sect_type == 1
        Class_ac_3(D - 2*t_f, t_wm)
    if Sect_type == 2
        max(2, Class_ac_2(D, t_wm))
    if Sect_type == 3
        Class_ac_3(D - 2*t_f, t_wm)
    if Sect_type == 4
        Class_ac_1(D, t_wm)
    if Sect_type == 5
        Class_ac_3(D - 4*t_f, t_f)
    if Sect_type == 6
        max(2, Class_ac_3(D - 4*t_f, t_f))
    if Sect_type == 7
        Class_ac_4(D, t_f)
Class_aw = 4
# Flange classification:
Class_af :=
    if Net_act == "Tens"
        return "Tension member"
    if Sect_type == 1
        Class_ac_1(0.5*B_fm, t_f)
    if Sect_type == 2
        max(2, Class_ac_1(0.5*B_fm, t_f))
    if Sect_type == 3
        Class_ac_1(B_fm, t_f)
    if Sect_type == 4
        Class_ac_1(B_fm, t_f)
    if Sect_type == 5
        Class_ac_3(B_fm - 4*t_wm, t_wm)
    if Sect_type == 6
        max(2, Class_ac_3(B_fm - 4*t_wm, t_wm))
    if Sect_type == 7
        Class_ac_4(D, t_f)
Class_af = 1
# Overall section classification:
Class_ao :=
    if Net_act == "Tens"
        return "Tension member"
    else
        max(Class_aw, Class_af)
Class_ao = 4
# Element Classification Functions for Flexural Compression
# The following functions return the classification of an element based on the element length l_e, and the element thickness t_e.  The functions are in accordance with Table 2 of CAN/CSA S16-01, and Table 4 of SANS 10162-1.
# Function to determine the class of the flange of an I-section, T-section or channel in flexural compression:
Class_fc_1(l_e, t_e) :=
    if l_e/t_e > 200/sqrt(f_y*MPa^-1)
        4
    if l_e/t_e ≤ 200/sqrt(f_y*MPa^-1)
        3
    if l_e/t_e ≤ 170/sqrt(f_y*MPa^-1)
        2
    if l_e/t_e ≤ 145/sqrt(f_y*MPa^-1)
        1
# Function to determine the class of the stem of a T-section in flexural compression:
Class_fc_2(l_e, t_e) :=
    if l_e/t_e > 340/sqrt(f_y*MPa^-1)
        4
    if l_e/t_e ≤ 340/sqrt(f_y*MPa^-1)
        3
    if l_e/t_e ≤ 170/sqrt(f_y*MPa^-1)
        2
    if l_e/t_e ≤ 145/sqrt(f_y*MPa^-1)
        1
# Function to determine the class of the flange of a square/rectangular hollow section in flexural compression:
Class_fc_3(l_e, t_e) :=
    if l_e/t_e > 670/sqrt(f_y*MPa^-1)
        4
    if l_e/t_e ≤ 670/sqrt(f_y*MPa^-1)
        3
    if l_e/t_e ≤ 525/sqrt(f_y*MPa^-1)
        2
    if l_e/t_e ≤ 420/sqrt(f_y*MPa^-1)
        1
# Function to determine the class of a web element in flexural compression:
Class_fc_4(l_e, t_e) :=
    if l_e/t_e > 1900/sqrt(f_y*MPa^-1)*(1 - 0.65*max(N_f, 0)/(ϕ_s*C_yd))
        4
    if l_e/t_e ≤ 1900/sqrt(f_y*MPa^-1)*(1 - 0.65*max(N_f, 0)/(ϕ_s*C_yd))
        3
    if l_e/t_e ≤ 1700/sqrt(f_y*MPa^-1)*(1 - 0.61*max(N_f, 0)/(ϕ_s*C_yd))
        2
    if l_e/t_e ≤ 1100/sqrt(f_y*MPa^-1)*(1 - 0.39*max(N_f, 0)/(ϕ_s*C_yd))
        1
# Function to determine the class of a circular hollow section in flexural compression:
Class_fc_5(l_e, t_e) :=
    if l_e/t_e > 66000/(f_y*MPa^-1)
        4
    if l_e/t_e ≤ 66000/(f_y*MPa^-1)
        3
    if l_e/t_e ≤ 18000/(f_y*MPa^-1)
        2
    if l_e/t_e ≤ 13000/(f_y*MPa^-1)
        1
# Section Classification Based on Section Type for Flexural Compression
# The following calculations determine the final classification of the section based on the section type.  Note that the element dimensions used are in accordance with clause 11.3, and minimum values have been assigned for certain section types based on their symmetry in accordance with clauses 11.1.2 and 11.1.3.
# Web classification:
Class_fw :=
    if Net_act == "Tens"
        return "Tension member"
    if Sect_type == 1
        Class_fc_4(D - 2*t_f, t_wm)
    if Sect_type == 2
        Class_fc_2(D, t_wm)
    if Sect_type == 3
        max(3, Class_fc_4(D - 2*t_f, t_wm))
    if Sect_type == 4
        "N/A"
    if Sect_type == 5
        Class_fc_3(D - 4*t_f, t_f)
    if Sect_type == 6
        Class_fc_3(D - 4*t_f, t_f)
    if Sect_type == 7
        Class_fc_5(D, t_f)
Class_fw = 1
# Flange classification:
Class_ff :=
    if Net_act == "Tens"
        return "Tension member"
    if Sect_type == 1
        Class_fc_1(0.5*B_fm, t_f)
    if Sect_type == 2
        Class_fc_1(0.5*B_fm, t_f)
    if Sect_type == 3
        max(3, Class_fc_1(B_fm, t_f))
    if Sect_type == 4
        "N/A"
    if Sect_type == 5
        Class_fc_3(B_fm - 4*t_wm, t_wm)
    if Sect_type == 6
        Class_fc_3(B_fm - 4*t_wm, t_wm)
    if Sect_type == 7
        Class_fc_5(D, t_f)
Class_ff = 1
# Overall section classification:
Class_fo :=
    if Net_act == "Tens"
        return "Tension member"
    else
        max(Class_fw, Class_ff)
Class_fo = 1
