# Notes to user:
# - Items highlighted yellow are for user input.  Items highlighted green are intermediate or final results.
# - The right side of the worksheet can be used as a scratch area for calculations that do not get printed.
# -The use of this standard calculation does not imply good engineering practice. A thorough understanding of the topic is necessary and any results shall only be utilized after careful review.
# General Notes / Assumptions
# - This standard calculation is for the design of steel members in accordance with SANS 10162^-1.  All references to clause and table numbers are with reference to this standard.
# - The moment resistance calculations are valid for sections with either their web or flanges being class 4, but not both being class 4.  In such a case the section should be designed in accordance with clause 13.5(c)(i).
# - It is assumed that the section being analyzed is one of the types listed below under Section and fabrication types.  For section type 4 (equal/unequal leg angles), this calculation does not apply for members subject to bending that are laterally unsupported, or members subject to bending that are both laterally supported and class 4.
# - Some section property calculations do not take into account flange-to-web fillets.
# - Shear buckling is assumed to not be critical for shear parallel to the x-axis.
# References
# - CAN/CSA S16-14:2005, Limit States Design of Steel Structures.
# - SANS 10162-1:2005, The structural use of steel, Part 1: Limit-state design of hot-rolled steelwork.
# - Southern African Steel Construction Handbook (Red Book), Fifth Edition, 2005.
# - Handbook of Steel Construction, Ninth Edition, Canadian Institute of Steel Construction.
# - Young, W.C., Budynas, R.G., Roark's Formulas for Stress and Strain, Seventh Edition, McGraw-Hill.
# - Galambos, T.V., Design Criteria for Metal Structures, Fifth Ed, 1998, John Wiley and Sons.
# Input Data
Fab_type := 1
# - Hot-rolled sections, or hollow sections that are cold-formed and not stress-relieved.
# - Welded plate girders with flange edges oxy-flame-cut, or hollow sections hot formed or cold formed and stress-relieved.
# Section Properties
# Note that the variable names and axis directions for the following section properties are all in accordance with the HatchTools section properties standard nomenclature.
D := 111.1 mm
I_x := 3810000 mm^4
r_x := 26.3 mm
B_f := 208.8 mm
Z_ex := 42800 mm^3
r_y := 53.19 mm
t_f := 20.5 mm
Z_px := 86100 mm^3
J_t := 696000 mm^4
# - The data in the adjacent 'single section properties component' should be updated using the section properties transfer tool in HatchTools.
# Otherwise, if custom section properties are required, double-click on the component and enter them manually.
t_w := 13 mm
I_y := 15600000 mm^4
I_w := 582000000 mm^6
R_f := 10.2 mm
Z_ey := 149000 mm^3
C_y := 22.24 mm
A_g := 5503 mm^2
Z_py := 228000 mm^3
Mu := 43.1 kg/m
# Ultimate Actions and Loading Conditions
# Actions at the Section of Beam of Concern
N_f := 0.0001*kN  # Axial force (compression is positive, tension is negative).
M_fx := 0*kN*m  # Moment about the x-axis (positive causes compression at top of section).
M_fy := 0*kN*m  # Moment about the y-axis (positive causes compression at right of section).
V_fx := 0*kN  # Shear force parallel to x-axis.
V_fy := 0*kN  # Shear force parallel to y-axis.
# End Moments
M_fxA := 0.0001*kN*m  # Factored moments about x axis at end 'A' of member.
M_fxB := 0.0001*kN*m  # Factored moments about x axis at end 'B' of member.
# Loading Condition
Curvature := 1
# - Single curvature
# - Double curvature.
ω_2_case := 2
# - The unbraced length of the member is subject to end moments only.
# - The member has a bending moment at any point within its unbraced length that is larger than the end moments, or when there is no effective lateral support for the compression flange at one of the ends of the unsupported length.
# Stiffener Details
S_stf := 0*mm  # Spacing of web stiffeners (0 if none).  This input value is only applicable for I sections and channels.
# Material Properties
G_s := 77*GPa  # Shear modulus of steel.
E_s := 2.0*10^5*MPa  # Elastic modulus of steel.
f_y := 350*MPa  # Yield strength of steel.
f_u := 480*MPa  # Tensile strength of steel.
ϕ_s := 0.9  # Resistance factor for structural steel.
# Effective Lengths
# Member Length
# - The adjacent w_2_case parameter is used to determine w_2 in accordance with clause 13.6.  It only has an effect on the bending resistance of laterally unsupported members.
L_x := 3500*mm  # Unsupported length with respect to x-axis.
L_y := 3500*mm  # Unsupported length with respect to y-axis.
L_z := 3500*mm  # Unsupported length for torsional buckling.
L_u := 3500*mm  # Length of unbraced portion of beam.
# Compression Effective Length Factors
K_x := 1.0  # Effective length factor for buckling about x-axis.
K_y := 1.0  # Effective length factor for buckling about y-axis.
# Effective Length Factor for Torsional Buckling
K_e := 1  # Effective length factor for torsional buckling, conservatively taken as 1.0.
# Member Bracing Arrangement
Mem_br := 1
# - Member in braced frame.
# - Member in unbraced frame.
# Section Classifications
Class_af := 2
Class_aw := 2
# - Flange and web classification for axial compression
# -
# - Flange and web classification for flexural compression
Class_ff := 1
Class_fw := 2
# Other Design Parameters
ω_1_case := 1
# - Member not subject to transverse loads between supports.
# - Member subject to distributed loads or a series of point loads between supports.
# - Member subject to a concentrated load or moment between supports.
NSF := 0.8  # Net section factor for axial tension resistance.
# - The adjacent Std_des parameter is used when calculating the compression resistance of Class 4 sections (clause 13.3.3), because of the difference between the two codes.
# Detailed Calculations
# Section Properties
# General Notes
# The following equations are for the outstanding section properties that are not included as part of the input data.
# Modified Variables for Closed Sections
# Some of the following equations in this calculation require that all section property variables be greater than zero in all cases.  Sometimes, for closed sections, this is not the case.  The following equations modify these variables to ensure correct functionality.
# Shear Centres
# The following shear centre (or flexural centre) calculations are all in accordance with Roark's^5 Table 8.12, and the Handbook of Steel Construction^4 page 7.59.  Note that all coordinates are with respect to the section centroid.
# Shear centre y coordinate for a monosymmetric T section:
# Shear centre coordinates based on section type:
x_o := 0 mm
x_o = 0 mm
y_o := C_y - t_f/2 - D/(2*(1 + B_f^3*t_f/(t_w^3*(D - t_f))))
y_o = 11.9308 mm
# Section Yield Force
# The axial force in the member at yield stress is required for the following section classification, and is calculated as follows:
C_yd := f_y*A_g
C_yd = 1926.05 kN
# Net Action Effect
# The net action effect (axial Tension, axial Compression, or Flexure) is required for the section classification, and is calculated as follows:
Net_act :=
    if N_f < 0 and M_fx == 0 and M_fy == 0
        "Tens"
    also if N_f > 0 and M_fx == 0 and M_fy == 0
        "Comp"
    else
        "Flex"
Net_act = "Comp"
# The section types are listed as follows to aid in following the adjacent calculation:
#
# - Doubly symmetric I section
# - Monosymmetric T section
# - Monosymmetric channel
# - Equal/unequal leg angle
# - Square hollow section
# - Rectangular hollow section
# - Circular hollow section
# Member Slenderness for Tension and Compression
# The slenderness ratio of the member, for tension or compression actions, is checked as follows in accordance with clause 10.4.
λ_x := K_x*L_x/r_x
# Slenderness ratio about x-axis.
λ_x = 133.08
λ_y := K_y*L_y/r_y
# Slenderness ratio about y-axis.
λ_y = 65.8018
λ_max := max(λ_x, λ_y)  # Maximum member slenderness ratio.
λ_max = 133.08
# The slenderness limit is determined and checked as follows:
λ_limit :=
    if (N_f > 0 and M_fx ≠ 0 or M_fy ≠ 0) or Net_act == "Comp"
        200
    else
        300
λ_limit = 200
DesRatio_λ := λ_max/λ_limit
DesRatio_λ = 0.665399
Check_λ := if(DesRatio_λ ≤ 1, "PASS", "FAIL")
Check_λ = "PASS"
# Axial Tension Resistance
# The member tension resistance is calculated in accordance with clause 13.2(a).  No reduction in area is made for fasteners.
# Factored axial force (compression is positive, tension is negative):
N_f = 0.0001 kN
T_r := ϕ_s*min(A_g*f_y, 0.85*NSF*A_g*f_u)
T_r = 1616.56 kN
DesRatio_T := if(N_f ≥ 0, 0, -N_f/T_r)
DesRatio_T = 0
Check_T := if(DesRatio_T ≤ 1, "PASS", "FAIL")
Check_T = "PASS"
# Axial Compression Resistance
# General Notes
# The following calculations for flexural buckling resistance are in accordance with clause 13.3.1, and only applicable for doubly symmetric sections of classes 1, 2 or 3.
# Fabrication Factor
# The following parameter n_nc accounts for fabrication residual stresses and initial imperfections.
n_c := 1.34
n_c = 1.34
# Torsional or Torsional-Flexural Buckling Parameters
# The calculations within this section are all related to the torsional-flexural buckling parameters in clause 13.3.2.  These parameters are then used in the following section to determine the actual stress to be used in the slenderness reduction factor, l.
r_o := sqrt(x_o^2 + y_o^2 + r_x^2 + r_y^2)
r_o = 60.5245 mm
Ω_o := 1 - ((x_o^2 + y_o^2)/r_o^2)
Ω_o = 0.961142
f_ex_f(K_f) := π^2*E_s/(K_f*L_x/r_x)^2  # Function for stress f_ex in terms of effective length factor K.
f_ex := f_ex_f(K_x)  # Stress f_ex for actual effective length factor K_x.
f_ex = 111.456 MPa
f_exK1 := f_ex_f(1.0)  # Stress f_ex for effective length factor K_x=1.0 (required for later compression/bending resistance calculations).
f_exK1 = 111.456 MPa
f_ey_f(K_f) := π^2*E_s/(K_f*L_y/r_y)^2  # Function for stress f_ey in terms of effective length factor K.
f_ey := f_ey_f(K_y)  # Stress f_ey for actual effective length factor K_y.
f_ey = 455.883 MPa
f_eyK1 := f_ey_f(1.0)  # Stress f_ey for effective length factor K_y=1.0 (required for later compression/bending resistance calculations).
f_eyK1 = 455.883 MPa
# Function for stress f_ez in terms of effective length factor K.
f_ez_f(K_f) := (π^2*E_s*I_w/(K_f*L_z)^2 + G_s*J_t)*1/(A_g*r_o^2)
f_ez := f_ez_f(K_e)
# Stress f_ez for actual effective length factor K_e.
f_ez = 2663.16 MPa
f_ezK1 := f_ez_f(1.0)
# Stress f_ez for effective length factor K_e=1.0 (required for later compression/bending resistance calculations).
f_ezK1 = 2663.16 MPa
# For C shapes, since axe of symmetry is x axis, see Hatch Tools axes orientation, Torsional-flexural buckling is coupled about xz (fexz) and for pure flexural buckling it is about (fey).
f_eyzK1 := (f_eyK1 + f_ezK1)/(2*Ω_o)*(1 - sqrt(1 - 4*f_eyK1*f_ezK1*Ω_o/(f_eyK1 + f_ezK1)^2))
f_eyzK1 = 452.288 MPa
# Torsional-Flexural Buckling Stress Based on Section Type
# Torsional-flexural buckling stress about x-axis:
f_e_x := f_ex
f_e_x = 111.456 MPa
# The section types are listed as follows to aid in following the adjacent calculation:
#
# - Doubly symmetric I section
# - Monosymmetric T section
# - Monosymmetric channel
# - Equal/unequal leg angle
# - Square hollow section
# - Rectangular hollow section
# - Circular hollow section
# Torsional-flexural buckling stress about y-axis:
f_e_y := min(f_ey, (f_ey + f_ez)/(2*Ω_o)*(1 - sqrt(1 - 4*f_ey*f_ez*Ω_o/(f_ey + f_ez)^2)))
f_e_y = 452.288 MPa
# Torsional-flexural buckling stress about x-axis with effective length factors  K_x=K_y=K_e=1.  This is required for later compression/bending resistance calculations.
f_e_xK1 := f_exK1
f_e_xK1 = 111.456 MPa
# Torsional-flexural buckling stress about y-axis with effective length factors  K_x=K_y=K_e=1.  This is required for later compression/bending resistance calculations.
f_e_yK1 := min(f_eyK1, f_eyzK1)
f_e_yK1 = 452.288 MPa
# Slenderness Factor, λ_c
λ_cx := sqrt(f_y/f_e_x)  # Slenderness factor about x-axis.
λ_cx = 1.77207
λ_cy := sqrt(f_y/f_e_y)  # Slenderness factor about y-axis.
λ_cy = 0.879684
# Slenderness factor about x-axis with K_x=K_y=K_e=1 (required for later compression/bending resistance calculations).
λ_cxK1 := sqrt(f_y/f_e_xK1)
λ_cxK1 = 1.77207
# Slenderness factor about y-axis with K_x=K_y=K_e=1 (required for later compression/bending resistance calculations).
λ_cyK1 := sqrt(f_y/f_e_yK1)
λ_cyK1 = 0.879684
# General Notes on Class 4 Sections in Compression
# - The South African code requires that the maximum compressive stress in an element be calculated, from which reduced effective element widths are then determined depending on that compressive stress
# - When determining the class of a section in compression, if the section is subject to pure compression (no moments) then the classification is in accordance with SANS 10162_1 Table 3, whereas if the section is subject to flexural compression (compression force plus moment) the classification is in accordance with SANS 10162-1 Table 4.
# - SANS 10162-1 gives two options for determining the 'effective' element widths for class 4 sections.  The chosen method for this calculation is to reduce the width to meet the requirements of a non-slender section.
# - When calculating the effective area, firstly the reduction in element width 'b_r' required to satisfy the relevant slenderness limits is determined.  Following that, the effective area 'A_e' is calculated by subtracting the element area reductions from the gross area.  In this manner, the area of web-to-flange fillets is not affected.
# Axial Stresses in Section Elements
# The following function is required for the South African code only (see note 2 in the general notes on class 4 sections in compression).  The function determines the maximum axial compressive stress in any rectangular portion of the steel section, with the rectangular portion defined by the x limits x_c1 and x_c2, and the y limits y_c1 and y_c2.  If there is no compression in the portion, then the function returns a very small positive stress value.
f_c(x_c1, x_c2, y_c1, y_c2) :=
    f_1 ← N_f/A_g + M_fx*y_c1/I_x + M_fy*x_c1/I_y
    f_2 ← N_f/A_g + M_fx*y_c1/I_x + M_fy*x_c2/I_y
    f_3 ← N_f/A_g + M_fx*y_c2/I_x + M_fy*x_c2/I_y
    f_4 ← N_f/A_g + M_fx*y_c2/I_x + M_fy*x_c1/I_y
    f_5 ← max(f_1, f_2, f_3, f_4)
    if(f_5 > 0*MPa, f_5, 1*10^-99*MPa)
# k Factors for Element Slenderness Limits
# The following k factors apply for elements of class 4 sections in compression, in accordance with clause 13.3.3 of the South African code only.
k_c_f := 0.43  # Factor for elements supported along one longitudinal edge only (typically flanges).
k_c_w := 4.0  # Factor for elements supported along bot longitudinal edges (typically webs).
# Effective area
# The elements and their notation is as per the following diagram:
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# Element Notation for a T Section
b_rS2a := if(0.5*B_f/t_f < 0.644*sqrt(k_c_f*E_s/f_c(0*mm, -B_f/2, C_y - t_f, C_y)), 0*mm, 0.5*B_f - 200*t_f/sqrt(f_y*MPa^-1))
b_rS2a = 0 mm
b_rS2b := if(0.5*B_f/t_f < 0.644*sqrt(k_c_f*E_s/f_c(0*mm, B_f/2, C_y - t_f, C_y)), 0*mm, 0.5*B_f - 200*t_f/sqrt(f_y*MPa^-1))
b_rS2b = 0 mm
b_rS2c := if((D - t_f)/t_w < 0.644*sqrt(k_c_f*E_s/f_c(-t_w/2, t_w/2, -(D - C_y), C_y - t_f)), 0*mm, D - t_f - 340*t_w/sqrt(f_y*MPa^-1))
b_rS2c = 0 mm
A_eS2 := A_g - b_rS2a*t_f - b_rS2b*t_f - b_rS2c*t_w
A_eS2 = 5503 mm^2
# Effective Area in Compression
A_e :=
    if M_fx == 0 and M_fy == 0
        if max(Class_af, Class_aw) ≠ 4
            A_g
        if max(Class_af, Class_aw) == 4
            A_eS2
    if M_fx ≠ 0 or M_fy ≠ 0
        if max(Class_ff, Class_fw) ≠ 4
            A_g
        if max(Class_ff, Class_fw) == 4
            A_eS2
A_e = 5503 mm^2
# The section types are listed as follows to aid in following the adjacent calculation:
#
# - Doubly symmetric I section
# - Monosymmetric T section
# - Monosymmetric channel
# - Equal/unequal leg angle
# - Square hollow section
# - Rectangular hollow section
# - Circular hollow section
# Factored Axial Compression Resistance About X-Axis
C_rx := ϕ_s*A_e*f_y*(1 + λ_cx^(2*n_c))^(-1/n_c)
C_rx = 477.106 kN
DesRatio_Crx := if(N_f < 0, 0, N_f/C_rx)
DesRatio_Crx = 2.09597e-7
Check_Crx := if(DesRatio_Crx ≤ 1, "PASS", "FAIL")
Check_Crx = "PASS"
# Factored Axial Compression Resistance About Y-Axis
C_ry := ϕ_s*A_e*f_y*(1 + λ_cy^(2*n_c))^(-1/n_c)
C_ry = 1161.92 kN
DesRatio_Cry := if(N_f < 0, 0, N_f/C_ry)
DesRatio_Cry = 8.60645e-8
Check_Cry := if(DesRatio_Cry ≤ 1, "PASS", "FAIL")
Check_Cry = "PASS"
# Factored Axial Compression Resistances with Effective Length Factors Equal to 1.0
# The following axial compression resistance values are calculated with K_x=K_y=K_e=1, and are required for later compression/bending resistance calculations.
C_rxK1 := ϕ_s*A_e*f_y*(1 + λ_cxK1^(2*n_c))^(-1/n_c)
C_rxK1 = 477.106 kN
C_ryK1 := ϕ_s*A_e*f_y*(1 + λ_cyK1^(2*n_c))^(-1/n_c)
C_ryK1 = 1161.92 kN
# Bending Resistance of a Laterally Supported Member
# Plastic Moment
# The plastic moment for the section is calculated in accordance with clause 13.5(a), as follows:
M_px := Z_px*f_y
M_px = 30.135 kN*m
M_py := Z_py*f_y
M_py = 79.8 kN*m
# Yield Moment
# The yield moment for the section is calculated in accordance with clause 13.5(b), as follows:
M_yx := Z_ex*f_y
M_yx = 14.98 kN*m
M_yy := Z_ey*f_y
M_yy = 52.15 kN*m
# Reduced Moment Resistance Due to Thin Web
# For sections with class 3 flanges and a class 4 web, the moment resistance is reduced by the following factor a_w in accordance with clause 14.3.4.
# The following is a function for a_w in terms of the following variables:
# - A_w = Area of web.
# - A_f = Area of flange.
# - l_w = Web slenderness.
α_wf(A_w, A_f, λ_w) :=
    if |M_fx| == 0 or N_f < 0
        1
    else
        min(1 - 0.0005*A_w/A_f*(λ_w - 1900*sqrt(MPa)*(1 - 0.65*max(N_f, 0)/(ϕ_s*C_yd))/sqrt(|M_fx|/(ϕ_s*Z_ex))), 1)
# Moment reduction factor
α_w := α_wf((D - t_f)*t_w, B_f*t_f, (D - t_f)/t_w)
α_w = 1
# Effective Yield Stress for Class 4 Flanges
# For a beam or girder whose web meets class 3 requirements, but flanges exceed class 3 requirements, the moment resistance is calculated using an effective yield stress, rather than effective section properties.  This effective yield stress is calculated by reducing the actual yield stress by a pro-rata of the element slenderness limit to actual element slenderness.
# Effective yield stress
f_y_e := f_y*min(200/sqrt(f_y*MPa^-1)/(0.5*B_f/t_f), 1)
f_y_e = 350 MPa
# The section types are listed as follows to aid in following the adjacent calculation:
#
# - Doubly symmetric I section
# - Monosymmetric T section
# - Monosymmetric channel
# - Equal/unequal leg angle
# - Square hollow section
# - Rectangular hollow section
# - Circular hollow section
# Factored Moment Resistance About X Axis
M_rxs := ϕ_s*{
    if max(Class_ff, Class_fw) == 1 or max(Class_ff, Class_fw) == 2
        M_px
    if max(Class_ff, Class_fw) == 3
        M_yx
    if max(Class_ff, Class_fw) == 4
        if Class_ff == 4 and Class_fw == 4
            0
        if Class_ff ≠ 4 and Class_fw == 4
            α_w*M_yx
        if Class_ff == 4 and Class_fw ≠ 4
            Z_ex*f_y_e
}
M_rxs = 27.1215 kN*m
DesRatio_Mrxs := if(Class_ff == 4 and Class_fw == 4 and Net_act == "Flex", 99, |M_fx|/M_rxs)
DesRatio_Mrxs = 0
Check_Mrxs := if(DesRatio_Mrxs ≤ 1, "PASS", "FAIL")
Check_Mrxs = "PASS"
# Factored Moment Resistance About Y Axis
M_ry := ϕ_s*{
    if max(Class_ff, Class_fw) == 1 or max(Class_ff, Class_fw) == 2
        M_py
    if max(Class_ff, Class_fw) == 3
        M_yy
    if max(Class_ff, Class_fw) == 4
        if Class_ff == 4 and Class_fw == 4
            0
        else
            Z_ey*f_y_e
}
M_ry = 71.82 kN*m
DesRatio_Mry := if(Class_ff == 4 and Class_fw == 4 and Net_act == "Flex", 99, M_fy/M_ry)
DesRatio_Mry = 0
Check_Mry := if(DesRatio_Mry ≤ 1, "PASS", "FAIL")
Check_Mry = "PASS"
# Bending Resistance of a Laterally Unsupported Member
# End Moments Ratio
# The following k factor is the ratio of smaller to larger ultimate moments at the opposite ends of an unbraced length, in accordance with clause 13.6(a).
κ :=
    if max(|M_fxA|, |M_fxB|) == 0
        0
    if Curvature == 1
        -|min(|M_fxA|, |M_fxB|)/max(|M_fxA|, |M_fxB|)|
    if Curvature == 2
        |min(|M_fxA|, |M_fxB|)/max(|M_fxA|, |M_fxB|)|
κ = -1
# Moment Coefficient, w_2
# The following w_2 coefficient is used to account for increased moment resistance of a laterally unsupported beam segment when subject to a moment gradient, in accordance with clause 13.6 (ii).
ω_2 :=
    if ω_2_case == 1
        min(1.75 + 1.05*κ + 0.3*κ^2, 2.5)
    also if ω_2_case == 2
        1.0
    else
        "ERROR"
ω_2 = 1
# Critical Elastic Moment
# The critical elastic moment for an unbraced member is calculated as follows in accordance with clause 13.6(ii):
M_cr := ω_2*π/L_u*sqrt(E_s*I_y*G_s*J_t + (π*E_s/L_u)^2*I_y*I_w)
M_cr = 367.357 kN*m
# Moment Resistance of a Monosymmetric T Section
# The critical moment for lateral torsional buckling of a T section is calculated in accordance with Galambos (1998)^6, chapter 5.2.3 as follows.
I_yc :=
    if M_fx ≤ 0
        0*mm^4
    else
        1/12*t_f*B_f^3  # Moment of inertia of the flange of a T section about the y-axis (equals 0 if the stem is in compression).
I_yc = 0 mm^4
β_x := 0.9*(D - t_f/2)*(2*I_yc/I_y)*(1 - (I_y/I_x)^2)
β_x = 0 mm
B_1 := π*β_x/(2*K_e*L_z)*sqrt(E_s*I_y/(G_s*J_t))
B_1 = 0
B_2 := 0
C_b := min(1.75 + 1.05*κ + 0.3*κ^2, 2.56)
# Equivalent uniform moment factor.
C_b = 1
M_rxu := min(M_rxs, ϕ_s*π*C_b/(K_e*L_z)*(sqrt(E_s*I_y*G_s*J_t)*(B_1 + sqrt(1 + B_2 + B_1^2))))
M_rxu = 27.1215 kN*m
DesRatio_Mrxu := if(Class_ff == 4 and Class_fw == 4 and Net_act == "Flex", 99, |M_fx|/M_rxu)
DesRatio_Mrxu = 0
Check_Mrxu := if(DesRatio_Mrxu ≤ 1, "PASS", "FAIL")
Check_Mrxu = "PASS"
# Biaxial Bending Resistance
# The biaxial bending resistance is checked as follows in accordance with clause 13.6(f):
DesRatio_Mrb := if(Class_ff == 4 and Class_fw == 4 and Net_act == "Flex", 99, |M_fx|/M_rxu + M_fy/M_ry)
DesRatio_Mrb = 0
Check_Mrb := if(DesRatio_Mrb ≤ 1, "PASS", "FAIL")
Check_Mrb = "PASS"
# Axial Compression and Bending Resistance
# Equivalent Uniform Bending Coefficient, w_1
# The following ω_1 coefficient is used to determine equivalent uniform bending effect in beam-columns, in accordance with clause 13.8.5.
ω_1 :=
    if ω_1_case == 1
        max(0.6 - 0.4*κ, 0.4)
    also if ω_1_case == 2
        1.0
    also if ω_1_case == 3
        0.85
    else
        "ERROR"
ω_1 = 1
# Amplification Factors, U_1
# The following U_1 amplification factors are used to account for the second-order effects due to the deformation of a member between its ends.  These are calculated in accordance with clause 13.8.4 as follows:
C_ex := π^2*E_s*I_x/(K_x*L_x)^2
# Euler buckling strength about x-axis.
C_ex = 613.93 kN
C_ey := π^2*E_s*I_y/(K_y*L_y)^2
# Euler buckling strength about y-axis.
C_ey = 2513.73 kN
U_1x := ω_1/(1 - N_f/C_ex)
# U_1 amplification factor about x-axis.
U_1x = 1
U_1y := ω_1/(1 - N_f/C_ey)
# U_1 amplification factor about y-axis.
U_1y = 1
# Axial Compression and Bending Resistance for Sections other than Class 1 and 2 I Sections
# The following member strength checks are in accordance with clause 13.8.3.  All of the different check cases are calculated first, and then the applicable case is determined in the following section.
β_CB_a := 0.6
β_CB_a = 0.6
C_r_a := ϕ_s*A_e*f_y*1^(-1/n_c)
# Axial compression resistance with l=0.
C_r_a = 1733.44 kN
U_1x_a := max(U_1x, 1.0)
U_1x_a = 1
U_1y_a := max(U_1y, 1.0)
U_1y_a = 1
β_CB_b := min(0.6 + 0.4*λ_cy, 0.85)
β_CB_b = 0.85
C_r_b := if(M_fy == 0, C_rxK1, min(C_rxK1, C_ryK1))
C_r_b = 477.106 kN
U_1x_b := if(Mem_br == 1, U_1x, 1.0)
U_1x_b = 1
U_1y_b := if(Mem_br == 1, U_1y, 1.0)
U_1y_b = 1
β_CB_c := min(0.6 + 0.4*λ_cy, 0.85)
β_CB_c = 0.85
C_r_c := C_ry
C_r_c = 1161.92 kN
U_1x_c := if(Mem_br == 1, max(U_1x, 1.0), 1.0)
U_1x_c = 1
U_1y_c := if(Mem_br == 1, U_1y, 1.0)
U_1y_c = 1
# Cross-sectional strength for members in, in accordance with clause 13.8.3(a):
DesRatio_CB_d :=
    if N_f ≤ 0
        0
    also if Class_ff == 4 and Class_fw == 4 and Net_act == "Flex"
        99
    else
        N_f/C_r_a + U_1x_a*|M_fx|/M_rxs + U_1y_a*M_fy/M_ry
DesRatio_CB_d = 5.76886e-8
# Overall member strength in accordance with clause 13.8.3(b):
DesRatio_CB_e :=
    if N_f ≤ 0
        0
    also if Class_ff == 4 and Class_fw == 4 and Net_act == "Flex"
        99
    else
        N_f/C_r_b + U_1x_b*|M_fx|/M_rxs + U_1y_b*M_fy/M_ry
DesRatio_CB_e = 2.09597e-7
# Lateral torsional buckling strength in accordance with clause 13.8.3(c):
DesRatio_CB_f :=
    if N_f ≤ 0
        0
    also if Class_ff == 4 and Class_fw == 4 and Net_act == "Flex"
        99
    else
        N_f/C_r_c + U_1x_c*|M_fx|/M_rxu + U_1y_c*M_fy/M_ry
DesRatio_CB_f = 8.60645e-8
# Axial Compression and Bending for Actual Case
DesRatio_CB :=
    if Mem_br == 1
        max(DesRatio_CB_d, DesRatio_CB_e, DesRatio_CB_f)
    if Mem_br == 2
        max(DesRatio_CB_e, DesRatio_CB_f)
DesRatio_CB = 2.09597e-7
Check_CB := if(DesRatio_CB ≤ 1, "PASS", "FAIL")
Check_CB = "PASS"
# Axial Tension and Bending Resistance
# The following combined tension and bending resistances are calculated in accordance with clause 13.9.
DesRatio_TB_a :=
    if N_f ≥ 0 or (M_fx == 0 and M_fy == 0)
        0
    else
        -N_f/T_r + |M_fx|/M_rxs + |M_fy|/M_ry
DesRatio_TB_a = 0
DesRatio_TB_b :=
    if N_f ≥ 0 or (M_fx == 0 and M_fy == 0)
        0
    else
        if max(Class_fw, Class_ff) == 1 or max(Class_fw, Class_ff) == 2
            |M_fx|/M_rxu - (-N_f*Z_px/(M_rxu*A_g))
        if max(Class_fw, Class_ff) == 3 or max(Class_fw, Class_ff) == 4
            |M_fx|/M_rxu - (-N_f*Z_ex/(M_rxu*A_g))
DesRatio_TB_b = 0
DesRatio_TB := max(DesRatio_TB_a, DesRatio_TB_b)
DesRatio_TB = 0
Check_TB := if(DesRatio_TB ≤ 1, "PASS", "FAIL")
Check_TB = "PASS"
# Shear Resistance
# General Notes
# - The following calculations are in accordance with clause 13.4.1 and 13.4.2 as applicable.
# - These shear resistance calculations are not applicable for circular hollow sections.
# - For square and rectangular hollow sections, the web height is approximated as the depth of the section, minus 4 x the wall thickness to allow for the corner radii (same as for the compression resistance calculations).
# Geometric Parameters
S_stf = 0 mm  # Spacing of intermediate web stiffeners.
λ_stf := S_stf/(D - 2*t_f)
# Ratio of stiffener spacing to web depth.
λ_stf = 0
# Shear area of web for shear parallel to x-axis:
A_wx := B_f*t_f
A_wx = 4280.4 mm^2
# The section types are listed as follows to aid in following the adjacent calculation:
#
# - Doubly symmetric I section
# - Monosymmetric T section
# - Monosymmetric channel
# - Equal/unequal leg angle
# - Square hollow section
# - Rectangular hollow section
# - Circular hollow section
# Shear area of web for shear parallel to y-axis:
A_wy := D*t_w
A_wy = 1444.3 mm^2
# Shear Buckling Coefficient, k_v
k_vx := 5.34
k_vy := 5.34
k_vy = 5.34
# Aspect Coefficient, k_a
k_a := 1/sqrt(1 + λ_stf^2)
k_a = 1
# Ultimate Shear Strength, F_s
# Inelastic critical plate-buckling stress in shear for shear parallel to x-axis:
F_crix := 0*Pa
F_crix = 0 MPa
# Inelastic critical plate-buckling stress in shear for shear parallel to y-axis:
F_criy := 0*Pa
F_criy = 0 MPa
# Elastic critical plate-buckling stress in shear for shear parallel to x-axis:
F_crex := 0*Pa
F_crex = 0 MPa
# Elastic critical plate-buckling stress in shear for shear parallel to y-axis:
F_crey := 0*Pa
F_crey = 0 MPa
# Ultimate shear strength for shear parallel to x-axis:
F_sx := f_y
F_sx = 350 MPa
# Ultimate shear strength for shear parallel to y-axis:
F_sy := f_y
F_sy = 350 MPa
# Shear Resistance, V_r
# Factored shear resistance for shear parallel to x-axis:
V_rx := ϕ_s*A_wx*F_sx*0.66
V_rx = 889.895 kN
DesRatio_Vrx := V_fx/V_rx
DesRatio_Vrx = 0
Check_Vrx := if(DesRatio_Vrx ≤ 1, "PASS", "FAIL")
Check_Vrx = "PASS"
# Factored shear resistance for shear parallel to y-axis:
V_ry := ϕ_s*A_wy*F_sy*0.66
V_ry = 300.27 kN
DesRatio_Vry := V_fy/V_ry
DesRatio_Vry = 0
Check_Vry := if(DesRatio_Vry ≤ 1, "PASS", "FAIL")
Check_Vry = "PASS"
# Summary of results
# Section Classifications
# Axial Compression
λ_max = 133.08
# Maximum member slenderness:
# Net Action
# The net action on the member (Tension / Compression / Flexure) is:
Net_act = "Comp"
# Member Resistances
# Axial tension resistance:
T_r = 1616.56 kN
# Axial compression resistance about x-axis:
C_rx = 477.106 kN
# Axial compression resistance about y-axis:
C_ry = 1161.92 kN
# Moment resistance about x-axis for a laterally supported member:
M_rxs = 27.1215 kN*m
# Moment resistance about x-axis for a laterally unsupported member:
M_rxu = 27.1215 kN*m
FailureMechs := [
    "Member slenderness for tension or compression", Check_λ, DesRatio_λ;
    "Axial tension resistance", Check_T, DesRatio_T;
    "Axial compression resistance about x-axis", Check_Crx, DesRatio_Crx;
    "Axial compression resistance about y-axis", Check_Cry, DesRatio_Cry;
    "Moment resistance about x-axis - Laterally supported member", Check_Mrxs, DesRatio_Mrxs;
    "Moment resistance about y-axis", Check_Mry, DesRatio_Mry;
    "Moment resistance about x-axis - Laterally unsupported member", Check_Mrxu, DesRatio_Mrxu;
    "Biaxial bending resistance", Check_Mrb, DesRatio_Mrb;
    "Combined axial compression and bending resistance", Check_CB, DesRatio_CB;
    "Combined axial tension and bending resistance", Check_TB, DesRatio_TB;
    "Shear resistance for loads parallel to x-axis", Check_Vrx, DesRatio_Vrx;
    "Shear resistance for loads parallel to y-axis", Check_Vry, DesRatio_Vry
]
# Moment resistance about y-axis:
M_ry = 71.82 kN*m
# Shear resistance for loads parallel to x-axis:
V_rx = 889.895 kN
# Shear resistance for loads parallel to y-axis:
V_ry = 300.27 kN
# Summary of Failure Mechanisms
# The following matrix provides a summary of all failure mechanisms:
FailureMechs = [
    "Member slenderness for tension or compression", "PASS", 0.665399;
    "Axial tension resistance", "PASS", 0;
    "Axial compression resistance about x-axis", "PASS", 2.09597e-7;
    "Axial compression resistance about y-axis", "PASS", 8.60645e-8;
    "Moment resistance about x-axis - Laterally supported member", "PASS", 0;
    "Moment resistance about y-axis", "PASS", 0;
    "Moment resistance about x-axis - Laterally unsupported member", "PASS", 0;
    "Biaxial bending resistance", "PASS", 0;
    "Combined axial compression and bending resistance", "PASS", 2.09597e-7;
    "Combined axial tension and bending resistance", "PASS", 0;
    "Shear resistance for loads parallel to x-axis", "PASS", 0;
    "Shear resistance for loads parallel to y-axis", "PASS", 0
]
MaxDesRatio := max(FailureMechs[:, 2])
OverallCheck := if(MaxDesRatio ≤ 1, "PASS", "FAIL")
# Details of the critical failure mechanism are as follows:
MaxDesRatio = 0.665399
CritIndex := trunc(|match(MaxDesRatio, FailureMechs[:, 2])[0]|)
OverallCheck = "PASS"
CritFailureMech := FailureMechs[CritIndex, 0]
CritFailureMech = "Member slenderness for tension or compression"
