# Title: HatchTools standard calculation
## Member Reference
# Notes to user:
# - Items highlighted yellow are for user input.  Items highlighted green are intermediate or final results.
# - The right side of the worksheet can be used as a scratch area for calculations that do not get printed.
# -The use of this standard calculation does not imply good engineering practice. A thorough understanding of the topic is necessary and any results shall only be utilized after careful review.
Member_Description := ""
Strand7_Member_ID := ""
Load_Case_Combination_ID := ""
## General notes / assumptions
# All references to clause and table numbers refer to SANS 10162 - 1.
# Some section property calculations do not take into account flange-to-web fillets.
# This calculation applies to: Singly Symmetric C sections
## References
# SANS 10162-1:2011, The structural use of steel, Part 1: Limit-state design of hot-rolled steelwork.
# Southern African Steel Construction Handbook (Red Book)
## Input data
## Section properties
h := 0*mm
I_y := 0*mm^4
a_c := 0*mm
b := 0*mm
Z_ey := 0*mm^3
t_w := 0*mm
Z_py := 0*mm^3
t_f := 0*mm
r_y := 0*mm
I_x := 0*mm^4
J_t := 0*mm^4
Z_ex := 0*mm^3
C_w := 0*mm^6
Z_px := 0*mm^3
r_x := 0*mm
A_g := 0*mm^2
# Fabrication factor
# The following parameter n_c accounts for fabrication residual stresses and initial imperfections. See SANS 10162-1 Clause 13.3.1.
n_c := 1.34
## Ultimate actions and loading conditions
C_u := 0*kN  # Axial compressive force.
## Material properties
G_s := 0*MPa  # Shear modulus of steel.
E_s := 0*MPa  # Elastic modulus of steel.
f_y := 0*MPa  # Yield strength of steel.
f_u := 0*MPa  # Tensile strength of steel.
ϕ_s := 0  # Resistance factor for structural steel.
## Effective lengths
## Member length
L_x := 0*mm  # Unsupported length with respect to x-axis.
L_y := 0*mm  # Unsupported length with respect to y-axis.
L_z := 0*mm  # Length for torsional buckling of element.
## Compression effective length factors
K_x := 0  # Effective length factor for buckling about x-axis.
K_y := 0  # Effective length factor for buckling about y-axis.
K_z := 0  # Effective lenght factor for torsional buckling
## Section Classification
Class_web := 0  # Web classification.
Class_flange := 0  # Flange classification.
# [area: >]
## Detailed calculations
## Member slenderness for compression
# The slenderness ratio of the member, for compression actions, is checked as follows in accordance with clause 10.4.
λ_x := K_x*L_x/r_x
# Slenderness ratio about x-axis.
λ_x = 0
λ_y := K_y*L_y/r_y
# Slenderness ratio about y-axis.
λ_y = 0
λ_max := max(λ_x, λ_y)
# Maximum member slenderness ratio.
λ_max = 0
# The slenderness limit is determined and checked as follows:
λ_limit := 200
DesRatio_λ := λ_max/λ_limit
DesRatio_λ = 0
Check_λ := if(DesRatio_λ ≤ 1, "PASS", "FAIL")
Check_λ = "PASS"
## Maximum web slenderness
# The web slenderness is checked in accordance with clause 14.3.1, as follows.
λ_web := (h - 2*t_f)/t_w  # Actual web slenderness.
λ_web = 0
λ_w_limit := 83000/(f_y*MPa^-1)  # error: Divide by zero.  # Web slenderness limit.
λ_w_limit =  # error: This variable is undefined.
DesRatio_λw := λ_web/λ_w_limit
DesRatio_λw =  # error
Check_λw := if(DesRatio_λw ≤ 1, "PASS", "FAIL")
Check_λ = "PASS"
## Axial compression resistance
## Torsional or torsional-flexural buckling parameters
# The calculations within this section are all related to the torsional-flexural buckling parameters in clause 13.3.2.  These parameters are then used in the following section to determine the actual stress to be used in the slenderness reduction factor, λ.
x_o := a_c
# Principal coordinates of shear centre parallel to x axis.
x_o = 0 mm
r_o := sqrt(x_o^2 + r_x^2 + r_y^2)
r_o = 0 mm
Ω_o := 1 - (x_o^2/r_o^2)
Ω_o = 1
f_ex := π^2*E_s/(K_x*L_x/r_x)^2
# Stress f_ex for actual effective length factor K_x.
f_ex = 0 MPa
# Stress f_ey for actual effective length factor K_y.
f_ey =  # error
f_ey := π^2*E_s/(K_y*L_y/r_y)^2
f_ez := (π^2*E_s*C_w/(K_z*L_z)^2 + G_s*J_t)*1/(A_g*r_o^2)  # error: Divide by zero.
f_ez =  # error
f_exz := (f_ex + f_ez)/(2*Ω_o)*(1 - sqrt(1 - 4*f_ex*f_ez*Ω_o/(f_ex + f_ez)^2))
f_exz =  # error
## Slenderness factor, λ_c
λ_cy =  # error
λ_cy := sqrt(f_y/f_ey)  # Slenderness factor about y-axis.
# Slenderness factor about equivalent-axis.
λ_cxz =  # error
λ_cxz := sqrt(f_y/f_exz)
## General notes on class 4 sections in compression
# The South African code gives two options for determining the 'effective' element widths for class 4 sections. The chosen method for this calculation is to reduce the width to meet the requirements of a non-slender section.
# When calculating the effective areas for the South African code, firstly the reduction in element width 'b' required to satisfy the relevant slenderness limits is determined. Following that, the effective area 'A_e' is calculated by subtracting the element area reductions from the gross area. In this manner, the area of web-to-flange fillets is not affected.
## Effective area
# The element and its notation is as per the following diagram:
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# Element notation for a C section
b_a_c := if(Class_flange < 4, 0, b - 200*t_f/sqrt(f_y*MPa^-1))
b_a_c = 0 mm
b_b := if(Class_web < 4, 0, h - 2*t_f - 670*t_w/sqrt(f_y*MPa^-1))
b_b = 0 mm
A_eS := A_g - 2*b_a_c*t_f - b_b*t_w
A_eS = 0 mm^2
## Effective area in compression
A_e := min(A_eS, A_g)
A_e = 0 mm^2
A_e.ratio := A_e/A_g  # Fraction of gross area
A_e.ratio = 0
## Factored axial compression resistance about y-axis
C_ry := ϕ_s*A_e*f_y*(1 + λ_cy^(2*n_c))^(-n_c^-1)
C_ry = 0 kN
DesRatio_Cry := C_u/C_ry
DesRatio_Cry = 0
Check_Cry := if(DesRatio_Cry ≤ 1, "PASS", "FAIL")
Check_Cry = "PASS"
## Factored axial compression resistance about equivalent axis
C_rxz := ϕ_s*A_e*f_y*(1 + λ_cxz^(2*n_c))^(-n_c^-1)
C_rxz =  # error
DesRatio_Crz := C_u/C_rxz
DesRatio_Crxz =  # error
Check_Crcz := if(DesRatio_Crxz ≤ 1, "PASS", "FAIL")
Check_Crxz =  # error
## Summary of results
## Member resistances
# Axial compression resistance about y-axis:
C_ry = 0 kN
# Axial compression resistance about equivalent axis:
C_rxz =  # error
FailureMechs := [
    "Member slenderness for compression", Check_λ, DesRatio_λ;
    "Web slenderness for beams and girders", Check_λw, DesRatio_λw;
    "Axial compression resistance about y-axis", Check_Cry, DesRatio_Cry;
    "Axial compression resistance about xz-axis", Check_Crxz, DesRatio_Crxz
]
## Summary of failure mechanisms
# The following matrix provides a summary of all failure mechanisms:
FailureMechs =  # error
# Details of the critical failure mechanism are as follows:
MaxDesRatio := max(FailureMechs[:, 2])
MaxDesRatio =  # error
OverallCheck := if(MaxDesRatio ≤ 1, "PASS", "FAIL")
OverallCheck =  # error
CritIndex := trunc(|match(MaxDesRatio, FailureMechs[:, 2])[0]|)
CritFailureMech =  # error
CritFailureMech := FailureMechs[CritIndex, 0]
