# Title: HatchTools standard calculation
## Member Reference
# Notes to user:
# - Items highlighted yellow are for user input.  Items highlighted green are intermediate or final results.
# - The right side of the worksheet can be used as a scratch area for calculations that do not get printed.
# -The use of this standard calculation does not imply good engineering practice. A thorough understanding of the topic is necessary and any results shall only be utilized after careful review.
Member_Description := ""
Strand7_Member_ID := ""
Load_Case_Combination_ID := ""
## General notes / assumptions
# All references to clause and table numbers refer to SANS 10162 - 1.
# The following calculations for flexural buckling resistance are in accordance with Clause 13.3.1^1
# No provision is made for 'Class 4' sections in this calculation.
# Some section property calculations do not take into account flange-to-web fillets.
# This calculation applies to: Singly Symmetric C sections
## References
# SANS 10162-1:2011, The structural use of steel, Part 1: Limit-state design of hot-rolled steelwork.
# Southern African Steel Constructiion Handbook (Red Book)
## Input data
## Section properties
h := 0*mm
I_y := 0*mm^4
a_c := 0*mm
b := 0*mm
Z_ey := 0*mm^3
t_w := 0*mm
t_f := 0*mm
Z_py := 0*mm^3
r_y := 0*mm
I_x := 0*mm^4
J_t := 0*mm^4
Z_ex := 0*mm^3
C_w := 0*mm^6
Z_px := 0*mm^3
r_x := 0*mm
A_g := 0*mm^2
# Fabrication factor
# The following parameter n_c accounts for fabrication residual stresses and initial imperfections. See SANS 10162-1 Clause 13.3.1.
n_c := 1.34
## Ultimate actions and loading conditions
## Actions at the section of beam of concern
C_u := 0*kN  # Compressive force.
M_ux := 0*kN*m  # Moment about the x-axis.
M_uy := 0*kN*m  # Moment about the y-axis.
V_ux := 0*kN  # Shear force parallel to x-axis.
V_uy := 0*kN  # Shear force parallel to y-axis.
## Material properties
G_s := 0*MPa  # Shear modulus of steel.
E_s := 0*MPa  # Elastic modulus of steel.
f_y := 0*MPa  # Yield strength of steel.
f_u := 0*MPa  # Tensile strength of steel.
ϕ_s := 0  # Resistance factor for structural steel.
## Effective lengths
## Member length
L_x := 0*mm  # Unsupported lenght with respect to x-axis.
L_y := 0*mm  # Unsupported lenght with respect to y-axis.
L_e := 0*mm  # Length of unbraced portion of element.
L_z := 0*mm  # Length for torsional buckling of element.
## Effective length factors
K_x := 0  # Effective length factor for buckling about x-axis.
K_y := 0  # Effective length factor for buckling about y-axis.
K_e := 0  # Effective length factor for unbraced portion of element.
K_z := 0  # Effective length factor for torsional buckling
## Member bracing arrangement
Mem_br := 0
# Member in braced frame.
# Member in unbraced frame.
## Design Coefficients
ω_2 := 0  # Coefficient to account for increased moment resistance of a laterally unsupported beam segment when subject to a moment gradient.
ω_1 := 0  # Coefficient used to determine equivalent uniform bending effects in beam-columns.
## Section Classification
Class_web := 0  # Web classification.
Class_flange := 0  # Flange classification.
Class_sec := max(Class_web, Class_flange)  # Section classification.
Class_sec = 0
## Detailed calculations
## Compressive Resistance:
## Member slenderness for compression
# The slenderness ratio of the member, for compression actions, is checked as follows in accordance with clause 10.4.
λ_x := K_x*L_x/r_x
# Slenderness ratio about x-axis.
λ_x = 0
λ_y := K_y*L_y/r_y
# Slenderness ratio about y-axis.
λ_y = 0
λ_max := max(λ_x, λ_y)
# Maximum member slenderness ratio.
λ_max = 0
# The slenderness limit is determined and checked as follows:
λ_limit := 200
DesRatio_λ := λ_max/λ_limit
DesRatio_λ = 0
Check_λ := if(DesRatio_λ ≤ 1, "PASS", "FAIL")
Check_λ = "PASS"
## Maximum web slenderness
# The web slenderness is checked in accordance with clause 14.3.1, as follows.
λ_web := (h - 2*t_f)/t_w  # Actual web slenderness.
λ_web = 0
λ_w_limit := 83000/(f_y*MPa^-1)  # error: Divide by zero.  # Web slenderness limit.
λ_w_limit =  # error: This variable is undefined.
DesRatio_λw := λ_web/λ_w_limit
DesRatio_λw =  # error
Check_λw := if(DesRatio_λw ≤ 1, "PASS", "FAIL")
Check_λw =  # error
## Axial compression resistance
## Torsional or torsional-flexural buckling parameters
# The calculations within this section are all related to the torsional-flexural buckling parameters in clause 13.3.2.  These parameters are then used in the following section to determine the actual stress to be used in the slenderness reduction factor, l.
x_o := a_c
# Principal coordinates of shear centre parallel to x axis.
x_o = 0 mm
r_o := sqrt(x_o^2 + r_x^2 + r_y^2)
Ω_o := 1 - (x_o^2/r_o^2)
Ω_o = 1
f_ex := π^2*E_s/(K_x*L_x/r_x)^2
# Stress f_ex for actual effective length factor K_x.
f_ex = 0 MPa
f_ey := π^2*E_s/(K_y*L_y/r_y)^2
# Stress f_ey for actual effective length factor K_y.
f_ey = 0 MPa
f_ez := (π^2*E_s*C_w/(K_z*L_z)^2 + G_s*J_t)*1/(A_g*r_o^2)  # error: Divide by zero.
f_ez =  # error
f_exz := (f_ex + f_ez)/(2*Ω_o)*(1 - sqrt(1 - 4*f_ex*f_ez*Ω_o/(f_ex + f_ez)^2))
f_exz =  # error
## Slenderness factor, λ_c
λ_cx := sqrt(f_y/f_ex)  # Slenderness factor about y-axis.
λ_cy =  # error
λ_cy := sqrt(f_y/f_ey)  # Slenderness factor about y-axis.
λ_cy = 0
λ_cxz := sqrt(f_y/f_exz)
# Slenderness factor about torsional axis.
λ_cz =  # error
## Factored axial compression resistance about x-axis
C_rx := ϕ_s*A_g*f_y*(1 + λ_cx^(2*n_c))^(-n_c^-1)
C_rx = 0 kN
DesRatio_Crx := C_u/C_rx
DesRatio_Crx = 0
Check_Crx := if(DesRatio_Crx ≤ 1, "PASS", "FAIL")
Check_Crx = "PASS"
## Factored axial compression resistance about y-axis
C_ry := ϕ_s*A_g*f_y*(1 + λ_cy^(2*n_c))^(-n_c^-1)
C_ry = 0 kN
DesRatio_Cry := C_u/C_ry
DesRatio_Cry = 0
Check_Cry := if(DesRatio_Cry ≤ 1, "PASS", "FAIL")
Check_Cry = "PASS"
## Factored axial compression resistance about equivalent axis
C_rxz := ϕ_s*A_g*f_y*(1 + λ_cxz^(2*n_c))^(-n_c^-1)
C_rxz =  # error
DesRatio_Crz := C_u/C_rxz
DesRatio_Crxz =  # error
Check_Crz := if(DesRatio_Crxz ≤ 1, "PASS", "FAIL")
Check_Crxz =  # error
## Bending Resistance:
## Bending resistance of a laterally supported member
# Clause 13.5
## Plastic moment
# The plastic moment for the section is calculated in accordance with clause 13.5(a), as follows:
M_px := Z_px*f_y
M_px = 0 kN*m
M_py := Z_py*f_y
M_py = 0 kN*m
## Yield moment
# The yield moment for the section is calculated in accordance with clause 13.5(b), as follows:
M_yx := Z_ex*f_y
M_yx = 0 kN*m
M_yy := Z_ey*f_y
M_yy = 0 kN*m
## Factored moment resistance about x axis
M_rxs := ϕ_s*{
    M_px if Class_sec == 1 or Class_sec == 2
    M_yx if Class_sec == 3
}
M_rxs = [NaN] kN*m
DesRatio_Mrxs := M_ux/M_rxs  # error: This matrix is singular. Cannot compute its inverse.
DesRatio_Mrxs =  # error
Check_Mrxs := if(DesRatio_Mrxs ≤ 1, "PASS", "FAIL")
Check_Mrxs =  # error
## Factored moment resistance about y axis
M_ry := ϕ_s*{
    M_py if Class_sec == 1 or Class_sec == 2
    M_yy if Class_sec == 3
}
M_ry = [NaN] kN*m
DesRatio_Mry := M_uy/M_ry  # error: This matrix is singular. Cannot compute its inverse.
DesRatio_Mry =  # error
Check_Mry := if(DesRatio_Mry ≤ 1, "PASS", "FAIL")
Check_Mry =  # error
## Bending resistance of a laterally unsupported member
# Clause 13.6
## Critical elastic moment
# The critical elastic moment for an unbraced member is calculated as follows in accordance with clause 13.6(ii):
M_cr := ω_2*π/(K_e*L_e)*sqrt(E_s*I_y*G_s*J_t + (π*E_s/(K_e*L_e))^2*I_y*C_w)
M_cr = 0 kN*m
## Moment resistance of singly symmetric class 1 and 2 sections
# The following moment resistance calculations are in accordance with clause 13.6(a).
M_rx_a :=
    1.15*ϕ_s*M_px*(1 - 0.28*M_px/M_cr) if M_cr > 0.67*M_px
    ϕ_s*M_cr if M_cr ≤ 0.67*M_px
M_rx_a = 0 kN*m
## Moment resistance of doubly symmetric class 3 sections
# The following moment resistance calculations are in accordance with clause 13.6(b).
M_rx_b :=
    min(1.15*ϕ_s*M_yx*(1 - 0.28*M_yx/M_cr), ϕ_s*M_yx) if M_cr > 0.67*M_yx
    ϕ_s*M_cr if M_cr ≤ 0.67*M_yx
M_rx_b = 0 kN*m
## Moment resistance based on section class
M_rxu := min(M_rxs, {
    M_rx_a if Class_sec == 1 or Class_sec == 2
    M_rx_b if Class_sec == 3
})
M_rxu = 0 kN*m
DesRatio_Mrxu := M_ux/M_rxu
DesRatio_Mrxu = 0
Check_Mrxu := if(DesRatio_Mrxu ≤ 1, "PASS", "FAIL")
Check_Mrxu = "PASS"
## Biaxial bending resistance
# The biaxial bending resistance is checked as follows in accordance with clause 13.6(f):
DesRatio_Mrb := M_ux/M_rxu + M_uy/M_ry  # error: This matrix is singular. Cannot compute its inverse.
DesRatio_Mrb =  # error
Check_Mrb := if(DesRatio_Mrb ≤ 1, "PASS", "FAIL")
Check_Mrb =  # error
## Shear resistance of members with two flanges
# Clause 13.4.1
## Geometric parameters
# Shear area of web for shear parallel to x-axis:
A_wx := 2*b*t_f
A_wx = 0 mm^2
# Shear area of web for shear parallel to y-axis:
A_wy := h*t_w
A_wy = 0 mm^2
# Aspect ratio of web for shear parallel to y-axis:
λ_wy := (h - 2*t_f)/t_w
λ_wy = 0
## Shear buckling coefficient, k_v
k_vy := 5.34
## Aspect coefficient, k_a
k_a := 0
## Ultimate shear strength, F_s (13.4.1.1)
# Inelastic critical plate-buckling stress in shear for shear parallel to y-axis (13.4.1.1 (b)):
F_criy := 290*sqrt(f_y*MPa*k_vy)/λ_wy
F_criy = 0 MPa
# Elastic critical plate-buckling stress in shear for shear parallel to y-axis (13.4.1.1 (d)):
F_crey := 180000*k_vy*MPa/λ_wy^2  # error: Divide by zero.
F_crey =  # error
# Ultimate shear strength for shear parallel to x-axis:
F_sx := f_y
F_sx = 0 MPa
# Ultimate shear strength for shear parallel to y-axis:
F_sy :=
    0.66*f_y if λ_wy ≤ 440*sqrt(k_vy/(f_y*MPa^-1))
    F_criy if 440*sqrt(k_vy/(f_y*MPa^-1)) < λ_wy ≤ 500*sqrt(k_vy/(f_y*MPa^-1))
    F_criy + k_a*(0.5*f_y - 0.866*F_criy) if 500*sqrt(k_vy/(f_y*MPa^-1)) < λ_wy ≤ 620*sqrt(k_vy/(f_y*MPa^-1))
    F_crey + k_a*(0.5*f_y - 0.866*F_crey) if λ_wy > 620*sqrt(k_vy/(f_y*MPa^-1))
F_sy =  # error
## Shear resistance, V_r
# Factored shear resistance for shear parallel to x-axis:
V_rx := ϕ_s*A_wx*F_sx*0.66
V_rx = 0 kN
DesRatio_Vrx := V_ux/V_rx
DesRatio_Vrx = 0
Check_Vrx := if(DesRatio_Vrx ≤ 1, "PASS", "FAIL")
Check_Vrx = "PASS"
# Factored shear resistance for shear parallel to y-axis:
V_ry := ϕ_s*A_wy*F_sy*1
V_ry =  # error
DesRatio_Vry := V_uy/V_ry
DesRatio_Vry =  # error
Check_Vry := if(DesRatio_Vry ≤ 1, "PASS", "FAIL")
Check_Vry =  # error
## Combined shear and moment resistance
# The following check of combined shear and moment resistances is in accordance with clause 14.6 and only applicable for I sections, for bending about the x-axis and shear parallel to the y-axis.
DesRatio_VM := 0.727*M_ux/min(M_rxs, M_rxu) + 0.455*V_uy/V_ry
DesRatio_VM =  # error
Check_VM := if(DesRatio_VM ≤ 1, "PASS", "FAIL")
Check_VM =  # error
## Axial compression and bending resistance
## Amplification factors, U_1
# The following U_1 amplification factors are used to account for the second-order effects due to the deformation of a member between its ends. These are calculated in accordance with clause 13.8.4 as follows:
C_ex := π^2*E_s*I_x/(K_x*L_x)^2  # Euler buckling strength about x-axis.
C_ex = 0 kN
C_ey := π^2*E_s*I_y/(K_y*L_y)^2  # Euler buckling strength about y-axis.
C_ey = 0 kN
U_1x := ω_1/(1 - C_u/C_ex)  # U_1 amplification factor about x-axis.
U_1x = 0
U_1y := ω_1/(1 - C_u/C_ey)  # U_1 amplification factor about y-axis.
U_1y = 0
## Axial compression and bending resistance for sections other than class 1 and 2 I sections
# The following member strength checks are in accordance with clause 13.8.3.
# Cross-sectional strength for C sections, that are part of braced frames only, in accordance with clause 13.8.3(a):
C_r_a := ϕ_s*A_g*f_y*1^(-n_c^-1)
# Axial compression resistance with λ=0.
C_r_a = 0 kN
U_1x_a := max(U_1x, 1)
U_1x_a = 1
U_1y_a := max(U_1y, 1)
U_1y_a = 1
DesRatio_CB_a := C_u/C_r_a + U_1x_a*M_ux/M_rxs + U_1y_a*M_uy/M_ry  # error: This matrix is singular. Cannot compute its inverse.
DesRatio_CB_a =  # error
# Overall member strength in accordance with clause 13.8.3(b):
# The following axial compression resistance values are calculated with K_x=K_y=K_e=1, and are required for later compression/bending resistance calculations.
C_rxK1 := ϕ_s*A_g*f_y*(1 + λ_c1x^(2*n_c))^(-n_c^-1)
C_rxK1 =  # error
C_ryK1 =  # error
C_ryK1 := ϕ_s*A_g*f_y*(1 + λ_c1y^(2*n_c))^(-n_c^-1)
C_r_b := if(M_uy == 0, C_rxK1, min(C_rxK1, C_ryK1))
C_r_b =  # error
U_1x_b := if(Mem_br == 1, U_1x, 1.0)
U_1x_b = 1
U_1y_b := if(Mem_br == 1, U_1y, 1.0)
U_1y_b = 1
DesRatio_CB_b := C_u/C_r_b + U_1x_b*M_ux/M_rxs + U_1y_b*M_uy/M_ry
DesRatio_CB_b =  # error
# Lateral torsional buckling strength in accordance with clause 13.8.3(c):
C_r_c := C_ry
C_r_c = 0 kN
U_1x_c := if(Mem_br == 1, max(U_1x, 1.0), 1.0)
U_1x_c = 1
U_1y_c := if(Mem_br == 1, U_1y, 1.0)
U_1y_c = 1
DesRatio_CB_c := C_u/C_r_c + U_1x_c*M_ux/M_rxu + U_1y_c*M_uy/M_ry  # error: This matrix is singular. Cannot compute its inverse.
DesRatio_CB_c =  # error
## Axial compression and bending for actual case
DesRatio_CB :=
    max(DesRatio_CB_a, DesRatio_CB_b, DesRatio_CB_c) if Mem_br == 1
    max(DesRatio_CB_b, DesRatio_CB_c) if Mem_br == 2
DesRatio_CB =  # error
Check_CB := if(DesRatio_CB ≤ 1, "PASS", "FAIL")
Check_CB =  # error
## Summary of results
## Member resistances
# Axial compression resistance about x-axis:
C_rx = 0 kN
# Axial compression resistance about y-axis:
C_ry = 0 kN
# Axial compression resistance about equivalent axis:
C_rxz =  # error
# Moment resistance about x-axis for a laterally supported member:
M_rxs = [NaN] kN*m
# Moment resistance about x-axis for a laterally unsupported member:
M_rxu = 0 kN*m
# Moment resistance about y-axis:
M_ry = [NaN] kN*m
# Shear resistance for loads parallel to x-axis:
V_rx = 0 kN
# Shear resistance for loads parallel to y-axis:
V_ry =  # error
## Summary of failure mechanisms
# The following matrix provides a summary of all failure mechanisms:
FailureMechs := [
    "Member slenderness for compression", Check_λ, DesRatio_λ;
    "Web slenderness for beams and girders", Check_λw, DesRatio_λ;
    "DELETE", Check_Crx, DesRatio_Crx;
    "Axial compression resistance about y-axis", Check_Cry, DesRatio_Cry;
    "Axial compression resistance about z-axis", Check_Crz, DesRatio_Crz;
    "Moment resistance about x-axis - Laterally supported member", Check_Mrxs, DesRatio_Mrxs;
    "Moment resistance about x-axis - Laterally unsupported member", Check_Mrxu, DesRatio_Mrxu;
    "Moment resistance about y-axis", Check_Mry, DesRatio_Mry;
    "Biaxial bending resistance", Check_Mrb, DesRatio_Mrb;
    "Combined axial compression and bending resistance", Check_CB, DesRatio_CB;
    "Shear resistance for loads parallel to x-axis", Check_Vrx, DesRatio_Vrx;
    "Shear resistance for loads parallel to y-axis", Check_Vry, DesRatio_Vry;
    "Combined shear and moment resistance", Check_VM, DesRatio_VM
]
FailureMechs =  # error
MaxDesRatio := max(FailureMechs[:, 2])
OverallCheck := if(MaxDesRatio ≤ 1, "PASS", "FAIL")
CritIndex := trunc(|match(MaxDesRatio, FailureMechs[:, 2])[0]|)
# Details of the critical failure mechanism are as follows:
MaxDesRatio =  # error
CritFailureMech := FailureMechs[CritIndex, 0]
OverallCheck =  # error
CritFailureMech =  # error
