# Title: HatchTools standard calculation
## Member Reference
# Notes to user:
# - Items highlighted yellow are for user input.  Items highlighted green are intermediate or final results.
# - The right side of the worksheet can be used as a scratch area for calculations that do not get printed.
# -The use of this standard calculation does not imply good engineering practice. A thorough understanding of the topic is necessary and any results shall only be utilized after careful review.
Member_Description := ""
Strand7_Member_ID := ""
Load_Case_Combination_ID := ""
## General notes / assumptions
# All references to clause and table numbers refer to SANS 10162 - 1.
# Some section property calculations do not take into account flange-to-web fillets.
# This calculation applies to: Doubly Symmetric I and H sections
## References
# SANS 10162-1:2011, The structural use of steel, Part 1: Limit-state design of hot-rolled steelwork.
# Southern African Steel Construction Handbook (Red Book)
## Input data
## Section properties
h := 0*mm
I_y := 0*mm^4
b := 0*mm
Z_ey := 0*mm^3
t_w := 0*mm
t_f := 0*mm
Z_py := 0*mm^3
r_y := 0*mm
I_x := 0*mm^4
J_t := 0*mm^4
Z_ex := 0*mm^3
C_w := 0*mm^6
Z_px := 0*mm^3
r_x := 0*mm
A_g := 0*mm^2
# Fabrication factor
# The following parameter n_c accounts for fabrication residual stresses and initial imperfections. See SANS 10162-1 Clause 13.3.1.
n_c := 1.34
## Ultimate actions and loading conditions
C_u := 0*kN  # Axial compressive force.
## Material properties
G_s := 0*MPa  # Shear modulus of steel.
E_s := 0*MPa  # Elastic modulus of steel.
f_y := 0*MPa  # Yield strength of steel.
f_u := 0*MPa  # Tensile strength of steel.
ϕ_s := 0  # Resistance factor for structural steel.
## Effective lengths
## Member length
L_x := 0*mm  # Unsupported length with respect to x-axis.
L_y := 0*mm  # Unsupported length with respect to y-axis.
L_z := 0*mm  # Length for torsional buckling of element.
## Compression effective length factors
K_x := 0  # Effective length factor for buckling about x-axis.
K_y := 0  # Effective length factor for buckling about y-axis.
K_z := 0  # Effective lenght factor for torsional buckling
## Section Classification
Class_web := 0  # Web classification.
Class_flange := 0  # Flange classification.
# [area: >]
## Detailed calculations
## Member slenderness for compression
# The slenderness ratio of the member, for compression actions, is checked as follows in accordance with clause 10.4.
λ_x := K_x*L_x/r_x
# Slenderness ratio about x-axis.
λ_x = 0
λ_y := K_y*L_y/r_y
# Slenderness ratio about y-axis.
λ_y = 0
λ_max := max(λ_x, λ_y)
# Maximum member slenderness ratio.
λ_max = 0
# The slenderness limit is determined and checked as follows:
λ_limit := 200
DesRatio_λ := λ_max/λ_limit
DesRatio_λ = 0
Check_λ := if(DesRatio_λ ≤ 1, "PASS", "FAIL")
Check_λ = "PASS"
## Maximum web slenderness
# The web slenderness is checked in accordance with clause 14.3.1, as follows.
λ_web := (h - 2*t_f)/t_w  # Actual web slenderness.
λ_web = 0
λ_w_limit := 83000/(f_y*MPa^-1)  # error: Divide by zero.  # Web slenderness limit.
λ_w_limit =  # error: This variable is undefined.
DesRatio_λw := λ_web/λ_w_limit
DesRatio_λw =  # error
Check_λw := if(DesRatio_λw ≤ 1, "PASS", "FAIL")
Check_λ = "PASS"
## Axial compression resistance
## Torsional or torsional-flexural buckling parameters
# The calculations within this section are all related to the torsional-flexural buckling parameters in clause 13.3.2.  These parameters are then used in the following section to determine the actual stress to be used in the slenderness reduction factor, l.
f_ex := π^2*E_s/(K_x*L_x/r_x)^2
# Stress f_ex for actual effective length factor K_x.
f_ex = 0 MPa
f_ey := π^2*E_s/(K_y*L_y/r_y)^2
# Stress f_ey for actual effective length factor K_y.
f_ey = 0 MPa
r_o := sqrt(r_x^2 + r_y^2)
# Radius of gyration relative to shear centre.
r_o = 0 mm
f_ez := (π^2*E_s*C_w/(K_z*L_z)^2 + G_s*J_t)*1/(A_g*r_o^2)  # error: Divide by zero.
f_ez =  # error
## Slenderness factor, λ_c
λ_cx := sqrt(f_y/f_ex)  # Slenderness factor about x-axis.
λ_cx = 0
λ_cy := sqrt(f_y/f_ey)  # Slenderness factor about y-axis.
λ_cy = 0
λ_cz := sqrt(f_y/f_ez)
# Slenderness factor about torsional axis.
λ_cz =  # error
## General notes on class 4 sections in compression
# The South African code gives two options for determining the 'effective' element widths for class 4 sections.  The chosen method for this calculation is to reduce the width to meet the requirements of a non-slender section.
# When calculating the effective areas for the South African code, firstly the reduction in element width 'b' required to satisfy the relevant slenderness limits is determined. Following that, the effective area 'A_e' is calculated by subtracting the element area reductions from the gross area. In this manner, the area of web-to-flange fillets is not affected.
## Effective area
# The element and its notation is as per the following diagram:
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# Element notation for an I section
b_a_b_c_d := if(Class_flange < 4, 0, b/2 - 200*t_f/sqrt(f_y*MPa^-1))
b_a_b_c_d = 0
b_e := if(Class_web < 4, 0, h - 2*t_f - 670*t_w/sqrt(f_y*MPa^-1))
b_e = 0 mm
A_eS := A_g - 4*b_a_b_c_d*t_f - b_e*t_w
A_eS = 0 mm^2
## Effective area in compression
A_e := min(A_eS, A_g)
A_e = 0 mm^2
A_e.ratio := A_e/A_g  # Fraction of gross area
A_e.ratio = 0
## Factored axial compression resistance about x-axis
C_rx := ϕ_s*A_e*f_y*(1 + λ_cx^(2*n_c))^(-n_c^-1)
C_rx = 0 kN
DesRatio_Crx := C_u/C_rx
DesRatio_Crx = 0
Check_Crx := if(DesRatio_Crx ≤ 1, "PASS", "FAIL")
Check_Crx = "PASS"
## Factored axial compression resistance about y-axis
C_ry := ϕ_s*A_e*f_y*(1 + λ_cy^(2*n_c))^(-n_c^-1)
C_ry = 0 kN
DesRatio_Cry := C_u/C_ry
DesRatio_Cry = 0
Check_Cry := if(DesRatio_Cry ≤ 1, "PASS", "FAIL")
Check_Cry = "PASS"
## Factored axial compression resistance about torsional axis
C_rz := ϕ_s*A_g*f_y*(1 + λ_cz^(2*n_c))^(-n_c^-1)
C_rz =  # error
DesRatio_Crz := C_u/C_rz
DesRatio_Crz =  # error
Check_Crz := if(DesRatio_Crz ≤ 1, "PASS", "FAIL")
Check_Crz =  # error
## Summary of results
## Member resistances
# Axial compression resistance about x-axis:
C_rx = 0 kN
# Axial compression resistance about y-axis:
C_ry = 0 kN
# Axial compression resistance about torsional axis:
C_rz =  # error
## Summary of failure mechanisms
# The following matrix provides a summary of all failure mechanisms:
FailureMechs := [
    "Member slenderness for compression", Check_λ, DesRatio_λ;
    "Web slenderness for beams and girders", Check_λw, DesRatio_λw;
    "Axial compression resistance about x-axis", Check_Crx, DesRatio_Crx;
    "Axial compression resistance about y-axis", Check_Cry, DesRatio_Cry;
    "Axial compression resistance about torsional axis", Check_Crz, DesRatio_Crz
]
FailureMechs =  # error
MaxDesRatio := max(FailureMechs[:, 2])
OverallCheck := if(MaxDesRatio ≤ 1, "PASS", "FAIL")
# Details of the critical failure mechanism are as follows:
CritIndex := trunc(|match(MaxDesRatio, FailureMechs[:, 2])[0]|)
MaxDesRatio =  # error
CritFailureMech := FailureMechs[CritIndex, 0]
OverallCheck =  # error
CritFailureMech =  # error
