# Title: HatchTools standard calculation
## Member Reference
# Notes to user:
# - Items highlighted yellow are for user input.  Items highlighted green are intermediate or final results.
# - The right side of the worksheet can be used as a scratch area for calculations that do not get printed.
# -The use of this standard calculation does not imply good engineering practice. A thorough understanding of the topic is necessary and any results shall only be utilized after careful review.
Member_Description := ""
Strand7_Member_ID := ""
Load_Case_Combination_ID := ""
## General notes / assumptions
# All references to clause and table numbers refer to SANS 10162 - 1.
# Some section property calculations do not take into account flange-to-web fillets.
# This calculation applies to: Doubly Symmetric I and H sections
## References
# SANS 10162-1:2011, The structural use of steel, Part 1: Limit-state design of hot-rolled steelwork.
# Southern African Steel Construction Handbook (Red Book)
## Input data
## Section properties
h := 0*mm
I_y := 0*mm^4
b := 0*mm
Z_ey := 0*mm^3
t_w := 0*mm
# - The data in the adjacent 'single section properties component' should be updated using the section properties transfer tool in HatchTools.
# Otherwise, if custom section properties are required, double-click on the component and enter them manually.
t_f := 0*mm
Z_py := 0*mm^3
r_y := 0*mm
I_x := 0*mm^4
J_t := 0*mm^4
Z_ex := 0*mm^3
C_w := 0*mm^6
Z_px := 0*mm^3
r_x := 0*mm
A_g := 0*mm^2
## Ultimate actions and loading conditions
## Actions at the section of beam of concern
M_ux := 0*kN*m  # Moment about the x-axis.
M_uy := 0*kN*m  # Moment about the y-axis.
V_ux := 0*kN  # Shear force parallel to x-axis.
V_uy := 0*kN  # Shear force parallel to y-axis.
T_u := 0*kN  # Axial tensile force.
## End moments
ω_2 := 0  # Moment coefficient.
# The following w_2 coefficient is used to account for increased moment resistance of a laterally unsupported beam segment when subject to a moment gradient, in accordance with clause 13.6 (ii).
## Material properties
G_s := 0*MPa  # Shear modulus of steel.
E_s := 0*MPa  # Elastic modulus of steel.
f_y := 0*MPa  # Yield strength of steel.
f_u := 0*MPa  # Tensile strength of steel.
ϕ_s := 0  # Resistance factor for structural steel.
## Effective lengths
## Member length
L_e := 0*mm  # Length of unbraced portion of beam.
## Effective length factor of unbraced portion of beam
K_e := 0  # Effective lenght factor of unbraced portion of beam
## Section Classification
Class_web := 0  # Web classification.
Class_flange := 0  # Flange classification.
Class_sec := max(Class_web, Class_flange)  # Section classification.
Class_sec = 0
## Tension details
NTSF := 0  # Net tension shear factor [0.85*(Ag/Ane) or 0.85*(Ag/A'ne)]
# [area: >]
## Detailed calculations
## Bending resistance of a laterally supported member
# Clause 13.5
## Plastic moment
# The plastic moment for the section is calculated in accordance with clause 13.5(a), as follows:
M_px := Z_px*f_y
M_px = 0 kN*m
M_py := Z_py*f_y
M_py = 0 kN*m
## Yield moment
# The yield moment for the section is calculated in accordance with clause 13.5(b), as follows:
M_yx := Z_ex*f_y
M_yx = 0 kN*m
M_yy := Z_ey*f_y
M_yy = 0 kN*m
## Factored moment resistance about x axis
M_rxs := ϕ_s*{
    M_px if Class_sec == 1 or Class_sec == 2
    M_yx if Class_sec == 3
}
M_rxs = [NaN] kN*m
DesRatio_Mrxs := M_ux/M_rxs  # error: This matrix is singular. Cannot compute its inverse.
DesRatio_Mrxs =  # error: This variable is undefined.
Check_Mrxs := if(DesRatio_Mrxs ≤ 1, "PASS", "FAIL")
Check_Mrxs =  # error
## Factored moment resistance about y axis
M_ry := ϕ_s*{
    M_py if Class_sec == 1 or Class_sec == 2
    M_yy if Class_sec == 3
}
M_ry = [NaN] kN*m
DesRatio_Mry := M_uy/M_ry  # error: This matrix is singular. Cannot compute its inverse.
DesRatio_Mry =  # error
Check_Mry := if(DesRatio_Mry ≤ 1, "PASS", "FAIL")
Check_Mry =  # error
## Bending resistance of a laterally unsupported member
# Clause 13.6
## Critical elastic moment
# The critical elastic moment for an unbraced member is calculated as follows in accordance with clause 13.6(ii):
M_cr := ω_2*π/(K_e*L_e)*sqrt(E_s*I_y*G_s*J_t + (π*E_s/(K_e*L_e))^2*I_y*C_w)
M_cr = 0 kN*m
## Moment resistance of doubly symmetric class 1 and 2 sections
# The following moment resistance calculations are in accordance with clause 13.6(a)
M_rx_a :=
    1.15*ϕ_s*M_px*(1 - 0.28*M_px/M_cr) if M_cr > 0.67*M_px
    ϕ_s*M_cr if M_cr ≤ 0.67*M_px
M_rx_a = 0 kN*m
## Moment resistance of doubly symmetric class 3 sections
# The following moment resistance calculations are in accordance with clause 13.6(b)
M_rx_b :=
    min(1.15*ϕ_s*M_yx*(1 - 0.28*M_yx/M_cr), ϕ_s*M_yx, ϕ_s*Z_ex*f_y) if M_cr > 0.67*M_yx
    ϕ_s*M_cr if M_cr ≤ 0.67*M_yx
M_rx_b = 0 kN*m
## Moment resistance based on section class
M_rxu := min(M_rxs, {
    M_rx_a if Class_sec == 1 or Class_sec == 2
    M_rx_b if Class_sec == 3
})
M_rxu = 0 kN*m
DesRatio_Mrxu := M_ux/M_rxu
DesRatio_Mrxu = 0
Check_Mrxu := if(DesRatio_Mrxu ≤ 1, "PASS", "FAIL")
Check_Mrxu = "PASS"
## Biaxial bending resistance
# The biaxial bending resistance is checked as follows in accordance with clause 13.6(f):
DesRatio_Mrb := M_ux/M_rxu + M_uy/M_ry  # error: This matrix is singular. Cannot compute its inverse.
DesRatio_Mrb =  # error
Check_Mrb := if(DesRatio_Mrb ≤ 1, "PASS", "FAIL")
Check_Mrb =  # error
## Shear resistance of members with two flanges
# Clause 13.4.1
## Geometric parameters
# Shear area of web for shear parallel to x-axis:
A_wx := 2*b*t_f
A_wx = 0 mm^2
# Shear area of web for shear parallel to y-axis:
A_wy := h*t_w
A_wy = 0 mm^2
# Aspect ratio of web for shear parallel to y-axis:
λ_wy := (h - 2*t_f)/t_w
λ_wy = 0
## Shear buckling coefficient, k_v
k_vy := 5.34
## Aspect coefficient, k_a
k_a := 0
k_a = 0
## Ultimate shear strength, F_s
# Inelastic critical plate-buckling stress in shear for shear parallel to y-axis:
F_criy := 290*sqrt(f_y*MPa*k_vy)/λ_wy
F_criy = 0 MPa
# Elastic critical plate-buckling stress in shear for shear parallel to y-axis:
F_crey := 180000*k_vy*MPa/λ_wy^2  # error: Divide by zero.
F_crey =  # error
# Ultimate shear strength for shear parallel to x-axis:
F_sx := f_y
F_sx = 0 MPa
# Ultimate shear strength for shear parallel to y-axis:
F_sy :=
    0.66*f_y if λ_wy ≤ 440*sqrt(k_vy/(f_y*MPa^-1))
    F_criy if 440*sqrt(k_vy/(f_y*MPa^-1)) < λ_wy ≤ 500*sqrt(k_vy/(f_y*MPa^-1))
    F_criy + k_a*(0.5*f_y - 0.866*F_criy) if 500*sqrt(k_vy/(f_y*MPa^-1)) < λ_wy ≤ 620*sqrt(k_vy/(f_y*MPa^-1))
    F_crey + k_a*(0.5*f_y - 0.866*F_crey) if λ_wy > 620*sqrt(k_vy/(f_y*MPa^-1))
F_sy =  # error
## Shear resistance, V_r
# Factored shear resistance for shear parallel to x-axis:
V_rx := ϕ_s*A_wx*F_sx*0.66
V_rx = 0 kN
DesRatio_Vrx := V_ux/V_rx
DesRatio_Vrx = 0
Check_Vrx := if(DesRatio_Vrx ≤ 1, "PASS", "FAIL")
Check_Vrx = "PASS"
# Factored shear resistance for shear parallel to y-axis:
V_ry := ϕ_s*A_wy*F_sy
V_ry =  # error
DesRatio_Vry := V_uy/V_ry
DesRatio_Vry =  # error
Check_Vry := if(DesRatio_Vry ≤ 1, "PASS", "FAIL")
Check_Vry =  # error
## Combined shear and moment resistance
# The following check of combined shear and moment resistances is in accordance with clause 14.6 and only applicable for I sections, for bending about the x-axis and shear parallel to the y-axis.
DesRatio_VM := 0.727*M_ux/min(M_rxs, M_rxu) + 0.455*V_uy/V_ry
DesRatio_VM =  # error
Check_VM := if(DesRatio_VM ≤ 1, "PASS", "FAIL")
Check_VM =  # error
## Member tensile resistance
T_r := ϕ_s*min(A_g*f_y, NTSF*A_g*f_u)  # 13.2
T_r = 0 kN
DesRatio_Tr := T_u/T_r
DesRatio_Tr = 0
Check_Tr := if(DesRatio_Tr ≤ 1, "PASS", "FAIL")
Check_Tr = "PASS"
## Axial tension and bending resistance
# Combined tension and bending for x-axis:
# 13.9.a):
DesRatio_TMxa := T_u/T_r + M_ux/(ϕ_s*{
    M_px if Class_sec < 3
    M_yx otherwise
})
DesRatio_TMxa = 0
# 13.9.b):
DesRatio_TMxb := M_ux/M_rxs - T_u*{
    Z_ex if Class_sec < 3
    Z_px otherwise
}/(M_rxs*A_g)  # error: This matrix is singular. Cannot compute its inverse.
DesRatio_TMxb =  # error
# Combined tension and bending for y-axis:
# 13.9.a):
DesRatio_TMya := T_u/T_r + M_uy/(ϕ_s*{
    M_py if Class_sec < 3
    M_yy otherwise
})
DesRatio_TMya = 0
# 13.9.b):
DesRatio_TMyb := M_uy/M_ry - T_u*{
    Z_ey if Class_sec < 3
    Z_py otherwise
}/(M_ry*A_g)  # error: This matrix is singular. Cannot compute its inverse.
DesRatio_TMyb =  # error
DesRatio_TM := max(DesRatio_TMxa, DesRatio_TMxb, DesRatio_TMya, DesRatio_TMyb)
DesRatio_TM =  # error
Check_TM := if(DesRatio_TM ≤ 1, "PASS", "FAIL")
Check_TM =  # error
## Summary of results
## Member resistances
# Moment resistance about x-axis for a laterally supported member:
M_rxs = [NaN] kN*m
# Moment resistance about x-axis for a laterally unsupported member:
M_rxu = 0 kN*m
# Moment resistance about y-axis:
M_ry = [NaN] kN*m
# Shear resistance for loads parallel to x-axis:
V_rx = 0 kN
# Shear resistance for loads parallel to y-axis:
V_ry =  # error
# Tensile resistance:
T_r = 0 kN
## Summary of failure mechanisms
# The following matrix provides a summary of all failure mechanisms:
FailureMechs := [
    "Moment resistance about x-axis - Laterally supported member", Check_Mrxs, DesRatio_Mrxs;
    "Moment resistance about x-axis - Laterally unsupported member", Check_Mrxu, DesRatio_Mrxu;
    "Moment resistance about y-axis", Check_Mry, DesRatio_Mry;
    "Biaxial bending resistance", Check_Mrb, DesRatio_Mrb;
    "Shear resistance for loads parallel to x-axis", Check_Vrx, DesRatio_Vrx;
    "Shear resistance for loads parallel to y-axis", Check_Vry, DesRatio_Vry;
    "Combined shear and moment resistance", Check_VM, DesRatio_VM;
    "Tensile resistance", Check_Tr, DesRatio_Tr;
    "Combined tension and bending resistance", Check_TM, DesRatio_TM
]
FailureMechs =  # error
MaxDesRatio := max(FailureMechs[:, 2])
OverallCheck := if(MaxDesRatio ≤ 1, "PASS", "FAIL")
CritIndex := trunc(|match(MaxDesRatio, FailureMechs[:, 2])[0]|)
CritFailureMech := FailureMechs[CritIndex, 0]
# Details of the critical failure mechanism are as follows:
MaxDesRatio =  # error
OverallCheck =  # error
CritFailureMech =  # error
