# TEE SECTIONS DESIGN TO AS4100
# Calculation description
# - This calculation shall be used for designing for Tee sections in accordance with AS4100
# - Negative moment indicates compression in flange
# - The effective section moduli for slender sections are calculated in accordance with the second method in Cl.5.2.5
# Assumptions
# - Tee sections is placed stem down
# - Non-uniform web shear distribution for tee sections
# - The force distribution at the end connections is uniform for tee sections, so k_t is taken as 1.0, which is potentially unconservative
# - β_x is calculated  in accordance with monosymmetric I section by assuming Tee sections are monosymmetric I sections with the width of one flange equal to zero.
# References
# - AISC: Design capacity tables for structural steel, Volume 1: Open sections
# - AS4100-1998 Steel structures
# Input data
# Section properties | Library: Australia h
# Section: 75BT9
D := 76.5 mm
r_x := 21.62 mm
B_f := 75 mm
r_y := 17.17 mm
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t_f := 9.5 mm
Z_ex := 9.175*10^3 mm^3
t_w := 6 mm
Z_ey := 8.938*10^4 mm^3
d_f := 0.0 mm
Z_px := 1.65*10^4 mm^3
A_g := 1.140*10^3 mm^2
Z_py := 1.41*10^4 mm^3
I_x := 5.33*10^5 mm^4
J_t := (3.0*10^4) mm^4
I_y := 3.36*10^5 mm^4
I_w := 4.73*10^6 mm^6
C_x := 0.0 mm
R_f := 0 mm
C_y := 18.55 mm
Alpha := 0 deg
m_u := 8.96 kg/m
# Loading
M_mx := -1 kN*m  # Max moment about the major axis
M_my := -1 kN*m  # Max moment about the minor axis
M_2x := 91.88 kN*m  # Bending moment at 1st quarter point of the segment (x axis)
M_3x := 122.5 kN*m  # Bending moment at the midpoint of the segment (x axis)
M_4x := 91.88 kN*m  # Moment at 3rd quarter span of the segment (x axis)
M_2y := 91.88 kN*m  # Bending moment at 1st quarter point of the segment (y axis)
M_3y := 122.5 kN*m  # Bending moment at the midpoint of the segment (y axis)
M_4y := 91.88 kN*m  # Bending moment at the midpoint of the segment (y axis)
V_mx := 10 kN  # Maximum shear force parallel to the major axis
V_my := 5 kN  # Maximum shear force parallel to the minor axis
N_m := 0 kN  # Max axial force (Compression is considered negative)
# Material and fabrication parameters
# - SR - Stress Relieved
# - HR - Hot Rolled or Hot Finished
# - CF - Cold Formed
# - LW - Lightly Welded Longitudinally
# - HW - Heavily Welded Longitudinally
Fab_type := 2
# - Doubly symmetric I section
# - Monosymmetric channel
# - Monosymmetric Tee section
# - Equal/unequal leg angle
# - Square/rectangular hollow section
# - Circular hollow section
Sect_type := 3
E_s := 200*GPa  # Modulus of elasticity of steel
G_s := 80*GPa  # Shear modulus of steel
f_y := 335*MPa  # Flange yield strength
f_yw := 345*MPa  # Web yield strength
f_u := 470 MPa  # Tensile strength
ϕ := 0.9  # Capacity reduction factor - AS4100 Table 3.4
# Member properties
Restraint := 2
# - Member has full lateral restraint
# - Member does not have full lateral restraint
L_m := 5*m  # Member length
# - α_m is calculated in accordance with Cl. 5.6.1.1 (a) (iii)
# - α_m is taken from AS.4100 T 5.6.1
α_mdef := 2
k_t := 1  # Twist restraint factor, Table 5.6.3(1)
k_r := 1  # Lateral rotation restraint factor, Table 5.6.3(3)
M_oain := 1
# - M_oa is calculated in accordance with Cl.5.6.1.1
# - M_oa is determined from elastic buckling analysis
M_oaEBA := 50*kN*m  # M_oa from elastic buckling analysis
α_muser := 1  # Moment Modification Factor from T5.6.1
k_l := 1  # Load height factor, Table 5.6.3(2)
k_e := 1  # Effective Length Factor, Figure 4.6.3.2
α_fdef := 1
# - α_f is calculated in accordance with Cl 5.11.5.2 (a) or (b)
# - α_f is determined by user
α_fuser := 1  # Flange restraint Factor
# Detailed Calculations
# Slenderness check
# The lookup tables for slenderness limit are shown as follows
λ_fab := [
    "Fab type", 1, 2, 3, 4, 5;
    "lepu1", 10, 9, 8, 8, 8;
    "lepn1", 10, 9, 8, 8, 8;
    "lepu2", 30, 30, 30, 30, 30;
    "lepn2", 82, 82, 82, 82, 82;
    "lepc", 50, 50, 50, 42, 42;
    "leyu1", 16, 16, 15, 15, 14;
    "leyn1", 25, 25, 22, 22, 22;
    "leyu2", 45, 45, 40, 40, 35;
    "leyn2", 115, 115, 115, 115, 115;
    "leyc", 120, 120, 120, 120, 120
]
λ_sect := [
    "Sect type", 1, 2, 3, 4, 5, 6;
    "lepfx", 1, 1, 1, 2, 3, 5;
    "lepfy", 2, 2, 2, 2, 4, 5;
    "lepwx", 4, 4, 2, 2, 4, 5;
    "lepwy", 3, 3, 1, 2, 3, 5;
    "leyfx", 6, 6, 6, 7, 8, 10;
    "leyfy", 7, 7, 7, 7, 9, 10;
    "leywx", 9, 9, 7, 7, 9, 10;
    "leywy", 8, 8, 6, 6, 8, 10
]
λ_epfx := hlookup(Fab_type, λ_fab, hlookup(Sect_type, λ_sect, 1)[0])[0]  # Plasticity limit of the flange (x axis)
λ_epfx = 9
λ_epfy := hlookup(Fab_type, λ_fab, hlookup(Sect_type, λ_sect, 2)[0])[0]  # Plasticity limit of the flange (y axis)
λ_epfy = 9
λ_epwx := hlookup(Fab_type, λ_fab, hlookup(Sect_type, λ_sect, 3)[0])[0]  # Plasticity limit of the web (x axis)
λ_epwx = 9
λ_epwy := hlookup(Fab_type, λ_fab, hlookup(Sect_type, λ_sect, 4)[0])[0]  # Plasticity limit of the web (y axis)
λ_epwy = 9
λ_eyfx := hlookup(Fab_type, λ_fab, hlookup(Sect_type, λ_sect, 5)[0])[0]  # Yield limit of the flange (x axis)
λ_eyfx = 16
λ_eyfy := hlookup(Fab_type, λ_fab, hlookup(Sect_type, λ_sect, 6)[0])[0]  # Yield limit of the flange (y axis)
λ_eyfy = 25
λ_eywx := hlookup(Fab_type, λ_fab, hlookup(Sect_type, λ_sect, 7)[0])[0]  # Yield limit of the web (x axis)
λ_eywx = 25
λ_eywy := hlookup(Fab_type, λ_fab, hlookup(Sect_type, λ_sect, 8)[0])[0]  # Yield limit of the web (y axis)
λ_eywy = 16
# Plate element slenderness λ_e is calculated in accordance with Cl.5.2.2
λ_ef := ((B_f - t_w)/2)/t_f*sqrt(f_y/(250*MPa))
# Flange slenderness
λ_ef = 4.20386
λ_ew := (D - t_f)/t_w*sqrt(f_y/(250*MPa))
# Web slenderness
λ_ew = 12.9264
λ_sx :=
    if λ_ef/λ_eyfx > λ_ew/λ_eywx
        λ_ef
    else
        λ_ew
# Section slenderness (bending about x axis)
λ_sx = 12.9264
λ_sy := λ_ef
# Section slenderness (bending about y axis)
λ_sy = 4.20386
λ_spx :=
    if λ_sx == λ_ef
        λ_epfx
    if λ_sx == λ_ew
        λ_epwx
    if λ_ef == λ_ew
        min(λ_epfx, λ_epwx)
# Section plasticity limit (bending about x axis)
λ_spx = 9
# Section plasticity limit (bending about y axis)
λ_spy :=
    if λ_sy == λ_ef
        λ_epfy
    if λ_sy == λ_ew
        λ_epwy
λ_spy = 9
# Section yield limit (bending about x axis)
λ_syx :=
    if λ_sx == λ_ef
        λ_eyfx
    if λ_sx == λ_ew
        λ_eywx
    if λ_ef == λ_ew
        min(λ_eyfx, λ_eywx)
λ_syx = 25
# Section yield limit (bending about y axis)
λ_syy :=
    if λ_sy == λ_ef
        λ_eyfy
    if λ_sy == λ_ew
        λ_eywy
λ_syy = 25
# Compactness of the section, in which C stands for "compact", N for "non-compact", and S for "slender"
# Section compactness for bending about x axis
ε_x :=
    if λ_sx ≤ λ_spx
        "C"
    if λ_spx < λ_sx ≤ λ_syx
        "N"
    if λ_syx < λ_sx
        "S"
ε_x = "N"
# Section compactness for bending about y axis
ε_y :=
    if λ_sy ≤ λ_spy
        "C"
    if λ_spy < λ_sy ≤ λ_syy
        "N"
    if λ_syy < λ_sy
        "S"
ε_y = "C"
# Web compactness for tee sections bending about y axis
ε_xft :=
    if λ_ef ≤ hlookup(Fab_type, λ_fab, 1)[0]
        "C"
    if hlookup(Fab_type, λ_fab, 1)[0] ≤ λ_ef ≤ hlookup(Fab_type, λ_fab, 6)[0]
        "N"
    if hlookup(Fab_type, λ_fab, 6)[0] ≤ λ_ef
        "S"
ε_xft = "C"
# Web compactness for tee sections bending about x axis
ε_xwt :=
    if λ_ew ≤ hlookup(Fab_type, λ_fab, 2)[0]
        "C"
    if hlookup(Fab_type, λ_fab, 2)[0] ≤ λ_ew ≤ hlookup(Fab_type, λ_fab, 7)[0]
        "N"
    if hlookup(Fab_type, λ_fab, 7)[0] ≤ λ_ew
        "S"
ε_xwt = "N"
# Effective section modulus
Z_efxtS :=
    if ε_xwt == "C"
        min(1.5*Z_ex, Z_px)
    if ε_xwt == "N"
        (Z_ex + (((25 - λ_ew)/(25 - 9))*(min(1.5*Z_ex, Z_px) - Z_ex)))
    if ε_xwt == "S"
        Z_ex*(25/λ_ew)^2
Z_efxtS = 12636.7 mm^3
Z_efxtF :=
    if ε_xft == "C"
        min(1.5*Z_ex, Z_px)
    if ε_xft == "N"
        (Z_ex + (((16 - λ_ef)/(16 - 9))*(min(1.5*Z_ex, Z_px) - Z_ex)))
    if ε_xft == "S"
        Z_ex*(16/λ_ef)
Z_efxtF = 13762.5 mm^3
Z_efyt :=
    if ε_y == "C"
        min(1.5*Z_ey, Z_py)
    if ε_y == "N"
        (Z_ey + (((λ_syy - λ_sy)/(λ_syy - λ_spy))*(min(1.5*Z_ey, Z_py) - Z_ey)))
    if ε_y == "S"
        Z_ey*(λ_syy/λ_sy)
Z_efyt = 14100 mm^3
# Section Capacity
M_sxtS := f_y*Z_efxtS  # Section moment capacity (bending about x axis, compression in Stem)
M_sxtS = 4.23331 kN*m
ϕM_sxtS := ϕ*M_sxtS
ϕ*M_sxtS = 3.80998 kN*m
M_sxtF := f_y*Z_efxtF  # Section moment capacity (bending about x axis, compression in Flange)
M_sxtF = 4.61044 kN*m
ϕM_sxtF := ϕ*M_sxtF
ϕ*M_sxtF = 4.14939 kN*m
M_syt := f_y*Z_efyt
# Section moment capacity (bending about y axis)
M_syt = 4.7235 kN*m
ϕM_syt := ϕ*M_syt
ϕ*M_syt = 4.25115 kN*m
# Member capacity
# Moment modification factor
α_mcalcx := min(1.7*M_mx/sqrt(M_2x^2 + M_3x^2 + M_4x^2), 2.5)  # Bending about x axis
α_mx :=
    if α_mdef == 1
        α_mcalcx
    if α_mdef == 2
        α_muser
α_mx = 1
l_e := k_t*k_l*k_r*L_m
# Member effective length
l_e = 5 m
# Reference buckling moment
# Bending about x axis
M_ox := sqrt(π^2*E_s*I_y/l_e^2*(G_s*J_t + π^2*E_s*I_w/l_e^2))
M_oax :=
    if M_oain == 1
        M_ox
    if M_oain == 2
        M_oaEBA
M_oax = 7.98002 kN*m
# Reference buckling moment, major axis | PROGRESS
β_xS := 0.8*(D - t_f)*(0 - 1)
β_xS = -0.0536 m
M_oxS := sqrt(π^2*E_s*I_y/l_e^2)*(sqrt(G_s*J_t + π^2*E_s*I_w/l_e^2 + β_xS^2/4*π^2*E_s*I_y/l_e^2) + β_xS/2*sqrt(π^2*E_s*I_y/l_e^2))
β_xF := 0.8*(D - t_f)*(t_f*B_f^3/6/I_y - 1)
β_xF = 0.0529569 m
M_oxF := sqrt(π^2*E_s*I_y/l_e^2)*(sqrt(G_s*J_t + π^2*E_s*I_w/l_e^2 + β_xF^2/4*π^2*E_s*I_y/l_e^2) + β_xF/2*sqrt(π^2*E_s*I_y/l_e^2))
M_oaxS :=
    if M_oain == 1
        M_oxS
    if M_oain == 2
        M_oaEBA
M_oaxS = 7.30064 kN*m
M_oaxF :=
    if M_oain == 1
        M_oxF
    if M_oain == 2
        M_oaEBA
M_oaxF = 8.71334 kN*m
# Slenderness reduction factor
α_sxtS := 0.6*(sqrt((M_sxtS/M_oaxS)^2 + 3) - M_sxtS/M_oaxS)  # Bending about x axis, Stem
α_sxtS = 0.748008
α_sxtF := 0.6*(sqrt((M_sxtF/M_oaxF)^2 + 3) - M_sxtF/M_oaxF)
# Bending about x axis, Flange
α_sxtF = 0.769167
# Member moment capacity
M_buxtS := min(α_mx*α_sxtS*M_sxtS, M_sxtS)
M_buxtS = 3.16655 kN*m
M_buxtF := min(α_mx*α_sxtF*M_sxtF, M_sxtF)
M_buxtF = 3.5462 kN*m
M_bxtS :=
    if Restraint == 1
        M_sxtS
    if Restraint == 2
        M_buxtS
# Bending about x axis, Stem
M_bxtS = 3.16655 kN*m
ϕ*M_bxtS = 2.8499 kN*m
ϕM_bxtS := ϕ*M_bxtS
M_bxtF :=
    if Restraint == 1
        M_sxtF
    if Restraint == 2
        M_buxtF
# Bending about x axis, Flange
M_bxtF = 3.5462 kN*m
ϕ*M_bxtF = 3.19158 kN*m
ϕM_bxtF := ϕ*M_bxtF
M_sx :=
    if M_mx > 0 and Sect_type == 3
        M_sxtF
    if M_mx ≤ 0 and Sect_type == 3
        M_sxtS
# Section moment capacity (x axis)
ϕ*M_sx = 3.80998 kN*m
M_sy := M_syt
# Section moment capacity (y axis)
M_sy = 4.7235 kN*m
M_bx :=
    if M_mx > 0 and Sect_type == 3
        M_bxtF
    if M_mx ≤ 0 and Sect_type == 3
        M_bxtS
# Member moment capacity (x axis)
M_bx = 3.16655 kN*m
DesRatio_Mx := max(|M_mx|/(ϕ*M_sx), |M_mx|/(ϕ*M_bx))
DesRatio_Mx = 0.35089
Check_Mx := if(DesRatio_Mx ≤ 1, "PASS", "FAIL")
Check_Mx = "PASS"
DesRatio_My := |M_my|/(ϕ*M_sy)
DesRatio_My = 0.23523
Check_My := if(DesRatio_My ≤ 1, "PASS", "FAIL")
Check_My = "PASS"
# Shear capacity
t_wsx := t_w
# Web thickness (x-axis)
t_wsx = 6 mm
t_wsy := t_f
# Web thickness (y-axis)
t_wsy = 9.5 mm
A_wx := t_wsx*D
# Shear area of section (x-axis)
A_wx = 459 mm^2
A_wy := t_wsy*B_f
# Shear area of section (y-axis)
A_wy = 712.5 mm^2
V_wx := 0.6*f_yw*A_wx
# Shear yield capacity (x-axis)
V_wx = 95.013 kN
V_wy := 0.6*f_y*A_wy
# Shear yield capacity (y-axis)
V_wy = 143.212 kN
# Unstiffened shear buckling coefficient (x-axis)
α_vx := (82/((D - 2*t_f)/t_w*sqrt(f_yw/(250*MPa))))^2
α_vx = 53.0537
α_vy := (82/(B_f/t_f*sqrt(f_y/(250*MPa))))^2  # Unstiffened shear buckling coefficient (y-axis)
α_vy = 80.5096
V_bx := min(α_vx*V_wx, V_wx)  # Unstiffened shear buckling capacity (x-axis)
V_bx = 95.013 kN
V_by := min(α_vy*V_wy, V_wy)
# Unstiffened shear buckling capacity (y-axis)
V_by = 143.212 kN
# Ratio of maximum shear to average shear:
φ_ma := (B_f*t_f*(C_y - t_f/2) + (C_y - t_f/2)^2*t_w/2)/(B_f*t_f*(C_y - t_f/2) - t_w/6*(D - t_f/2)^2 + t_w/2*(C_y - t_f/2)*(D - t_f/2))
φ_ma = 1.35911
φ_mahx := 3*(2*B_f + D)/(2*(3*B_f + D))
φ_mahx = 1.12687
φ_mahy := 3*(2*D + B_f)/(2*(3*D + B_f))
φ_mahy = 1.12315
V_ux :=
    if D/t_w ≤ 82/sqrt(f_yw/(250*MPa))
        2*V_wx/(0.9 + φ_ma)
    else
        2*V_bx/(0.9 + φ_ma)
# Web shear capacity for Tee sections (x-axis)
V_ux = 84.1155 kN
ϕ*V_ux = 75.7039 kN
V_uy :=
    if D/t_w ≤ 82/sqrt(f_yw/(250*MPa))
        2*V_wy/(0.9 + φ_ma)
    else
        2*V_by/(0.9 + φ_ma)
# Web shear capacity for Tee sections (y-axis)
V_uy = 126.787 kN
ϕ*V_uy = 114.108 kN
DesRatio_Vx := V_mx/(ϕ*V_ux)
DesRatio_Vx = 0.132094
Check_Vx := if(DesRatio_Vx ≤ 1, "PASS", "FAIL")
Check_Vx = "PASS"
DesRatio_Vy := V_my/(ϕ*V_uy)
DesRatio_Vy = 0.0438181
Check_Vy := if(DesRatio_Vy ≤ 1, "PASS", "FAIL")
Check_Vy = "PASS"
# Combined shear and bending
# Web shear capacity in the presence of bending (x-axis)
V_vmx := min({
    if M_mx < 0.75*ϕ*M_sx
        V_ux
    also if 0.75*ϕ*M_sx ≤ M_mx ≤ ϕ*M_sx
        V_ux*(2.2 - 1.6*M_mx/(ϕ*M_sx))
    else
        0.0001*kN
}, V_ux)
V_vmx = 84.1155 kN
ϕV_vmx := ϕ*V_vmx
ϕ*V_vmx = 75.7039 kN
DesRatio_V.vmx := V_mx/(ϕ*V_vmx)
DesRatio_V.vmx = 0.132094
Check_V.vmx := if(DesRatio_V.vmx < 1, "PASS", "FAIL")
Check_V.vmx = "PASS"
# Web shear capacity in the presence of bending (y-axis)
V_vmy := min({
    if M_my < 0.75*ϕ*M_sy
        V_uy
    also if 0.75*ϕ*M_sy ≤ M_my ≤ ϕ*M_sy
        V_uy*(2.2 - 1.6*M_my/(ϕ*M_sy))
    else
        0.0001*kN
}, V_uy)
V_vmy = 126.787 kN
ϕV_vmy := ϕ*V_vmy
ϕ*V_vmy = 114.108 kN
DesRatio_V.vmy := V_my/(ϕ*V_vmy)
DesRatio_V.vmy = 0.0438181
Check_V.vmy := if(DesRatio_V.vmy < 1, "PASS", "FAIL")
Check_V.vmy = "PASS"
# Axial compression capacity
# Section capacity
λ_eyu1 := hlookup(Fab_type, λ_fab, 6)[0]
λ_eyu2 := hlookup(Fab_type, λ_fab, 8)[0]
# Non-effective flange area
A_nef := if(λ_eyu1 < λ_ef, 2*t_f*(1 - λ_eyu1/λ_ef)*(B_f - t_w)/2, 0)
A_nef = 0 mm^2/m^2
# Non-effective web area
A_new := if(λ_eyu2 < λ_ew, 2*t_f*(1 - λ_eyu2/λ_ew)*(D - 2.*t_f), 0)
A_new = 0 mm^2/m^2
A_ne := A_nef + A_new  # Total non-effective area
A_e := A_g - A_ne
# Effective area
A_e = 1140 mm^2
k_f := A_e/A_g
# Form Factor
k_f = 1
N_s := k_f*A_g*min(f_y, f_yw)
# Nominal section compression capacity
N_s = 381.9 kN
ϕN_s := ϕ*N_s
ϕ*N_s = 343.71 kN
DesRatio_N.s := N_m/(ϕ*N_s)
DesRatio_N.s = 0
Check_N.s := if(DesRatio_N.s < 1, "PASS", "FAIL")
Check_N.s = "PASS"
# Member capacity
l_ec := k_e*L_m
# Member effective length
l_ec = 5 m
λ_nx := l_ec/r_x*sqrt(k_f)*sqrt(f_y/(250*MPa))
# Modified compression member slenderness, buckling about x-axis
λ_nx = 267.711
λ_ny := l_ec/r_y*sqrt(k_f)*sqrt(f_y/(250*MPa))
# Modified compression member slenderness, buckling about y-axis
λ_ny = 337.095
α_ax := 2100*(λ_nx - 13.5)/(λ_nx^2 - 15.3*λ_nx + 2050)
# Compression member
# section constant (x-axis)
α_ax = 7.6676
α_ay := 2100*(λ_ny - 13.5)/(λ_ny^2 - 15.3*λ_ny + 2050)
# Compression member
# section constant (y-axis)
α_ay = 6.14835
α_b := if(k_f == 1, 0.5, 1)
# Member section constant
α_b = 0.5
λ_cx := λ_nx + α_b*α_ax
# Slenderness ratio (x-axis)
λ_cx = 271.545
λ_cy := λ_ny + α_b*α_ay
# Slenderness ratio (y-axis)
λ_cy = 340.169
η_x := max(0.00326*(λ_cx - 13.5), 0)  # Compression member imperfection factor (x-axis)
η_x = 0.841227
η_y := max(0.00326*(λ_cy - 13.5), 0)  # Compression member imperfection factor (y-axis)
η_y = 1.06494
ξ_x := ((λ_cx/90)^2 + 1 + η_x)/(2*(λ_cx/90)^2)  # Compression member factor (x-axis)
ξ_x = 0.60113
ξ_y := ((λ_cy/90)^2 + 1 + η_y)/(2*(λ_cy/90)^2)
# Compression member factor (y-axis)
ξ_y = 0.572273
α_cx := ξ_x*(1 - sqrt(1 - (90/(ξ_x*λ_cx))^2))  # Slenderness reduction factor (x-axis)
α_cx = 0.0996253
α_cy := ξ_y*(1 - sqrt(1 - (90/(ξ_y*λ_cy))^2))
# Slenderness reduction factor (y-axis)
α_cy = 0.0648316
N_mcx := min(α_cx*N_s, N_s)
# Member buckling capacity (x-axis)
N_mcx = 38.0469 kN
N_mcy := min(α_cy*N_s, N_s)
# Member buckling capacity (y-axis)
N_mcy = 24.7592 kN
N_cx :=
    if Restraint == 1
        N_s
    if Restraint == 2
        N_mcx
# Member compression capacity (x-axis)
N_cx = 38.0469 kN
ϕ*N_cx = 34.2422 kN
ϕN_cx := ϕ*N_cx
DesRatio_N.cx := |N_m|/(ϕ*N_cx)
DesRatio_N.cx = 0
Check_N.cx := if(DesRatio_N.cx < 1, "PASS", "FAIL")
Check_N.cx = "PASS"
N_cy :=
    if Restraint == 1
        N_s
    if Restraint == 2
        N_mcy
# Member compression capacity (y-axis)
N_cy = 24.7592 kN
ϕ*N_cy = 22.2833 kN
ϕN_cy := ϕ*N_cy
DesRatio_N.cy := |N_m|/(ϕ*N_cy)
DesRatio_N.cy = 0
Check_N.cy := if(DesRatio_N.cy < 1, "PASS", "FAIL")
Check_N.cy = "PASS"
# Axial tension capacity
N_t := min(A_g*f_y, 0.85*A_g*f_u)
# Section tension capacity
N_t = 381.9 kN
ϕN_t := ϕ*N_t
ϕ*N_t = 343.71 kN
DesRatio_N.t := |N_m|/(ϕ*N_t)
DesRatio_N.t = 0
Check_N.t := if(DesRatio_N.t < 1, "PASS", "FAIL")
Check_N.t = "PASS"
# Combined axial force and bending capacity
# Compression and uniaxial bending about the major axis
# Section capacity
# Nominal reduced section moment capacity under axial compression
M_rcx := min(M_sx*(1 - |N_m|/(ϕ*N_s)), M_sx)
M_rcx = 4.23331 kN*m
ϕ*M_rcx = 3.80998 kN*m
# Member capacity
# Nominal reduced member moment capacity under axial compression
M_icx := M_sx*(1 - |N_m|/(ϕ*N_cx))
# In-plane capacity
M_icx = 4.23331 kN*m
ϕ*M_icx = 3.80998 kN*m
M_ocx := M_bx*(1 - |N_m|/(ϕ*N_cy))
# Out-of-plane capacity
M_ocx = 3.16655 kN*m
ϕ*M_ocx = 2.8499 kN*m
DesRatio_cubx := |M_mx|/(ϕ*min(M_rcx, M_icx, M_ocx))
DesRatio_cubx = 0.35089
Check_cubx := if(DesRatio_cubx < 1, "PASS", "FAIL")
Check_cubx = "PASS"
# Compression and uniaxial bending about the minor axis
# Section capacity
M_rcy := min({
    if ε_y ≠ "C"
        M_sy*(1 - |N_m|/(ϕ*N_s))
    if ε_y == "C"
        (1.18*M_sy*(1 - |N_m|/(ϕ*N_s)))
}, M_sy)
M_rcy = 4.7235 kN*m
ϕ*M_rcy = 4.25115 kN*m
# Member capacity
M_icy := M_sy*(1 - |N_m|/(ϕ*N_cy))
M_icy = 4.7235 kN*m
ϕ*M_icy = 4.25115 kN*m
DesRatio_cuby := |M_my|/(ϕ*min(M_rcy, M_icy))
DesRatio_cuby = 0.23523
Check_cuby := if(DesRatio_cuby < 1, "PASS", "FAIL")
Check_cuby = "PASS"
# Compression and biaxial bending
# Section capacity
DesRatio_cbbs := |N_m|/(ϕ*N_s) + |M_mx|/(ϕ*M_sx) + |M_my|/(ϕ*M_sy)
DesRatio_cbbs = 0.497699
Check_cbbs := if(DesRatio_cbbs ≤ 1, "PASS", "FAIL")
Check_cbbs = "PASS"
# Member capacity
DesRatio_cbbm := (|M_mx|/(ϕ*min(M_icx, M_ocx)))^1.4 + (|M_my|/(ϕ*M_icy))^1.4
DesRatio_cbbm = 0.362655
Check_cbbm := if(DesRatio_cbbm ≤ 1, "PASS", "FAIL")
Check_cbbm = "PASS"
DesRatio_cbb := max(DesRatio_cbbs, DesRatio_cbbm)
DesRatio_cbb = 0.497699
Check_cbb := if(Check_cbbs == "PASS" and Check_cbbm == "PASS", "PASS", "FAIL")
Check_cbb = "PASS"
# Tension and uniaxial bending about the major axis
# Section capacity
M_rtx := min(M_sx*(1 - |N_m|/(ϕ*N_t)), M_sx)
M_rtx = 4.23331 kN*m
ϕ*M_rtx = 3.80998 kN*m
# Member capacity
M_otx := min(M_bx*(1 + |N_m|/(ϕ*N_t)), ϕ*M_rtx)
M_otx = 3.16655 kN*m
ϕ*M_otx = 2.8499 kN*m
DesRatio_tubx := |M_mx|/(ϕ*min(M_rtx, M_otx))
DesRatio_tubx = 0.35089
Check_tubx := if(DesRatio_tubx < 1, "PASS", "FAIL")
Check_tubx = "PASS"
# Tension and uniaxial bending about the minor axis
# Section capacity
M_rty := min(M_sy*(1 - |N_m|/(ϕ*N_t)), M_sy)
M_rty = 4.7235 kN*m
ϕ*M_rty = 4.25115 kN*m
DesRatio_tuby := |M_my|/(ϕ*M_rty)
DesRatio_tuby = 0.23523
Check_tuby := if(DesRatio_tubx < 1, "PASS", "FAIL")
Check_tuby = "PASS"
# Tension and biaxial bending
# Section capacity
DesRatio_tbbs := |N_m|/(ϕ*N_t) + |M_mx|/(ϕ*M_sx) + |M_my|/(ϕ*M_sy)
DesRatio_tbbs = 0.497699
Check_tbbs := if(DesRatio_tbbs ≤ 1, "PASS", "FAIL")
Check_tbbs = "PASS"
# Member capacity
DesRatio_tbbm := (|M_mx|/(ϕ*min(M_rtx, M_otx)))^1.4 + (|M_my|/(ϕ*M_rty))^1.4
DesRatio_tbbm = 0.362655
Check_tbbm := if(DesRatio_tbbm ≤ 1, "PASS", "FAIL")
Check_tbbm = "PASS"
DesRatio_tbb := max(DesRatio_tbbs, DesRatio_tbbm)
DesRatio_tbb = 0.497699
Check_tbb := if(DesRatio_tbb ≤ 1, "PASS", "FAIL")
Check_tbb = "PASS"
# Results summary
# Member / section capacities
# Design section moment capacity about x-axis
ϕ*M_sx = 3.80998 kN*m
# Design section moment capacity about y-axis
ϕ*M_sy = 4.25115 kN*m
# Design member moment capacity about x-axis
ϕ*M_bx = 2.8499 kN*m
# Design web shear capacity parallel to x-axis
ϕ*V_vmx = 75.7039 kN
# Design web shear capacity parallel to y-axis
ϕ*V_vmy = 114.108 kN
# Design section capacity in axial compression
ϕ*N_s = 343.71 kN
# Design member capacity in axial compression, buckling about x-axis
ϕ*N_cx = 34.2422 kN
# Design member capacity in axial compression, buckling about y-axis
ϕ*N_cy = 22.2833 kN
# Design section capacity in axial tension
ϕ*N_t = 343.71 kN
# Failure mechanisms summary
# The following matrix provides a summary of all failure mechanisms for the currently selected load case.
FailureMechs := [
    "Design moment capacity about x-axis", Check_Mx, DesRatio_Mx;
    "Design moment capacity about y-axis", Check_My, DesRatio_My;
    "Design web shear capacity parallel to x-axis", Check_V.vmx, DesRatio_V.vmx;
    "Design web shear capacity parallel to x-axis", Check_V.vmy, DesRatio_V.vmy;
    "Design section capacity in axial compression", Check_N.s, DesRatio_N.s;
    "Design member capacity in axial compression, buckling about x-axis", Check_N.cx, DesRatio_N.cx;
    "Design member capacity in axial compression, buckling about y-axis", Check_N.cy, DesRatio_N.cy;
    "Design section capacity in axial tension", Check_N.t, DesRatio_N.t;
    "Compression and uniaxial bending about the major axis ", Check_cubx, DesRatio_cubx;
    "Compression and uniaxial bending about the minor axis ", Check_cuby, DesRatio_cuby;
    "Compression and biaxial bending", Check_cbb, DesRatio_cbb;
    "Tension and uniaxial bending about the major axis ", Check_tubx, DesRatio_tubx;
    "Tension and uniaxial bending about the minor axis", Check_tuby, DesRatio_tuby;
    "Tension and biaxial bending ", Check_tbb, DesRatio_tbb
]
MaxDesRatio := max(FailureMechs[:, 2])
OverallCheck := if(MaxDesRatio ≤ 1, "PASS", "FAIL")
CritIndex := trunc(|match(MaxDesRatio, FailureMechs[:, 2])[0]|)
CritFailureMech := FailureMechs[CritIndex, 0]
FailureMechs = [
    "Design moment capacity about x-axis", "PASS", 0.35089;
    "Design moment capacity about y-axis", "PASS", 0.23523;
    "Design web shear capacity parallel to x-axis", "PASS", 0.132094;
    "Design web shear capacity parallel to x-axis", "PASS", 0.0438181;
    "Design section capacity in axial compression", "PASS", 0;
    "Design member capacity in axial compression, buckling about x-axis", "PASS", 0;
    "Design member capacity in axial compression, buckling about y-axis", "PASS", 0;
    "Design section capacity in axial tension", "PASS", 0;
    "Compression and uniaxial bending about the major axis ", "PASS", 0.35089;
    "Compression and uniaxial bending about the minor axis ", "PASS", 0.23523;
    "Compression and biaxial bending", "PASS", 0.497699;
    "Tension and uniaxial bending about the major axis ", "PASS", 0.35089;
    "Tension and uniaxial bending about the minor axis", "PASS", 0.23523;
    "Tension and biaxial bending ", "PASS", 0.497699
]
# Details of the critical failure mechanism are as follows:
MaxDesRatio = 0.497699
OverallCheck = "PASS"
CritFailureMech = "Compression and biaxial bending"
