# footer: ___________________________ © Hatch 2018 All rights reserved, including all rights relating to the use of this document or its contents.
# Member Reference
# Notes to user:
# - Items highlighted yellow are for user input.  Items highlighted green are intermediate or final results.
# - The right side of the worksheet can be used as a scratch area for calculations that do not get printed.
# -The use of this standard calculation does not imply good engineering practice. A thorough understanding of the topic is necessary and any results shall only be utilized after careful review.
Member_Description := ""
Strand7_Member_ID := ""
Load_Case_Combination_ID := ""
# General notes / assumptions
# - All references to clause and table numbers refer to SANS 10162 - 1.
# - Some section property calculations do not take into account flange-to-web fillets.
# - This calculation applies to: Doubly Symmetric I and H sections
# References
# - SANS 10162-1:2011, The structural use of steel, Part 1: Limit-state design of hot-rolled steelwork.
# Input data
# Section properties
A_g := 0*mm^2
# Ultimate actions and loading conditions
T_u := 0*kN  # Axial tensile force.
# Material properties
f_y := 0*MPa  # Yield strength of steel.
f_u := 0*MPa  # Tensile strength of steel.
ϕ_s := 0  # Resistance factor for structural steel.
# Tension details
NTSF := 0  # Net tension shear factor [0.85*(Ag/Ane) or 0.85*(Ag/A'ne)]
# Detailed calculations
# Member tensile resistance
T_r := ϕ_s*min(A_g*f_y, NTSF*A_g*f_u)  # 13.2
T_r =  # no stored result
DesRatio_Tr := T_u/T_r
DesRatio_Tr =  # no stored result
Check_Tr := if(DesRatio_Tr ≤ 1, "PASS", "FAIL")
Check_Tr =  # no stored result
