# Notes to user:
# - Items highlighted yellow are for user input.  Items highlighted green are intermediate or final results.
# - The right side of the worksheet can be used as a scratch area for calculations that do not get printed.
# -The use of this standard calculation does not imply good engineering practice. A thorough understanding of the topic is necessary and any results shall only be utilized after careful review.
# General Notes / Assumptions
# - This standard calculation is for the design of steel members in accordance with CAN/CSA S16-14^1 and SANS 10162^2.  All references to clause and table numbers are with reference to these two standards.
# - The moment resistance calculations are valid for sections with either their web or flanges being class 4, but not both being class 4.  In such a case the section should be designed in accordance with clause 13.5(c)(i).
# - It is assumed that the section being analyzed is one of the types listed below under Section and fabrication types.  For section type 4 (equal/unequal leg angles), this calculation does not apply for members subject to bending that are laterally unsupported, or members subject to bending that are both laterally supported and class 4.
# - Some section property calculations do not take into account flange-to-web fillets.
# - Shear buckling is assumed to not be critical for shear parallel to the x-axis.
# References
# - CAN/CSA S16-14:2005, Limit States Design of Steel Structures.
# - SANS 10162-1:2005, The structural use of steel, Part 1: Limit-state design of hot-rolled steelwork.
# - Southern African Steel Construction Handbook (Red Book), Fifth Edition, 2005.
# - Handbook of Steel Construction, Ninth Edition, Canadian Institute of Steel Construction.
# - Young, W.C., Budynas, R.G., Roark's Formulas for Stress and Strain, Seventh Edition, McGraw-Hill.
# - Galambos, T.V., Design Criteria for Metal Structures, Fifth Ed, 1998, John Wiley and Sons.
# Input Data
# Section and Fabrication Types
Sect_type := 1
# - Doubly symmetric I section
# - Monosymmetric T section
# - Monosymmetric channel
# - Equal/unequal leg angle
# - Square hollow section
# - Rectangular hollow section
# - Circular hollow section
Fab_type := 1
# - Hot-rolled sections, or hollow sections that are cold-formed and not stress-relieved.
# - Welded plate girders with flange edges oxy-flame-cut, or hollow sections hot formed or cold formed and stress-relieved.
# Section Properties
# Note that the variable names and axis directions for the following section properties are all in accordance with the HatchTools section properties standard nomenclature.
# [Excel component]
    Library := excel["B1"]
    Section := excel["B2"]
    Shape := excel["B3"]
    Fab := excel["B4"]
    SectUnit_M := excel["B5"]
    D_M := excel["B6"]
    B_fM := excel["B7"]
    t_fM := excel["B8"]
    t_wM := excel["B9"]
    d_fM := excel["B10"]
    A_gM := excel["B11"]
    I_xM := excel["B12"]
    I_yM := excel["B13"]
    r_xM := excel["E1"]
    r_yM := excel["E2"]
    Z_exM := excel["E3"]
    Z_eyM := excel["E4"]
    Z_pxM := excel["E5"]
    Z_pyM := excel["E6"]
    J_tM := excel["E7"]
    I_wM := excel["E8"]
    C_xM := excel["E9"]
    C_yM := excel["E10"]
    R_fM := excel["E11"]
    Alpha_M := excel["E12"]
    m_uM := excel["E13"]
# - The data in the adjacent 'single section properties component' should be updated using the section properties transfer tool in HatchTools.
# Otherwise, if custom section properties are required, double-click on the component and enter them manually.
SectUnit :=
    if SectUnit_M == "mm"
        mm
    if SectUnit_M == "in"
        in
D := D_M*SectUnit
A_g := A_gM*SectUnit^2
Z_ex := Z_exM*SectUnit^3
I_w := I_wM*SectUnit^6
B_f := B_fM*SectUnit
I_x := I_xM*SectUnit^4
Z_ey := Z_eyM*SectUnit^3
C_x := C_xM*SectUnit
t_f := t_fM*SectUnit
I_y := I_yM*SectUnit^4
Z_px := Z_pxM*SectUnit^3
C_y := C_yM*SectUnit
t_w := t_wM*SectUnit
r_x := r_xM*SectUnit
Z_py := Z_pyM*SectUnit^3
R_f := R_fM*SectUnit
d_f := d_fM*SectUnit
r_y := r_yM*SectUnit
J_t := J_tM*SectUnit^4
Alpha := Alpha_M*deg
m_u := m_uM*{
    if SectUnit == mm
        kg/m
    if SectUnit == in
        lb/ft
}
# Ultimate Actions and Loading Conditions
# Actions at the Section of Beam of Concern
N_f := 0.0001*kN  # Axial force (compression is positive, tension is negative).
M_fx := 0*kN*m  # Moment about the x-axis (positive causes compression at top of section).
M_fy := 0*kN*m  # Moment about the y-axis (positive causes compression at right of section).
V_fx := 0*kN  # Shear force parallel to x-axis.
V_fy := 0*kN  # Shear force parallel to y-axis.
# End Moments
M_fxA := 0.0001*kN*m  # Factored moments about x axis at end 'A' of member.
M_fxB := 0.0001*kN*m  # Factored moments about x axis at end 'B' of member.
# Loading Condition
Curvature := 1
# - Single curvature
# - Double curvature.
# - The adjacent w_2_case parameter is used to determine w_2 in accordance with clause 13.6.  It only has an effect on the bending resistance of laterally unsupported members.
ω_2_case := 2
# - The unbraced length of the member is subject to end moments only.
# - The member has a bending moment at any point within its unbraced length that is larger than the end moments, or when there is no effective lateral support for the compression flange at one of the ends of the unsupported length.
# Stiffener Details
S_stf := 0*mm  # Spacing of web stiffeners (0 if none).  This input value is only applicable for I sections and channels.
# Material Properties
G_s := 77*GPa  # Shear modulus of steel.
E_s := 2.0*10^5*MPa  # Elastic modulus of steel.
f_y := 350*MPa  # Yield strength of steel.
f_u := 480*MPa  # Tensile strength of steel.
ϕ_s := 0.9  # Resistance factor for structural steel.
# Effective Lengths
# Member Length
L_x := 0.0001*mm  # Unsupported length with respect to x-axis.
L_y := 0.0001*mm  # Unsupported length with respect to y-axis.
L_z := 0.0001*mm  # Unsupported length for torsional buckling.
L_u := 0.0001*mm  # Length of unbraced portion of beam.
# Compression Effective Length Factors
K_x := 1.0  # Effective length factor for buckling about x-axis.
K_y := 1.0  # Effective length factor for buckling about y-axis.
# Effective Length Factor for Torsional Buckling
K_e := 1  # Effective length factor for torsional buckling, conservatively taken as 1.0.
# Member Bracing Arrangement
Mem_br := 1
# - Member in braced frame.
# - Member in unbraced frame.
# Other Design Parameters
# - The adjacent Std_des parameter is used when calculating the compression resistance of Class 4 sections (clause 13.3.3), because of the difference between the two codes.
Std_des := 2
# - Canadian steel design standard^1.
# - South African steel design standard^2.
ω_1_case := 1
# - Member not subject to transverse loads between supports.
# - Member subject to distributed loads or a series of point loads between supports.
# - Member subject to a concentrated load or moment between supports.
NSF := 0.8  # Net section factor for axial tension resistance.
# Detailed Calculations
# Section Properties
# General Notes
# The following equations are for the outstanding section properties that are not included as part of the input data.
# Modified Variables for Closed Sections
# Some of the following equations in this calculation require that all section property variables be greater than zero in all cases.  Sometimes, for closed sections, this is not the case.  The following equations modify these variables to ensure correct functionality.
B_fm := if(Sect_type == 7, D, B_f)  # Modified section width B_f.
B_fm = 152.4 mm
t_wm := if(t_w == 0*mm, t_f, t_w)  # Modified section thickness t_w.
t_wm = 6.1 mm
I_ym := if(Sect_type == 7, I_x, I_y)  # Modified moment of inertia l_y.
I_ym = 4020000 mm^4
r_ym := if(Sect_type == 7, r_x, r_y)
# Modified radius of gyration about y axis.
r_ym = 36.77 mm
Z_eym := if(Sect_type == 7, Z_ex, Z_ey)  # Modified elastic modulus Z_ey.
Z_eym = 52700 mm^3
Z_pym := if(Sect_type == 7, Z_px, Z_py)  # Modified plastic modulus Z_py.
Z_pym = 80500 mm^3
# Shear Centres
# The following shear centre (or flexural centre) calculations are all in accordance with Roark's^5 Table 8.12, and the Handbook of Steel Construction^4 page 7.59.  Note that all coordinates are with respect to the section centroid.
# Shear centre y coordinate for a monosymmetric T section:
y_o2 := C_y - t_f/2 - D/(2*(1 + B_fm^3*t_f/(t_wm^3*(D - t_f))))
y_o2 = -3.50448 mm
# Shear centre x coordinate for a monosymmetric channel section:
x_o3 := -C_x - (3*t_f*(B_fm - t_wm/2)^2/(6*t_f*(B_fm - t_wm/2) + (D - t_f)*t_wm) - t_wm/2)
x_o3 = -62.1253 mm
# Shear centre x and y coordinates for an equal/unequal leg angle section:
x_o4 := -C_x + t_wm/2 + {
    I_1 ← t_wm*(D - 0.5*t_f)^3/12
    I_2 ← (B_fm - 0.5*t_wm)*t_f^3/12
    (B_fm - 0.5*t_wm)/2*I_2/(I_1 + I_2)
}
x_o4 = 3.22338 mm
y_o4 := -C_y + t_f/2 + {
    I_1 ← (D - 0.5*t_f)*t_wm^3/12
    I_2 ← t_f*(B_fm - 0.5*t_wm)^3/12
    (D - 0.5*t_f)/2*I_1/(I_1 + I_2)
}
y_o4 = 3.51106 mm
# Shear centre coordinates based on section type:
x_o :=
    if Sect_type == 1
        0*mm
    also if Sect_type == 2
        0*mm
    also if Sect_type == 3
        x_o3
    also if Sect_type == 4
        x_o4
    also if Sect_type == 5
        0*mm
    also if Sect_type == 6
        0*mm
    also if Sect_type == 7
        0*mm
    else
        "Error"
x_o = 0 mm
y_o :=
    if Sect_type == 1
        0*mm
    also if Sect_type == 2
        y_o2
    also if Sect_type == 3
        0*mm
    also if Sect_type == 4
        y_o4
    also if Sect_type == 5
        0*mm
    also if Sect_type == 6
        0*mm
    also if Sect_type == 7
        0*mm
    else
        "Error"
y_o = 0 mm
# Section Yield Force
# The axial force in the member at yield stress is required for the following section classification, and is calculated as follows:
C_yd := f_y*A_g
C_yd = 1021.76 kN
# Net Action Effect
# The net action effect (axial Tension, axial Compression, or Flexure) is required for the section classification, and is calculated as follows:
Net_act :=
    if N_f < 0 and M_fx == 0 and M_fy == 0
        "Tens"
    also if N_f > 0 and M_fx == 0 and M_fy == 0
        "Comp"
    else
        "Flex"
Net_act = "Comp"
# Section Classifications
# Element Classification Functions for Axial Compression
# The following functions return the classification of an element based on the element length l_e, and the element thickness t_e.  Note the following:
# - The functions are in accordance with Table 1 of CAN/CSA S16-01, and Tables 3 of SANS 10162-1.
# - These classifications are only relevant when the full section is subject to axial compression only (no flexural compression).
# - The classification for axial compression is solely to determine whether a section can yield prior to local buckling of a section element.  For the purposes of this calculation, a classification of '1' means that the section can yield, and '4' means that the section cannot yield.
# Function to determine the class of an element subject to axial compression, which is supported along one edge, such as the flange of an I-section, T-section or channel, or a leg of an angle:
Class_ac_1(l_e, t_e) :=
    if l_e/t_e > 250/sqrt(f_y*MPa^-1) and Sect_type == 4
        4
    if l_e/t_e ≤ 250/sqrt(f_y*MPa^-1) and Sect_type == 4
        1
    if l_e/t_e > 200/sqrt(f_y*MPa^-1) and Sect_type ≠ 4
        4
    if l_e/t_e ≤ 200/sqrt(f_y*MPa^-1) and Sect_type ≠ 4
        1
# Function to determine the class of the stem of a T-section in axial compression:
Class_ac_2(l_e, t_e) :=
    if l_e/t_e > 340/sqrt(f_y*MPa^-1)
        4
    if l_e/t_e ≤ 340/sqrt(f_y*MPa^-1)
        1
# Function to determine the class of an element in axial compression, which is either a flange of a square/rectangular hollow section, or a web supported on both edges:
Class_ac_3(l_e, t_e) :=
    if l_e/t_e > 670/sqrt(f_y*MPa^-1)
        4
    if l_e/t_e ≤ 670/sqrt(f_y*MPa^-1)
        1
# Function to determine the class of a circular hollow section in axial compression:
Class_ac_4(l_e, t_e) :=
    if l_e/t_e > 23000/(f_y*MPa^-1)
        4
    if l_e/t_e ≤ 23000/(f_y*MPa^-1)
        1
# Section Classification Based on Section Type for Axial Compression
# The following calculations determine the final classification of the section based on the section type.  Note that the element dimensions used are in accordance with clause 11.3.
# Web classification:
Class_aw :=
    if Net_act == "Tens"
        return "Tension member"
    if Sect_type == 1
        Class_ac_3(D - 2*t_f, t_wm)
    if Sect_type == 2
        max(2, Class_ac_2(D, t_wm))
    if Sect_type == 3
        Class_ac_3(D - 2*t_f, t_wm)
    if Sect_type == 4
        Class_ac_1(D, t_wm)
    if Sect_type == 5
        Class_ac_3(D - 4*t_f, t_f)
    if Sect_type == 6
        max(2, Class_ac_3(D - 4*t_f, t_f))
    if Sect_type == 7
        Class_ac_4(D, t_f)
Class_aw = 1
# Flange classification:
Class_af :=
    if Net_act == "Tens"
        return "Tension member"
    if Sect_type == 1
        Class_ac_1(0.5*B_fm, t_f)
    if Sect_type == 2
        max(2, Class_ac_1(0.5*B_fm, t_f))
    if Sect_type == 3
        Class_ac_1(B_fm, t_f)
    if Sect_type == 4
        Class_ac_1(B_fm, t_f)
    if Sect_type == 5
        Class_ac_3(B_fm - 4*t_wm, t_wm)
    if Sect_type == 6
        max(2, Class_ac_3(B_fm - 4*t_wm, t_wm))
    if Sect_type == 7
        Class_ac_4(D, t_f)
Class_af = 4
# Overall section classification:
Class_ao :=
    if Net_act == "Tens"
        return "Tension member"
    else
        max(Class_aw, Class_af)
Class_ao = 4
# Element Classification Functions for Flexural Compression
# The following functions return the classification of an element based on the element length l_e, and the element thickness t_e.  The functions are in accordance with Table 2 of CAN/CSA S16-01, and Table 4 of SANS 10162-1.
# Function to determine the class of the flange of an I-section, T-section or channel in flexural compression:
Class_fc_1(l_e, t_e) :=
    if l_e/t_e > 200/sqrt(f_y*MPa^-1)
        4
    if l_e/t_e ≤ 200/sqrt(f_y*MPa^-1)
        3
    if l_e/t_e ≤ 170/sqrt(f_y*MPa^-1)
        2
    if l_e/t_e ≤ 145/sqrt(f_y*MPa^-1)
        1
# Function to determine the class of the stem of a T-section in flexural compression:
Class_fc_2(l_e, t_e) :=
    if l_e/t_e > 340/sqrt(f_y*MPa^-1)
        4
    if l_e/t_e ≤ 340/sqrt(f_y*MPa^-1)
        3
    if l_e/t_e ≤ 170/sqrt(f_y*MPa^-1)
        2
    if l_e/t_e ≤ 145/sqrt(f_y*MPa^-1)
        1
# Function to determine the class of the flange of a square/rectangular hollow section in flexural compression:
Class_fc_3(l_e, t_e) :=
    if l_e/t_e > 670/sqrt(f_y*MPa^-1)
        4
    if l_e/t_e ≤ 670/sqrt(f_y*MPa^-1)
        3
    if l_e/t_e ≤ 525/sqrt(f_y*MPa^-1)
        2
    if l_e/t_e ≤ 420/sqrt(f_y*MPa^-1)
        1
# Function to determine the class of a web element in flexural compression:
Class_fc_4(l_e, t_e) :=
    if l_e/t_e > 1900/sqrt(f_y*MPa^-1)*(1 - 0.65*max(N_f, 0)/(ϕ_s*C_yd))
        4
    if l_e/t_e ≤ 1900/sqrt(f_y*MPa^-1)*(1 - 0.65*max(N_f, 0)/(ϕ_s*C_yd))
        3
    if l_e/t_e ≤ 1700/sqrt(f_y*MPa^-1)*(1 - 0.61*max(N_f, 0)/(ϕ_s*C_yd))
        2
    if l_e/t_e ≤ 1100/sqrt(f_y*MPa^-1)*(1 - 0.39*max(N_f, 0)/(ϕ_s*C_yd))
        1
# Function to determine the class of a circular hollow section in flexural compression:
Class_fc_5(l_e, t_e) :=
    if l_e/t_e > 66000/(f_y*MPa^-1)
        4
    if l_e/t_e ≤ 66000/(f_y*MPa^-1)
        3
    if l_e/t_e ≤ 18000/(f_y*MPa^-1)
        2
    if l_e/t_e ≤ 13000/(f_y*MPa^-1)
        1
# Section Classification Based on Section Type for Flexural Compression
# The following calculations determine the final classification of the section based on the section type.  Note that the element dimensions used are in accordance with clause 11.3, and minimum values have been assigned for certain section types based on their symmetry in accordance with clauses 11.1.2 and 11.1.3.
# Web classification:
# The section types are listed as follows to aid in following the adjacent calculation:
#
# - Doubly symmetric I section
# - Monosymmetric T section
# - Monosymmetric channel
# - Equal/unequal leg angle
# - Square hollow section
# - Rectangular hollow section
# - Circular hollow section
Class_fw :=
    if Net_act == "Tens"
        return "Tension member"
    if Sect_type == 1
        Class_fc_4(D - 2*t_f, t_wm)
    if Sect_type == 2
        Class_fc_2(D, t_wm)
    if Sect_type == 3
        max(3, Class_fc_4(D - 2*t_f, t_wm))
    if Sect_type == 4
        "N/A"
    if Sect_type == 5
        Class_fc_3(D - 4*t_f, t_f)
    if Sect_type == 6
        Class_fc_3(D - 4*t_f, t_f)
    if Sect_type == 7
        Class_fc_5(D, t_f)
Class_fw = 1
# Flange classification:
Class_ff :=
    if Net_act == "Tens"
        return "Tension member"
    if Sect_type == 1
        Class_fc_1(0.5*B_fm, t_f)
    if Sect_type == 2
        Class_fc_1(0.5*B_fm, t_f)
    if Sect_type == 3
        max(3, Class_fc_1(B_fm, t_f))
    if Sect_type == 4
        "N/A"
    if Sect_type == 5
        Class_fc_3(B_fm - 4*t_wm, t_wm)
    if Sect_type == 6
        Class_fc_3(B_fm - 4*t_wm, t_wm)
    if Sect_type == 7
        Class_fc_5(D, t_f)
Class_ff = 4
# Overall section classification:
Class_fo :=
    if Net_act == "Tens"
        return "Tension member"
    else
        max(Class_fw, Class_ff)
Class_fo = 4
# Member Slenderness for Tension and Compression
# The slenderness ratio of the member, for tension or compression actions, is checked as follows in accordance with clause 10.4.
λ_x := K_x*L_x/r_x
# Slenderness ratio about x-axis.
λ_x = 1.53633e-6
λ_y := K_y*L_y/r_ym
# Slenderness ratio about y-axis.
λ_y = 2.71961e-6
λ_max := max(λ_x, λ_y)  # Maximum member slenderness ratio.
λ_max = 2.71961e-6
# The slenderness limit is determined and checked as follows:
λ_limit :=
    if (N_f > 0 and M_fx ≠ 0 or M_fy ≠ 0) or Net_act == "Comp"
        200
    else
        300
λ_limit = 200
DesRatio_λ := λ_max/λ_limit
DesRatio_λ = 1.3598e-8
Check_λ := if(DesRatio_λ ≤ 1, "PASS", "FAIL")
Check_λ = "PASS"
# Maximum Web Slenderness
# The web slenderness is checked in accordance with clause 14.3.1, as follows.  Note that this check is only applicable for I sections and channels.
λ_web := (D - 2*t_f)/t_wm  # Actual web slenderness.
λ_web = 22.7541
λ_w_limit := 83000/(f_y*MPa^-1)  # Web slenderness limit.
λ_w_limit = 237.143
DesRatio_λw :=
    if Sect_type == 1 or Sect_type == 3
        λ_web/λ_w_limit
    else
        0
DesRatio_λw = 0.095951
Check_λw := if(DesRatio_λw ≤ 1, "PASS", "FAIL")
Check_λ = "PASS"
# Axial Tension Resistance
# The member tension resistance is calculated in accordance with clause 13.2(a).  No reduction in area is made for fasteners.
# Factored axial force (compression is positive, tension is negative):
N_f = 0.0001 kN
T_r := ϕ_s*min(A_g*f_y, 0.85*NSF*A_g*f_u)
T_r = 857.579 kN
DesRatio_T := if(N_f ≥ 0, 0, -N_f/T_r)
DesRatio_T = 0
Check_T := if(DesRatio_T ≤ 1, "PASS", "FAIL")
Check_T = "PASS"
# Axial Compression Resistance
# General Notes
# The following calculations for flexural buckling resistance are in accordance with clause 13.3.1, and only applicable for doubly symmetric sections of classes 1, 2 or 3.
# Fabrication Factor
# The following parameter n_nc accounts for fabrication residual stresses and initial imperfections.
n_c :=
    if Sect_type == 1 and Fab_type == 2
        2.24
    else
        1.34
n_c = 1.34
# Torsional or Torsional-Flexural Buckling Parameters
# The calculations within this section are all related to the torsional-flexural buckling parameters in clause 13.3.2.  These parameters are then used in the following section to determine the actual stress to be used in the slenderness reduction factor, l.
r_o := sqrt(x_o^2 + y_o^2 + r_x^2 + r_ym^2)
r_o = 74.7579 mm
Ω_o := 1 - ((x_o^2 + y_o^2)/r_o^2)
Ω_o = 1
f_ex_f(K_f) := π^2*E_s/(K_f*L_x/r_x)^2  # Function for stress f_ex in terms of effective length factor K.
f_ex := f_ex_f(K_x)  # Stress f_ex for actual effective length factor K_x.
f_ex = 8.36293e17 MPa
f_exK1 := f_ex_f(1.0)  # Stress f_ex for effective length factor K_x=1.0 (required for later compression/bending resistance calculations).
f_exK1 = 8.36293e17 MPa
f_ey_f(K_f) := π^2*E_s/(K_f*L_y/r_ym)^2  # Function for stress f_ey in terms of effective length factor K.
f_ey := f_ey_f(K_y)  # Stress f_ey for actual effective length factor K_y.
f_ey = 2.66881e17 MPa
f_eyK1 := f_ey_f(1.0)  # Stress f_ey for effective length factor K_y=1.0 (required for later compression/bending resistance calculations).
f_eyK1 = 2.66881e17 MPa
# Function for stress f_ez in terms of effective length factor K.
f_ez_f(K_f) := (π^2*E_s*I_w/(K_f*L_z)^2 + G_s*J_t)*1/(A_g*r_o^2)
f_ez := f_ez_f(K_e)
J_t = 4.84e-8 m^4  # Stress f_ez for actual effective length factor K_e.
f_ez = 2.5407e17 MPa
I_w = 0.021 mm^2*m^4
f_ezK1 := f_ez_f(1.0)
# Stress f_ez for effective length factor K_e=1.0 (required for later compression/bending resistance calculations).
f_ezK1 = 2.5407e17 MPa
f_eyz :=
    if Sect_type == 3
        (f_ex + f_ez)/(2*Ω_o)*(1 - sqrt(1 - 4*f_ex*f_ez*Ω_o/(f_ex + f_ez)^2))
    else
        (f_ey + f_ez)/(2*Ω_o)*(1 - sqrt(1 - 4*f_ey*f_ez*Ω_o/(f_ey + f_ez)^2))
f_eyz = 2.5407e17 MPa
# For C shapes, since axe of symmetry is x axis, see Hatch Tools axes orientation, Torsional-flexural buckling is coupled about xz (fexz) and for pure flexural buckling it is about (fey).
f_eyzK1 :=
    if Sect_type == 3
        (f_exK1 + f_ezK1)/(2*Ω_o)*(1 - sqrt(1 - 4*f_exK1*f_ezK1*Ω_o/(f_exK1 + f_ezK1)^2))
    else
        (f_eyK1 + f_ezK1)/(2*Ω_o)*(1 - sqrt(1 - 4*f_eyK1*f_ezK1*Ω_o/(f_eyK1 + f_ezK1)^2))
f_eyzK1 = 2.5407e17 MPa
# The torsional-flexural buckling stress for asymmetric sections is calculated by finding the smallest root of the following function f_Asym.  This is calculated using a Mathcad solve block.
f_t := 0*MPa  # Initial guess parameter for use in the Mathcad solve block.
# Function to calculate the root for (in accordance with clause 13.3.2(c)):
f_Asym(f_t) := (f_t - f_ex)*(f_t - f_ey)*(f_t - f_ez) - f_t^2*(f_t - f_ey)*(x_o/r_o)^2 - f_t^2*(f_t - f_ex)*(y_o/r_o)^2
f_ea := root(f_Asym(f_t), f_t)  # Smallest root of above equation.
f_ea = 2.66881e17 MPa
# The same function as above, however this time with all effective length factors equal to 1.0:
f_AsymK1(f_t) := (f_t - f_exK1)*(f_t - f_eyK1)*(f_t - f_ezK1) - f_t^2*(f_t - f_eyK1)*(x_o/r_o)^2 - f_t^2*(f_t - f_exK1)*(y_o/r_o)^2
f_eaK1 := root(f_AsymK1(f_t), f_t)  # Smallest root of above equation with K_x=K_y=K_e=1.
f_eaK1 = 2.66881e17 MPa
# The following graph shows the values of f_t that make the above functions f_Asym and f_AsymK1 equal to zero.
x_range := -0.25*max(f_ea, f_eaK1), -0.24*max(f_ea, f_eaK1) .. 2*max(f_ea, f_eaK1)
# [plot: f_Asym(x_range), f_AsymK1(x_range) vs x_range*10^-6]
# Torsional-Flexural Buckling Stress for Asymmetric Sections
# Torsional-Flexural Buckling Stress Based on Section Type
# Torsional-flexural buckling stress about x-axis:
f_e_x :=
    if Sect_type == 1
        f_ex
    if Sect_type == 2
        f_ex
    if Sect_type == 3
        f_eyz
    if Sect_type == 4
        f_ea
    if Sect_type == 5
        f_ex
    if Sect_type == 6
        f_ex
    if Sect_type == 7
        f_ex
f_e_x = 8.36293e17 MPa
# The section types are listed as follows to aid in following the adjacent calculation:
#
# - Doubly symmetric I section
# - Monosymmetric T section
# - Monosymmetric channel
# - Equal/unequal leg angle
# - Square hollow section
# - Rectangular hollow section
# - Circular hollow section
# Torsional-flexural buckling stress about y-axis:
f_e_y :=
    if Sect_type == 1
        f_ey
    if Sect_type == 2
        min(f_ey, f_eyz)
    if Sect_type == 3
        min(f_ey, f_eyz)
    if Sect_type == 4
        f_ea
    if Sect_type == 5
        f_ey
    if Sect_type == 6
        f_ey
    if Sect_type == 7
        f_ey
f_e_y = 2.66881e17 MPa
# Torsional-flexural buckling stress about x-axis with effective length factors  K_x=K_y=K_e=1.  This is required for later compression/bending resistance calculations.
f_e_xK1 :=
    if Sect_type == 1
        f_exK1
    if Sect_type == 2
        f_exK1
    if Sect_type == 3
        f_eyzK1
    if Sect_type == 4
        f_eaK1
    if Sect_type == 5
        f_exK1
    if Sect_type == 6
        f_exK1
    if Sect_type == 7
        f_exK1
f_e_xK1 = 8.36293e17 MPa
# Torsional-flexural buckling stress about y-axis with effective length factors  K_x=K_y=K_e=1.  This is required for later compression/bending resistance calculations.
f_e_yK1 :=
    if Sect_type == 1
        f_eyK1
    if Sect_type == 2
        min(f_eyK1, f_eyzK1)
    if Sect_type == 3
        min(f_eyK1, f_eyzK1)
    if Sect_type == 4
        f_eaK1
    if Sect_type == 5
        f_eyK1
    if Sect_type == 6
        f_eyK1
    if Sect_type == 7
        f_eyK1
f_e_yK1 = 2.66881e17 MPa
# Slenderness Factor, λ_c
λ_cx := sqrt(f_y/f_e_x)  # Slenderness factor about x-axis.
λ_cx = 2.04576e-8
λ_cy := sqrt(f_y/f_e_y)  # Slenderness factor about y-axis.
λ_cy = 3.62139e-8
# Slenderness factor about x-axis with K_x=K_y=K_e=1 (required for later compression/bending resistance calculations).
λ_cxK1 := sqrt(f_y/f_e_xK1)
λ_cxK1 = 2.04576e-8
# Slenderness factor about y-axis with K_x=K_y=K_e=1 (required for later compression/bending resistance calculations).
λ_cyK1 := sqrt(f_y/f_e_yK1)
λ_cyK1 = 3.62139e-8
# General Notes on Class 4 Sections in Compression
# - The Canadian and South African steel design codes have different methods for calculating the effective area of class 4 sections in compression (refer clauses 13.3.3 from the two codes).  Both of these methods are assessed separately in the following sections, and then the applicable method utilized for the remainder of the calculation depending on the chosen option for Std_des in the input data.
# - The South African code requires that the maximum compressive stress in an element be calculated, from which reduced effective element widths are then determined depending on that compressive stress.  The Canadian code requires that the overall resistance be reduced, regardless of the compressive stress in the element.
# - When determining the class of a section in compression, if the section is subject to pure compression (no moments) then the classification is in accordance with S16-01 Table 1 (SANS 10162 Table 3), whereas if the section is subject to flexural compression (compression force plus moment) the classification is in accordance with S16-01 Table 1 (SANS 10162 Table 4).
# - The Canadian code gives two optional methods for determining the overall compressive resistance of a class 4 section.  One is based on using a reduced 'effective' area, and the other is based on reducing the yield strength of the section.  As noted in the code commentary, these two methods may give slightly different results, but each method is just as correct as the other.  The chosen method for this calculation is based on the reduced 'effective' section area (clause 13.3.3(a)).
# - The South African code gives two options for determining the 'effective' element widths for class 4 sections.  The chosen method for this calculation is to reduce the width to meet the requirements of a non-slender section.
# - When calculating the effective areas for either the Canadian or South African codes, firstly the reduction in element width 'b_r' required to satisfy the relevant slenderness limits is determined.  Following that, the effective area 'A_e' is calculated by subtracting the element area reductions from the gross area.  In this manner, the area of web-to-flange fillets is not affected.
# - The effective area of circular hollow sections is calculated using the same method for both the Canadian and South African codes, by reducing the area to meet the slenderness limit in Table 1 of S16-01.
# Effective Area for Sect_type = 1 in Accordance with Canadian Code
# The elements and their notation is as per the following diagram:
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# Element Notation for an I Section
b_rC1a := if(0.5*B_fm/t_f < 200/sqrt(f_y*MPa^-1), 0*mm, 0.5*B_fm - 200*t_f/sqrt(f_y*MPa^-1))
b_rC1a = 3.50494 mm
b_rC1b := if((D - 2*t_f)/t_wm < 670/sqrt(f_y*MPa^-1), 0*mm, D - 2*t_f - 670*t_wm/sqrt(f_y*MPa^-1))
b_rC1b = 0 mm
A_eC1 := A_g - 4*b_rC1a*t_f - b_rC1b*t_wm
A_eC1 = 2823.99 mm^2
# Effective Area for Sect_type = 2 in Accordance with Canadian Code
# The elements and their notation is as per the following diagram:
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# Element Notation for a T Section
b_rC2a := if(0.5*B_fm/t_f < 200/sqrt(f_y*MPa^-1), 0*mm, 0.5*B_fm - 200*t_f/sqrt(f_y*MPa^-1))
b_rC2a = 3.50494 mm
b_rC2b := if((D - t_f)/t_wm < 340/sqrt(f_y*MPa^-1), 0*mm, D - t_f - 340*t_wm/sqrt(f_y*MPa^-1))
b_rC2b = 34.74 mm
A_eC2 := A_g - 2*b_rC2a*t_f - b_rC2b*t_wm
A_eC2 = 2659.74 mm^2
# Effective Area for Sect_type = 3 in Accordance with Canadian Code
# The elements and their notation is as per the following diagram:
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# Element Notation for Channels
b_rC3a := if(B_fm/t_f < 200/sqrt(f_y*MPa^-1), 0*mm, B_fm - 200*t_f/sqrt(f_y*MPa^-1))
b_rC3a = 79.7049 mm
b_rC3b := if((D - 2*t_f)/t_wm < 670/sqrt(f_y*MPa^-1), 0*mm, D - 2*t_f - 670*t_wm/sqrt(f_y*MPa^-1))
b_rC3b = 0 mm
A_eC3 := A_g - 2*b_rC3a*t_f - b_rC3b*t_wm
A_eC3 = 1835.33 mm^2
# Effective Area for Sect_type = 4 in Accordance with Canadian Code
# The elements and their notation is as per the following diagram:
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# Element Notation for Angles
b_rC4a := if(D/t_wm < 200/sqrt(f_y*MPa^-1), 0*mm, D - 200*t_wm/sqrt(f_y*MPa^-1))
b_rC4a = 87.1883 mm
b_rC4b := if(B_fm/t_f < 200/sqrt(f_y*MPa^-1), 0*mm, B_fm - 200*t_f/sqrt(f_y*MPa^-1))
b_rC4b = 79.7049 mm
A_eC4 := A_g - b_rC4a*t_f - b_rC4b*t_wm - t_f*t_wm
A_eC4 = 1798.76 mm^2
# Effective Area for Sect_type = 5 or 6 in Accordance with Canadian Code
# The elements and their notation is as per the following diagram:
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# Element Notation for Square / Rectangular Hollow Sections
b_rC5a := if((D - 4*t_f)/t_wm < 670/sqrt(f_y*MPa^-1), 0*mm, D - 4*t_f - 670*t_wm/sqrt(f_y*MPa^-1))
b_rC5a = 0 mm
b_rC5b := if((B_fm - 4*t_wm)/t_f < 670/sqrt(f_y*MPa^-1), 0*mm, B_fm - 4*t_wm - 670*t_f/sqrt(f_y*MPa^-1))
b_rC5b = 0 mm
A_eC5 := A_g - b_rC5a*t_f - b_rC5b*t_wm
A_eC5 = 2919.32 mm^2
# Axial Stresses in Section Elements
# The following function is required for the South African code only (see note 2 in the general notes on class 4 sections in compression).  The function determines the maximum axial compressive stress in any rectangular portion of the steel section, with the rectangular portion defined by the x limits x_c1 and x_c2, and the y limits y_c1 and y_c2.  If there is no compression in the portion, then the function returns a very small positive stress value.
f_c(x_c1, x_c2, y_c1, y_c2) :=
    f_1 ← N_f/A_g + M_fx*y_c1/I_x + M_fy*x_c1/I_ym
    f_2 ← N_f/A_g + M_fx*y_c1/I_x + M_fy*x_c2/I_ym
    f_3 ← N_f/A_g + M_fx*y_c2/I_x + M_fy*x_c2/I_ym
    f_4 ← N_f/A_g + M_fx*y_c2/I_x + M_fy*x_c1/I_ym
    f_5 ← max(f_1, f_2, f_3, f_4)
    if(f_5 > 0*MPa, f_5, 1*10^-99*MPa)
# k Factors for Element Slenderness Limits
# The following k factors apply for elements of class 4 sections in compression, in accordance with clause 13.3.3 of the South African code only.
k_c_f := 0.43  # Factor for elements supported along one longitudinal edge only (typically flanges).
k_c_w := 4.0  # Factor for elements supported along bot longitudinal edges (typically webs).
# Effective Area for Sect_type = 1 in Accordance with South African Code
# The elements and their notation is as per the following diagram:
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# Element Notation for an I Section
b_rS1a := if(0.5*B_fm/t_f < 0.644*sqrt(k_c_f*E_s/f_c(0 mm, -B_fm/2, D/2 - t_f, D/2)), 0*mm, 0.5*B_fm - 200*t_f/sqrt(f_y*MPa^-1))
b_rS1a = 0 mm
b_rS1b := if(0.5*B_fm/t_f < 0.644*sqrt(k_c_f*E_s/f_c(0*mm, B_fm/2, D/2 - t_f, D/2)), 0*mm, 0.5*B_fm - 200*t_f/sqrt(f_y*MPa^-1))
b_rS1b = 0 mm
b_rS1c := if(0.5*B_fm/t_f < 0.644*sqrt(k_c_f*E_s/f_c(0*mm, -B_fm/2, -D/2 + t_f, -D/2)), 0*mm, 0.5*B_fm - 200*t_f/sqrt(f_y*MPa^-1))
b_rS1c = 0 mm
b_rS1d := if(0.5*B_fm/t_f < 0.644*sqrt(k_c_f*E_s/f_c(0*mm, B_fm/2, -D/2 + t_f, -D/2)), 0*mm, 0.5*B_fm - 200*t_f/sqrt(f_y*MPa^-1))
b_rS1d = 0 mm
b_rS1e := if((D - 2*t_f)/t_wm < 0.644*sqrt(k_c_w*E_s/f_c(-t_wm/2, t_wm/2, -D/2 + t_f, D/2 - t_f)), 0*mm, D - 2*t_f - 670*t_wm/sqrt(f_y*MPa^-1))
b_rS1e = 0 mm
A_eS1 := A_g - b_rS1a*t_f - b_rS1b*t_f - b_rS1c*t_f - b_rS1d*t_f - b_rS1e*t_wm
A_eS1 = 2919.32 mm^2
# Effective area for Sect_type = 2 in Accordance with South African Code
# The elements and their notation is as per the following diagram:
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# Element Notation for a T Section
b_rS2a := if(0.5*B_fm/t_f < 0.644*sqrt(k_c_f*E_s/f_c(0*mm, -B_fm/2, C_y - t_f, C_y)), 0*mm, 0.5*B_fm - 200*t_f/sqrt(f_y*MPa^-1))
b_rS2a = 0 mm
b_rS2b := if(0.5*B_fm/t_f < 0.644*sqrt(k_c_f*E_s/f_c(0*mm, B_fm/2, C_y - t_f, C_y)), 0*mm, 0.5*B_fm - 200*t_f/sqrt(f_y*MPa^-1))
b_rS2b = 0 mm
b_rS2c := if((D - t_f)/t_wm < 0.644*sqrt(k_c_f*E_s/f_c(-t_wm/2, t_wm/2, -(D - C_y), C_y - t_f)), 0*mm, D - t_f - 340*t_wm/sqrt(f_y*MPa^-1))
b_rS2c = 0 mm
A_eS2 := A_g - b_rS2a*t_f - b_rS2b*t_f - b_rS2c*t_wm
A_eS2 = 2919.32 mm^2
# Effective area for Sect_type = 3 in accordance with South African code
# The elements and their notation is as per the following diagram:
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# Element Notation for a Channel
b_rS3a := if(B_fm/t_f < 0.644*sqrt(k_c_f*E_s/f_c(-C_x, B_fm - C_x, D/2 - t_f, D/2)), 0*mm, B_fm - 200*t_f/sqrt(f_y*MPa^-1))
b_rS3a = 0 mm
b_rS3b := if(B_fm/t_f < 0.644*sqrt(k_c_f*E_s/f_c(-C_x, B_fm - C_x, -D/2, -D/2 + t_f)), 0*mm, B_fm - 200*t_f/sqrt(f_y*MPa^-1))
b_rS3b = 0 mm
b_rS3c := if((D - 2*t_f)/t_wm < 0.644*sqrt(k_c_w*E_s/f_c(-C_x, -C_x + t_wm, -D/2 + t_f, D/2 - t_f)), 0*mm, D - 2*t_f - 670*t_wm/sqrt(f_y*MPa^-1))
b_rS3c = 0 mm
A_eS3 := A_g - b_rS3a*t_f - b_rS3b*t_f - b_rS3c*t_wm
A_eS3 = 2919.32 mm^2
# Effective Area for Sect_type = 4 in Accordance with South African Code
# The elements and their notation is as per the following diagram:
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# Element Notation for an Angle
b_rS4a := if(D/t_wm < 0.644*sqrt(k_c_f*E_s/f_c(-C_x, -C_x + t_wm, -C_y, D - C_y)), 0*mm, D - 200*t_wm/sqrt(f_y*MPa^-1))
b_rS4a = 0 mm
b_rS4b := if(B_fm/t_f < 0.644*sqrt(k_c_f*E_s/f_c(-C_x, B_fm - C_x, -C_y, -C_y + t_f)), 0*mm, B_fm - 200*t_f/sqrt(f_y*MPa^-1))
b_rS4b = 0 mm
A_eS4 := A_g - b_rS4a*t_wm - b_rS4b*t_f - t_f*t_wm
A_eS4 = 2877.84 mm^2
# Effective Area for Sect_type = 5 or 6 in Accordance with South African Code
# The elements and their notation is as per the following diagram:
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# Element Notation for Square / Rectangular Hollow Sections
b_rS5a :=
    if (B_fm - 4*t_wm)/t_f < 0.644*sqrt(k_c_w*E_s/f_c((-B_fm + 4*t_wm)/2, (B_fm - 4*t_wm)/2, D/2 - t_f, D/2))
        0*mm
    else
        B_fm - 4*t_wm - 670*t_f/sqrt(f_y*MPa^-1)
b_rS5a = 0 mm
b_rS5b :=
    if (B_fm - 4*t_wm)/t_f < 0.644*sqrt(k_c_w*E_s/f_c((-B_fm + 4*t_wm)/2, (B_fm - 4*t_wm)/2, -D/2, D/2 + t_f))
        0*mm
    else
        B_fm - 4*t_wm - 670*t_f/sqrt(f_y*MPa^-1)
b_rS5b = 0 mm
b_rS5c :=
    if (D - 4*t_f)/t_wm < 0.644*sqrt(k_c_w*E_s/f_c(-B_fm/2, -B_fm/2 + t_wm, (-D + 4*t_f)/2, (D - 4*t_f)/2))
        0*mm
    else
        D - 4*t_f - 670*t_wm/sqrt(f_y*MPa^-1)
b_rS5c = 0 mm
b_rS5d :=
    if (D - 4*t_f)/t_wm < 0.644*sqrt(k_c_w*E_s/f_c(B_fm/2 - t_wm, B_fm/2, (-D + 4*t_f)/2, (D - 4*t_f)/2))
        0*mm
    else
        D - 4*t_f - 670*t_wm/sqrt(f_y*MPa^-1)
b_rS5d = 0 mm
A_eS5 := A_g - b_rS5a*t_f - b_rS5b*t_f - b_rS5c*t_wm - b_rS5d*t_wm
A_eS5 = 2919.32 mm^2
# Effective Area for Sect_type = 7
A_e7 :=
    if D/t_f > 23000/(f_y*MPa^-1)
        A_g*23000/(f_y*MPa^-1)*t_f/D
    else
        A_g
A_e7 = 2919.32 mm^2
# Effective Area in Compression Based on Section Type and Loading  Condition for Canadian Code
A_eC :=
    if M_fx == 0 and M_fy == 0
        if Class_ao == 1 or Class_ao == 2 or Class_ao == 3
            A_g
        if Class_ao == 4 and Sect_type == 1
            A_eC1
        if Class_ao == 4 and Sect_type == 2
            A_eC2
        if Class_ao == 4 and Sect_type == 3
            A_eC3
        if Class_ao == 4 and Sect_type == 4
            A_eC4
        if Class_ao == 4 and Sect_type == 5
            A_eC5
        if Class_ao == 4 and Sect_type == 6
            A_eC5
        if Class_ao == 4 and Sect_type == 7
            A_e7
    if M_fx ≠ 0 or M_fy ≠ 0
        if Class_fo == 1 or Class_fo == 2 or Class_fo == 3
            A_g
        if Class_fo == 4 and Sect_type == 1
            A_eC1
        if Class_fo == 4 and Sect_type == 2
            A_eC2
        if Class_fo == 4 and Sect_type == 3
            A_eC3
        if Class_fo == 4 and Sect_type == 4
            A_eC4
        if Class_fo == 4 and Sect_type == 5
            A_eC5
        if Class_fo == 4 and Sect_type == 6
            A_eC5
        if Class_fo == 4 and Sect_type == 7
            A_e7
A_eC = 2823.99 mm^2
# The section types are listed as follows to aid in following the adjacent calculation:
#
# - Doubly symmetric I section
# - Monosymmetric T section
# - Monosymmetric channel
# - Equal/unequal leg angle
# - Square hollow section
# - Rectangular hollow section
# - Circular hollow section
# Effective Area in Compression Based on Section Type and Loading Condition for South African Code
A_eS :=
    if M_fx == 0 and M_fy == 0
        if Class_ao == 1 or Class_ao == 2 or Class_ao == 3
            A_g
        if Class_ao == 4 and Sect_type == 1
            A_eS1
        if Class_ao == 4 and Sect_type == 2
            A_eS2
        if Class_ao == 4 and Sect_type == 3
            A_eS3
        if Class_ao == 4 and Sect_type == 4
            A_eS4
        if Class_ao == 4 and Sect_type == 5
            A_eS5
        if Class_ao == 4 and Sect_type == 6
            A_eS5
        if Class_ao == 4 and Sect_type == 7
            A_e7
    if M_fx ≠ 0 or M_fy ≠ 0
        if Class_fo == 1 or Class_fo == 2 or Class_fo == 3
            A_g
        if Class_fo == 4 and Sect_type == 1
            A_eS1
        if Class_fo == 4 and Sect_type == 2
            A_eS2
        if Class_fo == 4 and Sect_type == 3
            A_eS3
        if Class_fo == 4 and Sect_type == 4
            A_eS4
        if Class_fo == 4 and Sect_type == 5
            A_eS5
        if Class_fo == 4 and Sect_type == 6
            A_eS5
        if Class_fo == 4 and Sect_type == 7
            A_e7
A_eS = 2919.32 mm^2
# Effective Area in Compression Based on Design Code
A_e :=
    if Std_des == 1
        A_eC
    if Std_des == 2
        A_eS
A_e = 2919.32 mm^2
# Factored Axial Compression Resistance About X-Axis
C_rx := ϕ_s*A_e*f_y*(1 + λ_cx^(2*n_c))^(-1/n_c)
C_rx = 919.586 kN
DesRatio_Crx := if(N_f < 0, 0, N_f/C_rx)
DesRatio_Crx = 1.08745e-7
Check_Crx := if(DesRatio_Crx ≤ 1, "PASS", "FAIL")
Check_Crx = "PASS"
# Factored Axial Compression Resistance About Y-Axis
C_ry := ϕ_s*A_e*f_y*(1 + λ_cy^(2*n_c))^(-1/n_c)
C_ry = 919.586 kN
DesRatio_Cry := if(N_f < 0, 0, N_f/C_ry)
DesRatio_Cry = 1.08745e-7
Check_Cry := if(DesRatio_Cry ≤ 1, "PASS", "FAIL")
Check_Cry = "PASS"
# Factored Axial Compression Resistances with Effective Length Factors Equal to 1.0
# The following axial compression resistance values are calculated with K_x=K_y=K_e=1, and are required for later compression/bending resistance calculations.
C_rxK1 := ϕ_s*A_e*f_y*(1 + λ_cxK1^(2*n_c))^(-1/n_c)
C_rxK1 = 919.586 kN
C_ryK1 := ϕ_s*A_e*f_y*(1 + λ_cyK1^(2*n_c))^(-1/n_c)
C_ryK1 = 919.586 kN
# Bending Resistance of a Laterally Supported Member
# Plastic Moment
# The plastic moment for the section is calculated in accordance with clause 13.5(a), as follows:
M_px := Z_px*f_y
M_px = 64.4 kN*m
M_py := Z_pym*f_y
M_py = 28.175 kN*m
# Yield Moment
# The yield moment for the section is calculated in accordance with clause 13.5(b), as follows:
M_yx := Z_ex*f_y
M_yx = 57.75 kN*m
M_yy := Z_eym*f_y
M_yy = 18.445 kN*m
# Reduced Moment Resistance Due to Thin Web
# For sections with class 3 flanges and a class 4 web, the moment resistance is reduced by the following factor a_w in accordance with clause 14.3.4.
# The following is a function for a_w in terms of the following variables:
# - A_w = Area of web.
# - A_f = Area of flange.
# - l_w = Web slenderness.
α_wf(A_w, A_f, λ_w) :=
    if |M_fx| == 0 or N_f < 0
        1
    else
        min(1 - 0.0005*A_w/A_f*(λ_w - 1900*sqrt(MPa)*(1 - 0.65*max(N_f, 0)/(ϕ_s*C_yd))/sqrt(|M_fx|/(ϕ_s*Z_ex))), 1)
# Moment reduction factor for Sect_type = 1:
α_w_1 := α_wf((D - 2*t_f)*t_wm, 2*B_fm*t_f, (D - 2*t_f)/t_wm)
α_w_1 = 1
# Moment reduction factor for Sect_type = 2:
α_w_2 := α_wf((D - t_f)*t_wm, B_fm*t_f, (D - t_f)/t_wm)
α_w_2 = 1
# Moment reduction factor for Sect_type = 3:
α_w_3 := α_wf((D - 2*t_f)*t_wm, 2*B_fm*t_f, (D - 2*t_f)/t_wm)
α_w_3 = 1
# Moment reduction factor based on section type:
α_w :=
    if Sect_type == 1
        α_w_1
    also if Sect_type == 2
        α_w_2
    also if Sect_type == 3
        α_w_3
    else
        1
α_w = 1
# Effective Yield Stress for Class 4 Flanges
# For a beam or girder whose web meets class 3 requirements, but flanges exceed class 3 requirements, the moment resistance is calculated using an effective yield stress, rather than effective section properties.  This effective yield stress is calculated by reducing the actual yield stress by a pro-rata of the element slenderness limit to actual element slenderness.
# Effective yield stress for Sect_type = 1:
f_y_e1 := f_y*min(200/sqrt(f_y*MPa^-1)/(0.5*B_fm/t_f), 1)
f_y_e1 = 333.901 MPa
# Effective yield stress for Sect_type = 2:
f_y_e2 := f_y*min(200/sqrt(f_y*MPa^-1)/(0.5*B_fm/t_f), 1)
f_y_e2 = 333.901 MPa
# Effective yield stress for Sect_type = 3:
f_y_e3 := f_y*min(200/sqrt(f_y*MPa^-1)/(B_fm/t_f), 1)
f_y_e3 = 166.951 MPa
# The section types are listed as follows to aid in following the adjacent calculation:
#
# - Doubly symmetric I section
# - Monosymmetric T section
# - Monosymmetric channel
# - Equal/unequal leg angle
# - Square hollow section
# - Rectangular hollow section
# - Circular hollow section
# Effective yield stress based on section type:
f_y_e :=
    if Sect_type == 1
        f_y_e1
    also if Sect_type == 2
        f_y_e2
    also if Sect_type == 3
        f_y_e3
    else
        f_y
f_y_e = 333.901 MPa
# Factored Moment Resistance About X Axis
M_rxs := ϕ_s*{
    if Class_fo == 1 or Class_fo == 2
        M_px
    if Class_fo == 3
        M_yx
    if Class_fo == 4
        if Class_ff == 4 and Class_fw == 4
            0
        if Class_ff ≠ 4 and Class_fw == 4
            α_w*M_yx
        if Class_ff == 4 and Class_fw ≠ 4
            Z_ex*f_y_e
}
M_rxs = 49.5843 kN*m
DesRatio_Mrxs := if(Class_ff == 4 and Class_fw == 4 and Net_act == "Flex", 99, |M_fx|/M_rxs)
DesRatio_Mrxs = 0
Check_Mrxs := if(DesRatio_Mrxs ≤ 1, "PASS", "FAIL")
Check_Mrxs = "PASS"
# Factored Moment Resistance About Y Axis
M_ry := ϕ_s*{
    if Class_fo == 1 or Class_fo == 2
        M_py
    if Class_fo == 3
        M_yy
    if Class_fo == 4
        if Class_ff == 4 and Class_fw == 4
            0
        else
            Z_eym*f_y_e
}
M_ry = 15.8369 kN*m
DesRatio_Mry := if(Class_ff == 4 and Class_fw == 4 and Net_act == "Flex", 99, M_fy/M_ry)
DesRatio_Mry = 0
Check_Mry := if(DesRatio_Mry ≤ 1, "PASS", "FAIL")
Check_Mry = "PASS"
# Bending Resistance of a Laterally Unsupported Member
# End Moments Ratio
# The following k factor is the ratio of smaller to larger ultimate moments at the opposite ends of an unbraced length, in accordance with clause 13.6(a).
κ :=
    if max(|M_fxA|, |M_fxB|) == 0
        0
    if Curvature == 1
        -|min(|M_fxA|, |M_fxB|)/max(|M_fxA|, |M_fxB|)|
    if Curvature == 2
        |min(|M_fxA|, |M_fxB|)/max(|M_fxA|, |M_fxB|)|
κ = -1
# Moment Coefficient, w_2
# The following w_2 coefficient is used to account for increased moment resistance of a laterally unsupported beam segment when subject to a moment gradient, in accordance with clause 13.6 (ii).
ω_2 :=
    if ω_2_case == 1
        min(1.75 + 1.05*κ + 0.3*κ^2, 2.5)
    also if ω_2_case == 2
        1.0
    else
        "ERROR"
ω_2 = 1
# Critical Elastic Moment
# The critical elastic moment for an unbraced member is calculated as follows in accordance with clause 13.6(ii):
M_cr := ω_2*π/L_u*sqrt(E_s*I_ym*G_s*J_t + (π*E_s/L_u)^2*I_ym*I_w)
M_cr = 5.73525e16 kN*m
# Moment Resistance of Doubly Symmetric Class 1 and 2 Sections
# The following moment resistance calculations are in accordance with clause 13.6(a) and do not apply to closed rectangular or circular sections.
M_rx_a :=
    if M_cr > 0.67*M_px
        1.15*ϕ_s*M_px*(1 - 0.28*M_px/M_cr)
    if M_cr ≤ 0.67*M_px
        ϕ_s*M_cr
M_rx_a = 66.654 kN*m
# Moment Resistance of Doubly Symmetric Class 3 and 4 Sections, and Channels
# The following moment resistance calculations are in accordance with clause 13.6(b) and do not apply to closed rectangular or circular sections.
M_rx_b :=
    if M_cr > 0.67*M_yx
        min(1.15*ϕ_s*M_yx*(1 - 0.28*M_yx/M_cr), ϕ_s*M_yx, ϕ_s*Z_ex*f_y_e)
    if M_cr ≤ 0.67*M_yx
        ϕ_s*M_cr
M_rx_b = 49.5843 kN*m
# Moment Resistance of Closed Square and Circular Sections
# Closed square and circular hollow sections are not subject to lateral-torsional buckling, therefore the moment resistance is the same as for a supported member, in accordance with clause 13.6(c).
M_rx_c := M_rxs
M_rx_c = 49.5843 kN*m
# Moment Resistance of a Monosymmetric T Section
# The critical moment for lateral torsional buckling of a T section is calculated in accordance with Galambos (1998)^6, chapter 5.2.3 as follows.
I_yc :=
    if M_fx ≤ 0
        0*mm^4
    else
        1/12*t_f*B_fm^3  # Moment of inertia of the flange of a T section about the y-axis (equals 0 if the stem is in compression).
I_yc = 0 mm^4
β_x := 0.9*(D - t_f/2)*(2*I_yc/I_ym)*(1 - (I_ym/I_x)^2)
β_x = 0 mm
B_1 := π*β_x/(2*K_e*L_z)*sqrt(E_s*I_ym/(G_s*J_t))
B_1 = 0
B_2 := 0
C_b := min(1.75 + 1.05*κ + 0.3*κ^2, 2.56)
# Equivalent uniform moment factor.
C_b = 1
M_rx_d := ϕ_s*π*C_b/(K_e*L_z)*(sqrt(E_s*I_ym*G_s*J_t)*(B_1 + sqrt(1 + B_2 + B_1^2)))
M_rx_d = 1.54771e9 kN*m
# Moment Resistance Based on Section Class and Type
M_rxu := min(M_rxs, {
    if Sect_type == 1
        if Class_fo == 1 or Class_fo == 2
            M_rx_a
        if Class_fo == 3 or Class_fo == 4
            M_rx_b
    if Sect_type == 2
        M_rx_d
    if Sect_type == 3
        M_rx_b
    if Sect_type == 4
        0
    if Sect_type == 5
        M_rx_c
    if Sect_type == 6
        M_rx_c
    if Sect_type == 7
        M_rx_c
})
M_rxu = 49.5843 kN*m
DesRatio_Mrxu := if(Class_ff == 4 and Class_fw == 4 and Net_act == "Flex", 99, |M_fx|/M_rxu)
DesRatio_Mrxu = 0
Check_Mrxu := if(DesRatio_Mrxu ≤ 1, "PASS", "FAIL")
Check_Mrxu = "PASS"
# Biaxial Bending Resistance
# The biaxial bending resistance is checked as follows in accordance with clause 13.6(f):
DesRatio_Mrb := if(Class_ff == 4 and Class_fw == 4 and Net_act == "Flex", 99, |M_fx|/M_rxu + M_fy/M_ry)
DesRatio_Mrb = 0
Check_Mrb := if(DesRatio_Mrb ≤ 1, "PASS", "FAIL")
Check_Mrb = "PASS"
# Axial Compression and Bending Resistance
# Equivalent Uniform Bending Coefficient, w_1
# The following ω_1 coefficient is used to determine equivalent uniform bending effect in beam-columns, in accordance with clause 13.8.5.
ω_1 :=
    if ω_1_case == 1
        max(0.6 - 0.4*κ, 0.4)
    also if ω_1_case == 2
        1.0
    also if ω_1_case == 3
        0.85
    else
        "ERROR"
ω_1 = 1
# Amplification Factors, U_1
# The following U_1 amplification factors are used to account for the second-order effects due to the deformation of a member between its ends.  These are calculated in accordance with clause 13.8.4 as follows:
C_ex := π^2*E_s*I_x/(K_x*L_x)^2
# Euler buckling strength about x-axis.
C_ex = 2.48714e18 kN
C_ey := π^2*E_s*I_ym/(K_y*L_y)^2
# Euler buckling strength about y-axis.
C_ey = 7.93516e17 kN
U_1x := ω_1/(1 - N_f/C_ex)
# U_1 amplification factor about x-axis.
U_1x = 1
U_1y := ω_1/(1 - N_f/C_ey)
# U_1 amplification factor about y-axis.
U_1y = 1
# Axial Compression and Bending Resistance for Class 1 and 2 I Sections
# The following member strength checks are in accordance with clause 13.8.2.  All of the different check cases are calculated first, and then the applicable case is determined in a following section.
# Cross-sectional strength for class 1 and 2 I sections that are part of braced frames only, in accordance with clause 13.8.2(a):
β_CB_a := 0.6
β_CB_a = 0.6
C_r_a := ϕ_s*A_e*f_y*1^(-1/n_c)
# Axial compression resistance with l=0.
C_r_a = 919.586 kN
U_1x_a := max(U_1x, 1.0)
U_1x_a = 1
U_1y_a := max(U_1y, 1.0)
U_1y_a = 1
DesRatio_CB_a :=
    if N_f ≤ 0
        0
    also if Class_ff == 4 and Class_fw == 4 and Net_act == "Flex"
        99
    else
        N_f/C_r_a + 0.85*U_1x_a*|M_fx|/M_rxs + β_CB_a*U_1y_a*M_fy/M_ry
DesRatio_CB_a = 1.08745e-7
# Overall member strength for class 1 and 2 I sections, in accordance with clause 13.8.2(b):
β_CB_b := min(0.6 + 0.4*λ_cy, 0.85)
β_CB_b = 0.6
C_r_b := if(M_fy == 0, C_rxK1, min(C_rxK1, C_ryK1))
C_r_b = 919.586 kN
U_1x_b := if(Mem_br == 1, U_1x, 1.0)
U_1x_b = 1
U_1y_b := if(Mem_br == 1, U_1y, 1.0)
U_1y_b = 1
DesRatio_CB_b :=
    if N_f ≤ 0
        0
    also if Class_ff == 4 and Class_fw == 4 and Net_act == "Flex"
        99
    else
        N_f/C_r_b + 0.85*U_1x_b*|M_fx|/M_rxs + β_CB_b*U_1y_b*M_fy/M_ry
DesRatio_CB_b = 1.08745e-7
# Lateral torsional buckling strength for class 1 and 2 I sections, in accordance with clause 13.8.2(c):
β_CB_c := min(0.6 + 0.4*λ_cy, 0.85)
β_CB_c = 0.6
C_r_c := C_ry
C_r_c = 919.586 kN
U_1x_c := if(Mem_br == 1, max(U_1x, 1.0), 1.0)
U_1x_c = 1
U_1y_c := if(Mem_br == 1, U_1y, 1.0)
U_1y_c = 1
DesRatio_CB_c :=
    if N_f ≤ 0
        0
    also if Class_ff == 4 and Class_fw == 4 and Net_act == "Flex"
        99
    else
        N_f/C_r_c + 0.85*U_1x_c*M_fx/M_rxu + β_CB_c*U_1y_c*M_fy/M_ry
DesRatio_CB_c = 1.08745e-7
# Axial Compression and Bending Resistance for Sections other than Class 1 and 2 I Sections
# The following member strength checks are in accordance with clause 13.8.3.  All of the different check cases are calculated first, and then the applicable case is determined in the following section.
# Cross-sectional strength for members in, in accordance with clause 13.8.3(a):
DesRatio_CB_d :=
    if N_f ≤ 0
        0
    also if Class_ff == 4 and Class_fw == 4 and Net_act == "Flex"
        99
    else
        N_f/C_r_a + U_1x_a*|M_fx|/M_rxs + U_1y_a*M_fy/M_ry
DesRatio_CB_d = 1.08745e-7
# Overall member strength in accordance with clause 13.8.3(b):
DesRatio_CB_e :=
    if N_f ≤ 0
        0
    also if Class_ff == 4 and Class_fw == 4 and Net_act == "Flex"
        99
    else
        N_f/C_r_b + U_1x_b*|M_fx|/M_rxs + U_1y_b*M_fy/M_ry
DesRatio_CB_e = 1.08745e-7
# Lateral torsional buckling strength in accordance with clause 13.8.3(c):
DesRatio_CB_f :=
    if N_f ≤ 0
        0
    also if Class_ff == 4 and Class_fw == 4 and Net_act == "Flex"
        99
    else
        N_f/C_r_c + U_1x_c*|M_fx|/M_rxu + U_1y_c*M_fy/M_ry
DesRatio_CB_f = 1.08745e-7
# Axial Compression and Bending for Actual Case
DesRatio_CB :=
    if Sect_type == 1 and (Class_fo == 1 or Class_fo == 2)
        if Mem_br == 1
            max(DesRatio_CB_a, DesRatio_CB_b, DesRatio_CB_c)
        if Mem_br == 2
            max(DesRatio_CB_b, DesRatio_CB_c)
    else
        if Mem_br == 1
            max(DesRatio_CB_d, DesRatio_CB_e, DesRatio_CB_f)
        if Mem_br == 2
            max(DesRatio_CB_e, DesRatio_CB_f)
DesRatio_CB = 1.08745e-7
Check_CB := if(DesRatio_CB ≤ 1, "PASS", "FAIL")
Check_CB = "PASS"
# Axial Tension and Bending Resistance
# The following combined tension and bending resistances are calculated in accordance with clause 13.9.
DesRatio_TB_a :=
    if N_f ≥ 0 or (M_fx == 0 and M_fy == 0)
        0
    else
        -N_f/T_r + |M_fx|/M_rxs + |M_fy|/M_ry
DesRatio_TB_a = 0
DesRatio_TB_b :=
    if N_f ≥ 0 or (M_fx == 0 and M_fy == 0)
        0
    else
        if Class_fo == 1 or Class_fo == 2
            |M_fx|/M_rxu - (-N_f*Z_px/(M_rxu*A_g))
        if Class_fo == 3 or Class_fo == 4
            |M_fx|/M_rxu - (-N_f*Z_ex/(M_rxu*A_g))
DesRatio_TB_b = 0
DesRatio_TB := max(DesRatio_TB_a, DesRatio_TB_b)
DesRatio_TB = 0
Check_TB := if(DesRatio_TB ≤ 1, "PASS", "FAIL")
Check_TB = "PASS"
# Shear Resistance of Members with Two Flanges
# General Notes
# - The following calculations are in accordance with clause 13.4.1 and 13.4.2 as applicable.
# - These shear resistance calculations are not applicable for circular hollow sections.
# - For square and rectangular hollow sections, the web height is approximated as the depth of the section, minus 4 x the wall thickness to allow for the corner radii (same as for the compression resistance calculations).
# Geometric Parameters
S_stf = 0 mm  # Spacing of intermediate web stiffeners.
λ_stf := S_stf/(D - 2*t_f)
# Ratio of stiffener spacing to web depth.
λ_stf = 0
# Shear area of web for shear parallel to x-axis:
A_wx :=
    if Sect_type == 1 or Sect_type == 3
        2*B_fm*t_f
    if Sect_type == 2 or Sect_type == 4
        B_fm*t_f
    if Sect_type == 5 or Sect_type == 6
        2*(B_fm - 4*t_wm)*t_f
    if Sect_type == 7
        0
A_wx = 2072.64 mm^2
# The section types are listed as follows to aid in following the adjacent calculation:
#
# - Doubly symmetric I section
# - Monosymmetric T section
# - Monosymmetric channel
# - Equal/unequal leg angle
# - Square hollow section
# - Rectangular hollow section
# - Circular hollow section
# Shear area of web for shear parallel to y-axis:
A_wy :=
    if Sect_type == 5 or Sect_type == 6
        2*(D - 4*t_f)*t_wm
    also if Sect_type == 7
        0
    else
        D*t_wm
A_wy = 929.64 mm^2
# Aspect ratio of web for shear parallel to x-axis (only used for square/rectangular hollow sections):
λ_wx := (B_fm - 4*t_wm)/t_f
λ_wx = 18.8235
# Aspect ratio of web for shear parallel to y-axis:
λ_wy :=
    if Sect_type == 1 or Sect_type == 3
        (D - 2*t_f)/t_wm
    also if Sect_type == 5 or Sect_type == 6
        (D - 4*t_f)/t_wm
    else
        0
λ_wy = 22.7541
# Shear Buckling Coefficient, k_v
k_vx := 5.34
k_vy :=
    if S_stf > 0 and (Sect_type == 1 or Sect_type == 3)
        if λ_stf < 1
            4 + 5.34/λ_stf^2
        else
            5.34 + 4/λ_stf^2
    else
        5.34
k_vy = 5.34
# Aspect Coefficient, k_a
k_a := 1/sqrt(1 + λ_stf^2)
k_a = 1
# Ultimate Shear Strength, F_s
# Inelastic critical plate-buckling stress in shear for shear parallel to x-axis:
F_crix :=
    if Sect_type == 5 or Sect_type == 6
        290*sqrt(f_y*MPa*k_vx)/λ_wx
    else
        0*Pa
F_crix = 0 MPa
# Inelastic critical plate-buckling stress in shear for shear parallel to y-axis:
F_criy :=
    if Sect_type == 2 or Sect_type == 4 or Sect_type == 7
        0*Pa
    else
        290*sqrt(f_y*MPa*k_vy)/λ_wy
F_criy = 550.989 MPa
# Elastic critical plate-buckling stress in shear for shear parallel to x-axis:
F_crex :=
    if Sect_type == 5 or Sect_type == 6
        180000*k_vx*MPa/λ_wx^2
    else
        0*Pa
F_crex = 0 MPa
# Elastic critical plate-buckling stress in shear for shear parallel to y-axis:
F_crey :=
    if Sect_type == 2 or Sect_type == 4 or Sect_type == 7
        0*Pa
    else
        180000*k_vy*MPa/λ_wy^2
F_crey = 1856.5 MPa
# Ultimate shear strength for shear parallel to x-axis:
F_sx :=
    if Sect_type == 5 or Sect_type == 6
        if λ_wx ≤ 439*sqrt(k_vx/(f_y*MPa^-1))
            0.66*f_y
        if 439*sqrt(k_vx/(f_y*MPa^-1)) < λ_wx ≤ 502*sqrt(k_vx/(f_y*MPa^-1))
            F_crix
        if 502*sqrt(k_vx/(f_y*MPa^-1)) < λ_wx ≤ 621*sqrt(k_vx/(f_y*MPa^-1))
            F_crix + k_a*(0.5*f_y - 0.866*F_crix)
        if λ_wx > 621*sqrt(k_vx/(f_y*MPa^-1))
            F_crex + k_a*(0.5*f_y - 0.866*F_crex)
    else
        f_y
F_sx = 350 MPa
# Ultimate shear strength for shear parallel to y-axis:
F_sy :=
    if Sect_type == 1 or Sect_type == 3 or Sect_type == 5 or Sect_type == 6
        if λ_wy ≤ 439*sqrt(k_vy/(f_y*MPa^-1))
            0.66*f_y
        if 439*sqrt(k_vy/(f_y*MPa^-1)) < λ_wy ≤ 502*sqrt(k_vy/(f_y*MPa^-1))
            F_criy
        if 502*sqrt(k_vy/(f_y*MPa^-1)) < λ_wy ≤ 621*sqrt(k_vy/(f_y*MPa^-1))
            F_criy + k_a*(0.5*f_y - 0.866*F_criy)
        if λ_wy > 621*sqrt(k_vy/(f_y*MPa^-1))
            F_crey + k_a*(0.5*f_y - 0.866*F_crey)
    else
        f_y
F_sy = 231 MPa
# Shear Resistance, V_r
# Factored shear resistance for shear parallel to x-axis:
V_rx := ϕ_s*A_wx*F_sx*{
    if Sect_type == 5 or Sect_type == 6
        1
    else
        0.66
}
V_rx = 430.902 kN
DesRatio_Vrx := V_fx/V_rx
DesRatio_Vrx = 0
Check_Vrx := if(DesRatio_Vrx ≤ 1, "PASS", "FAIL")
Check_Vrx = "PASS"
# Factored shear resistance for shear parallel to y-axis:
V_ry := ϕ_s*A_wy*F_sy*{
    if Sect_type == 1 or Sect_type == 3 or Sect_type == 5 or Sect_type == 6
        1
    else
        0.66
}
V_ry = 193.272 kN
DesRatio_Vry := V_fy/V_ry
DesRatio_Vry = 0
Check_Vry := if(DesRatio_Vry ≤ 1, "PASS", "FAIL")
Check_Vry = "PASS"
# Combined Shear and Moment Resistance
# The following check of combined shear and moment resistances is in accordance with clause 14.6 and only applicable for I sections, for bending about the x-axis and shear parallel to the y-axis.
DesRatio_VM :=
    if Class_ff == 4 and Class_fw == 4 and Net_act == "Flex"
        return 99
    also if Sect_type == 1
        0.727*M_fx/min(M_rxs, M_rxu) + 0.455*V_fy/V_ry
    else
        0
DesRatio_VM = 0
Check_VM := if(DesRatio_VM ≤ 1, "PASS", "FAIL")
Check_VM = "PASS"
# Summary of results
# Section Classifications
# Axial Compression
λ_max = 2.71961e-6
# Maximum member slenderness:
# Note that the following section classifications for axial compression are 'effective classifications' with only two possible values, being 1 or 4.  A classification of 1 means the section is compact and can yield prior to local buckling, and 4 means the section cannot yield and local buckling will govern.
# Web classification in axial compression:
Class_aw = 1
# Flange classification in axial compression:
Class_af = 4
# Overall section classification in axial compression:
Class_ao = 4
# Flexural Compression
# Web classification in flexural compression:
Class_fw = 1
# Flange classification in flexural compression:
Class_ff = 4
# Overall section classification in flexural compression:
Class_fo = 4
# Net Action
# The net action on the member (Tension / Compression / Flexure) is:
Net_act = "Comp"
# Member Resistances
# Axial tension resistance:
T_r = 857.579 kN
# Axial compression resistance about x-axis:
C_rx = 919.586 kN
# Axial compression resistance about y-axis:
C_ry = 919.586 kN
# Moment resistance about x-axis for a laterally supported member:
M_rxs = 49.5843 kN*m
# Moment resistance about x-axis for a laterally unsupported member:
M_rxu = 49.5843 kN*m
# Moment resistance about y-axis:
M_ry = 15.8369 kN*m
# Shear resistance for loads parallel to x-axis:
V_rx = 430.902 kN
# Shear resistance for loads parallel to y-axis:
V_ry = 193.272 kN
# Summary of Failure Mechanisms
# The following matrix provides a summary of all failure mechanisms:
FailureMechs := [
    "Member slenderness for tension or compression", Check_λ, DesRatio_λ;
    "Web slenderness for beams and girders", Check_λw, DesRatio_λw;
    "Axial tension resistance", Check_T, DesRatio_T;
    "Axial compression resistance about x-axis", Check_Crx, DesRatio_Crx;
    "Axial compression resistance about y-axis", Check_Cry, DesRatio_Cry;
    "Moment resistance about x-axis - Laterally supported member", Check_Mrxs, DesRatio_Mrxs;
    "Moment resistance about y-axis", Check_Mry, DesRatio_Mry;
    "Moment resistance about x-axis - Laterally unsupported member", Check_Mrxu, DesRatio_Mrxu;
    "Biaxial bending resistance", Check_Mrb, DesRatio_Mrb;
    "Combined axial compression and bending resistance", Check_CB, DesRatio_CB;
    "Combined axial tension and bending resistance", Check_TB, DesRatio_TB;
    "Shear resistance for loads parallel to x-axis", Check_Vrx, DesRatio_Vrx;
    "Shear resistance for loads parallel to y-axis", Check_Vry, DesRatio_Vry;
    "Combined shear and moment resistance", Check_VM, DesRatio_VM
]
FailureMechs = [
    "Member slenderness for tension or compression", "PASS", 1.3598e-8;
    "Web slenderness for beams and girders", "PASS", 0.095951;
    "Axial tension resistance", "PASS", 0;
    "Axial compression resistance about x-axis", "PASS", 1.08745e-7;
    "Axial compression resistance about y-axis", "PASS", 1.08745e-7;
    "Moment resistance about x-axis - Laterally supported member", "PASS", 0;
    "Moment resistance about y-axis", "PASS", 0;
    "Moment resistance about x-axis - Laterally unsupported member", "PASS", 0;
    "Biaxial bending resistance", "PASS", 0;
    "Combined axial compression and bending resistance", "PASS", 1.08745e-7;
    "Combined axial tension and bending resistance", "PASS", 0;
    "Shear resistance for loads parallel to x-axis", "PASS", 0;
    "Shear resistance for loads parallel to y-axis", "PASS", 0;
    "Combined shear and moment resistance", "PASS", 0
]
MaxDesRatio := max(FailureMechs[:, 2])
OverallCheck := if(MaxDesRatio ≤ 1, "PASS", "FAIL")
# Details of the critical failure mechanism are as follows:
MaxDesRatio = 0.095951
CritIndex := trunc(|match(MaxDesRatio, FailureMechs[:, 2])[0]|)
OverallCheck = "PASS"
CritFailureMech := FailureMechs[CritIndex, 0]
CritFailureMech = "Web slenderness for beams and girders"
